// SBML level 2 version 1

model Proctor2005_Hsp90()
  // Hsp90model_basis510

  // Compartments:
  compartment compartment = 1;

  // Species:
  substanceOnly species Hsp90 in compartment = 300000;
  substanceOnly species HCom in compartment = 5900;
  substanceOnly species HSF1 in compartment = 100;
  substanceOnly species MisP in compartment = 0;
  substanceOnly species MCom in compartment = 0;
  substanceOnly species TriH in compartment = 0;
  substanceOnly species DiH in compartment = 0;
  substanceOnly species NatP in compartment = 6000000;
  substanceOnly species AggP in compartment = 0;
  substanceOnly species HSE in compartment = 1;
  substanceOnly species HSETriH in compartment = 0;
  substanceOnly species X in compartment = 0;
  substanceOnly species ROS in compartment = 100;
  substanceOnly species ATP in compartment = 10000;
  substanceOnly species ADP in compartment = 1000;
  substanceOnly species $source in compartment = 0;

  // Parameters:
  k1 = 10;
  k2 = 2e-5;
  k3 = 50;
  k4 = 1e-5;
  k5 = 4e-6;
  k6 = 6e-7;
  k7 = 1e-7;
  k8 = 500;
  k9 = 1;
  k10 = 0.01;
  k11 = 100;
  k12 = 0.5;
  k13 = 0.5;
  k14 = 0.05;
  k15 = 0.08;
  k16 = 1000;
  k17 = 8.02e-9;
  k18 = 12;
  k19 = 0.02;
  k20 = 0.1;
  k21 = 0.001;

  // Reactions:
  proteinSynthesis: 0 $source => NatP; k1;
  misfolding: NatP + ROS => MisP + ROS; k2*NatP*ROS;
  Hsp90MisPBinding: MisP + Hsp90 => MCom; k3*MisP*Hsp90;
  unsuccessulRefolding: MCom => MisP + Hsp90; k4*MCom; unsuccessulRefolding is "unsuccessfulRefolding";
  refolding: MCom + ATP => Hsp90 + NatP + ADP; k5*MCom*ATP;
  proteinDegradation: MisP + ATP => ADP; k6*MisP*ATP;
  proteinAggregation1: 2 MisP => AggP; (MisP - 1)*k7*MisP/2;
  proteinAggregation2: MisP + AggP => 2 AggP; k7*MisP*AggP;
  Hsp90HSF1Binding: Hsp90 + HSF1 => HCom; k8*Hsp90*HSF1;
  Hsp90HSF1Release: HCom => Hsp90 + HSF1; k9*HCom;
  dimerisation: 2 HSF1 => DiH; (HSF1 - 1)*k10*HSF1/2;
  trimerisation: HSF1 + DiH => TriH; k11*HSF1*DiH;
  deTrimerisation: TriH => HSF1 + DiH; k12*TriH;
  deDimerisation: DiH => 2 HSF1; k13*DiH;
  HSETriHBinding: TriH + HSE => HSETriH; k14*HSE*TriH;
  HSETriHRelease: HSETriH => HSE + TriH; k15*HSETriH;
  Hsp90Transcription: HSETriH => HSETriH + Hsp90; k16*HSETriH;
  Hsp90Degradation: Hsp90 + ATP => ADP; k17*Hsp90*ATP;
  countTime: 0 $source => X; 1;
  ATPformation: ADP => ATP; k18*ADP;
  ATPconsumption: ATP => ADP; k19*ATP;
  radicalFormation: 0 $source => ROS; k20*1;
  radicalScavenging: ROS => ; k21*ROS;

  // Unit definitions:
  unit substance = item;
end
