// SBML level 2 version 1

model EPSP_Edelstein()
  // Edelstein1996_EPSP_AChEvent
  // Model of a nicotinic EPSP in a Torpedo electric organ by Edelstein et al (1995)
  // Acetylcholine is not represented explicitely, but by an event that changes the constants of transition from unliganded to liganded.
  // This model originates from BioModels Database: A Database of Annotated Published Models. It is copyright (c) 2005-2007 The BioModels Team.
  // For more information see the terms of use.

  // Compartments:
  compartment comp1 = 1e-16; comp1 is "compartment1";

  // Species:
  // biliganded basal state
  species BLL in comp1 = 0; BLL is "BasalACh2";
  // monoliganded intermediate
  species IL in comp1 = 0; IL is "IntermediateACh";
  // monoliganded active state
  species AL in comp1 = 0; AL is "ActiveACh";
  // unkiganded active state
  species A in comp1 = 0; A is "Active";
  // monoliganded basal state
  species BL in comp1 = 0; BL is "BasalACh";
  // unliganded basal state
  species B in comp1 = 1.660578e-21/comp1; B is "Basal";
  // biliganded desensitised state
  species DLL in comp1 = 0; DLL is "DesensitisedACh2";
  // fully desensitised state
  species D in comp1 = 0; D is "Desensitised";
  // biliganded intermediate
  species ILL in comp1 = 0; ILL is "IntermediateACh2";
  // monoliganded desensitised state
  species DL in comp1 = 0; DL is "DesensitisedACh";
  // unliganted intermediate
  species I in comp1 = 0; I is "Intermediate";
  // biliganted active state
  species ALL in comp1 = 0; ALL is "ActiveACh2";

  // Parameters:
  kf_0 = 3000;
  kr_0 = 8000;
  kf_1 = 1500;
  kr_1 = 16000;
  kf_2 = 30000;
  kr_2 = 700;
  kf_3 = 3000;
  kr_3 = 8.64;
  kf_4 = 1500;
  kr_4 = 17.28;
  kf_5 = 0.54;
  kr_5 = 10800;
  kf_6 = 130;
  kr_6 = 2740;
  kf_7 = 3000;
  kr_7 = 4;
  kf_8 = 1500;
  kr_8 = 8;
  kf_9 = 19.7;
  kr_9 = 3.74;
  kf_10 = 19.85;
  kr_10 = 1.74;
  kf_11 = 20;
  kr_11 = 0.81;
  kf_12 = 3000;
  kr_12 = 4;
  kf_13 = 1500;
  kr_13 = 8;
  kf_14 = 0.05;
  kr_14 = 0.0012;
  kf_15 = 0.05;
  kr_15 = 0.0012;
  kf_16 = 0.05;
  kr_16 = 0.0012;
  t2 = 20;

  // Reactions:
  // kf_0 * B - kr_0 * BL
  // first ligand on basal
  React0: B -> BL; comp1*(kf_0*B - kr_0*BL);
  // kf_1 * BL - kr_1 * BLL
  // second ligand on basal
  React1: BL -> BLL; comp1*(kf_1*BL - kr_1*BLL);
  // kf_2 * BLL - kr_2 * ALL
  // opening of biliganded
  React2: BLL -> ALL; comp1*(kf_2*BLL - kr_2*ALL);
  // kf_3 * A - kr_3 * AL
  // first ligand on active
  React3: A -> AL; comp1*(kf_3*A - kr_3*AL);
  // kf_4 * AL - kr_4 * ALL
  // second ligand on active
  React4: AL -> ALL; comp1*(kf_4*AL - kr_4*ALL);
  // kf_5 * B - kr_5 * A
  // opening of unliganded
  React5: B -> A; comp1*(kf_5*B - kr_5*A);
  // kf_6 * BL - kr_6 * AL
  // opening of monoliganded
  React6: BL -> AL; comp1*(kf_6*BL - kr_6*AL);
  // kf_7 * I - kr_7 * IL
  // first ligand on intermediate
  React7: I -> IL; comp1*(kf_7*I - kr_7*IL);
  // kf_8 * IL - kr_8 * ILL
  // second ligand on intermediate
  React8: IL -> ILL; comp1*(kf_8*IL - kr_8*ILL);
  // kf_9 * A - kr_9 * I
  // unlig act <=> unlig interm
  React9: A -> I; comp1*(kf_9*A - kr_9*I);
  // kf_10 * AL - kr_10 * IL
  // monolig act <=> monolig interm
  React10: AL -> IL; comp1*(kf_10*AL - kr_10*IL);
  // kf_11 * ALL - kr_11 * ILL
  // bilig act <=> bilig interm
  React11: ALL -> ILL; comp1*(kf_11*ALL - kr_11*ILL);
  // kf_12 * D - kr_12 * DL
  // first ligand on desensitised
  React12: D -> DL; comp1*(kf_12*D - kr_12*DL);
  // kf_13 * DL - kr_13 * DLL
  // second ligand on desensitised
  React13: DL -> DLL; comp1*(kf_13*DL - kr_13*DLL);
  // kf_14 * I - kr_14 * D
  // unlig interm <=> unlig desen
  React14: I -> D; comp1*(kf_14*I - kr_14*D);
  // kf_15 * IL - kr_15 * DL
  // monolig interm <=> monolig desen
  React15: IL -> DL; comp1*(kf_15*IL - kr_15*DL);
  // kf_16 * ILL - kr_16 * DLL
  // bilig interm <=> bilig desen
  React16: ILL -> DLL; comp1*(kf_16*ILL - kr_16*DLL);

  // Events:
  RemovalACh: at (time > t2): kf_0 = 0, kf_3 = 0, kf_7 = 0, kf_12 = 0, kf_1 = 0, kf_4 = 0, kf_8 = 0, kf_13 = 0; RemovalACh is "removal of ACh";
end
