// SBML level 2 version 1

model GMO()
  // Goldbeter1991_MinMitOscil_ExplInact
  // A Simple Mitotic Oscillator
  // Reference:Goldbeter A (1991)A minimal cascade model for the mitotic oscillator involving cyclin and cdc2 kinase, PNAS 88:9107-9111
  // Web Reference:http://www.pnas.org/cgi/content/abstract/88/20/9107
  // This model represents the inactive forms of CDC-2 Kinase and Cyclin Protease as separate species, unlike the ODEs in the published paper, in which the equations for the inactive forms are substituted into the equations for the active forms using a mass conservation rule M+MI=1,X+XI=1. Mass is still conserved in this model through the explicit reactions M<->MI and X<->XI. The terms in the kinetic laws are identical to the corresponding terms in the kinetic laws in the published paper.
  // This is a Systems Biology Markup Language (SBML) file, generated by MathSBML 2.4.6 (14-January-2005) 14-January-2005 18:37:35.503857. SBML is a form of XML, and most XML files will not display properly in an internet browser. To view the contents of an XML file use the "Page Source" or equivalent button on you browser.
  // This model originates from BioModels Database: A Database of Annotated Published Models. It is copyright (c) 2005-2007 The BioModels Team.
  // For more information see the terms of use.

  // Compartments:
  compartment cell = 1 volume;

  // Species:
  species C in cell = 0.01; C is "Cyclin";
  species M in cell = 0.01; M is "Active CDC-2 Kinase";
  species X in cell = 0.01; X is "Active Cyclin Protease";
  species MI in cell = 0.99; MI is "Inactive CDC-2 Kinase";
  species XI in cell = 0.99; XI is "Inactive Cyclin Protease";

  // Parameters:
  VM1 = 3;
  VM3 = 1;
  Kc = 0.5;

  // Assignment rules:
  V1 := C*VM1*(C + Kc)^(-1);
  V3 := M*VM3;

  // Reactions:
  creation_of_cyclin: => C; cell*vi;
    vi = 0.025;
  default_degradation_of_cyclin: C => ; C*cell*kd;
    kd = 0.01;
  reaction3: C => ; C*cell*vd*X*(C + Kd)^(-1); reaction3 is "cdc2 kinase triggered degration of cyclin";  // modifiers: X
    vd = 0.25; Kd = 0.02;
  activation_of_cdc2_kinase: MI => M; cell*MI*V1*(K1 + MI)^(-1);
    K1 = 0.005;
  deactivation_of_cdc2_kinase: M => MI; cell*M*V2*(K2 + M)^(-1);
    V2 = 1.5; K2 = 0.005;
  activation_of_cyclin_protease: XI => X; cell*V3*XI*(K3 + XI)^(-1);
    K3 = 0.005;
  deactivation_of_cyclin_protease: X => XI; cell*V4*X*(K4 + X)^(-1);
    K4 = 0.005; V4 = 0.5;
end
