// SBML level 2 version 1

model Tyson1991CellModel_6()
  // Tyson1991_CellCycle_6var
  // Cell Cycle Model; Tyson (1991, 6 variables)
  // Citation
  // Tyson JJ, (1991). Modeling the cell division cycle: cdc2 and cyclin interactions. PNAS, 88: 7328-7332. http://www.pnas.org/cgi/content/abstract/88/16/7328
  // Description
  // A model of the cell cycle based on the interactions between cdc2 and cyclin. The model has six dynamic variables: C2 (cdc2); CP (cdc2-P complex); pM (P-cyclin-cdc2-P complex); M (active MPF, P-cyclin-cdc2 complex); Y (cyclin); and YP (cyclin-P). Total cyclin concentration (YT) is the sum YT=Y+YP+pM+M4
  // Rate constant Reaction
  // k1aa = 0.015 EmptySet -> Y
  // k2 = 0 Y -> EmptySet
  // k3 = 200 CP + Y -> pM
  // k4prime + k4*M[t]^2 pM -> M
  // k5notP = 0 M -> pM
  // k6 = 1 M -> C2 + YP
  // k7 = 0.6 YP -> EmptySet
  // k8notP = 1000000 C2 -> CP
  // k9 = 1000 CP -> C2
  // Variable IC ODE
  // C2 0 C2'[t] == -(k8notP*C2[t]) + k9*CP[t] + k6*M[t]
  // CP 1 CP'[t] == k8notP*C2[t] - k9*CP[t] - k3*CP[t]*Y[t]
  // M 0 M'[t] == -(k5notP*M[t]) - k6*M[t] + (k4prime + k4*M[t]^2)*pM[t]
  // pM 0.3 pM'[t] == k5notP*M[t] - (k4prime + k4*M[t]^2)*pM[t] + k3*CP[t]*Y[t]
  // Y 0 Y'[t] == k1aa - k2*Y[t] - k3*CP[t]*Y[t]
  // YP 0 YP'[t] == k6*M[t] - k7*YP[t]
  // Generated by Cellerator Version 1.0 update 2.1125 using Mathematica 4.2 for Mac OS X (June 4, 2002), November 27, 2002 12:12:10, using (PowerMac,PowerPC, Mac OS X,MacOSX,Darwin)
  // author=B.E.Shapiro
  // This model originates from BioModels Database: A Database of Annotated Published Models. It is copyright (c) 2005-2007 The BioModels Team.
  // For more information see the terms of use.

  // Compartments:
  compartment cell;

  // Species:
  substanceOnly species $EmptySet in cell = 0;
  substanceOnly species cdc2k in cell = 0;
  substanceOnly species CP in cell = 1; CP is "cdc2k-P";
  substanceOnly species M in cell = 0; M is "p-cyclin_cdc2";
  substanceOnly species pM in cell = 0.3; pM is "p-cyclin_cdc2-p";
  substanceOnly species Y in cell = 0; Y is "cyclin";
  substanceOnly species YP in cell = 0; YP is "p-cyclin";

  // Reactions:
  cyclin_cdc2k_dissociation: M => cdc2k + YP; k6*M;
    k6 = 1;
  cdc2k_phosphorylation: cdc2k => CP; cdc2k*k8notP;
    k8notP = 1000000;
  cdc2k_dephosphorylation: CP => cdc2k; CP*k9;
    k9 = 1000;
  cyclin_cdc2k_p_association: CP + Y => pM; CP*k3*Y; cyclin_cdc2k_p_association is "cyclin cdc2k-p association";
    k3 = 200;
  deactivation_of_cdc2_kinase: M => pM; k5notP*M;
    k5notP = 0;
  cyclin_biosynthesis: $EmptySet => Y; k1aa;
    k1aa = 0.015;
  default_degradation_of_cyclin: Y => $EmptySet; k2*Y;
    k2 = 0;
  Reaction8: YP => $EmptySet; k7*YP; Reaction8 is "cdc2 kinase triggered degration of cyclin";
    k7 = 0.6;
  activation_of_cdc2_kinase: pM => M; pM*(k4prime + k4*M^2);
    k4 = 180; k4prime = 0.018;
end
