// SBML level 2 version 1

model Gardner1998_CellCycle_Goldbeter()
  // This is a Systems Biology Markup Language (SBML) file, generated by MathSBML 2.6.0.p960929 (Prerelease Version of 29-Sept-2006) 1-October-2006 15:36:36.076517. SBML is a form of XML, and most XML files will not display properly in an internet browser. To view the contents of an XML file use the "Page Source" or equivalent button on you browser.
  // This model originates from BioModels Database: A Database of Annotated Published Models. It is copyright (c) 2005-2007 The BioModels Team.
  // For more information see the terms of use.

  // Compartments:
  compartment Cell = 1 volume;

  // Species:
  species C in Cell = 0; C is "cyclin";
  species X in Cell = 0; X is "protease";
  species M in Cell = 0; M is "cdc2k";
  species Y in Cell = 1/Cell; Y is "cyclin inhibitor";
  species Z in Cell = 1/Cell; Z is "complex inhibitor-cyclin";

  // Parameters:
  K6 = 0.3;
  V1p = 0.75;
  V3p = 0.3;

  // Assignment rules:
  V1 := C*V1p*(C + K6)^(-1);
  V3 := M*V3p;

  // Reactions:
  creation_of_cyclin: => C; vi;
    vi = 0.1;
  reaction2: C => ; C*k1*X*(C + K5)^(-1); reaction2 is "cdc2 kinase triggered degration of cyclin";  // modifiers: X
    k1 = 0.5; K5 = 0.02;
  default_degradation_of_cyclin: C => ; C*default_degradation_of_cyclin_kd;
    default_degradation_of_cyclin_kd = 0.02;
  activation_of_cdc2_kinase: => M; (1 + (-1*M))*V1*(K1 + (-1*M) + 1)^(-1);
    K1 = 0.1;
  deactivation_of_cdc2_kinase: M => ; M*V2*(K2 + M)^(-1);
    V2 = 0.25; K2 = 0.1;
  activation_of_cyclin_protease: => X; V3*(1 + (-1*X))*(K3 + (-1*X) + 1)^(-1);
    K3 = 0.2;
  deactivation_of_cyclin_protease: X => ; V4*X*(K4 + X)^(-1);
    K4 = 0.1; V4 = 0.1;
  reaction8: C + Y => Z; a1*C*Y;
    a1 = 0.05;
  reaction9: Z => C + Y; a2*Z;
    a2 = 0.05;
  desinhibition_of_cyclin: Z => C; desinhibition_of_cyclin_alpha*desinhibition_of_cyclin_d1*Z;
    desinhibition_of_cyclin_alpha = 0.1; desinhibition_of_cyclin_d1 = 0.05;
  degradation_of_inhibited_cyclin: Z => Y; degradation_of_inhibited_cyclin_alpha*degradation_of_inhibited_cyclin_kd*Z;
    degradation_of_inhibited_cyclin_kd = 0.02; degradation_of_inhibited_cyclin_alpha = 0.1;
  creation_of_cyclin_inhibitor: => Y; vs;
    vs = 0.2;
  degradation_of_cyclin_inhibitor: Y => ; degradation_of_cyclin_inhibitor_d1*Y;
    degradation_of_cyclin_inhibitor_d1 = 0.05;
end
