// SBML level 2 version 1

model Huang1996_MAPK_ultrasens()
  // This model originates from BioModels Database: A Database of Annotated Published Models. It is copyright (c) 2005-2007 The BioModels Team.
  // For more information see the terms of use.

  // Compartments:
  compartment compartment = 4e-12;

  // Species:
  species E1 in compartment = 3e-5; E1 is "MAPKKK activator";
  species E2 in compartment = 0.0003; E2 is "MAPKKK inactivator";
  species KKK in compartment = 0.003; KKK is "MAPKKK";
  species P_KKK in compartment = 0; P_KKK is "P-MAPKKK";
  species KK in compartment = 1.2; KK is "MAPKK";
  species P_KK in compartment = 0; P_KK is "P-MAPKK";
  species PP_KK in compartment = 0; PP_KK is "PP-MAPKK";
  species K in compartment = 1.2; K is "MAPK";
  species P_K in compartment = 0; P_K is "P-MAPK";
  species PP_K in compartment = 0; PP_K is "PP-MAPK";
  species KPase in compartment = 0.12; KPase is "MAPK-Pase";
  species KKPase in compartment = 0.0003; KKPase is "MAPKK-Pase";
  species E1_KKK in compartment = 0; E1_KKK is "activ_MAPKKK";
  species E2_P_KKK in compartment = 0; E2_P_KKK is "inact_P-MAPKKK";
  species P_KKK_KK in compartment = 0; P_KKK_KK is "P-MAPKKK_MAPKK";
  species P_KKK_P_KK in compartment = 0; P_KKK_P_KK is "P-MAPKKK_P-MAPKK";
  species PP_KK_K in compartment = 0; PP_KK_K is "PP-MAPKK_MAPK";
  species PP_KK_P_K in compartment = 0; PP_KK_P_K is "PP-MAPKK_P-MAPK";
  species KKPase_PP_KK in compartment = 0; KKPase_PP_KK is "MAPKK-Pase_PP-MAPKK";
  species KKPase_P_KK in compartment = 0; KKPase_P_KK is "MAPKK-Pase_P-MAPKK";
  species KPase_PP_K in compartment = 0; KPase_PP_K is "MAPK-Pase_PP-MAPK";
  species KPase_P_K in compartment = 0; KPase_P_K is "MAPK-Pase_P-MAPK";

  // Reactions:
  r1a: KKK + E1 -> E1_KKK; compartment*(a1*E1*KKK - d1*E1_KKK); r1a is "binding of MAPKKK activator";
    a1 = 1000; d1 = 150;
  r1b: E1_KKK => E1 + P_KKK; compartment*r1b_k2*E1_KKK; r1b is "MAPKKK activation";
    r1b_k2 = 150;
  r2a: P_KKK + E2 -> E2_P_KKK; compartment*(a2*E2*P_KKK - d2*E2_P_KKK); r2a is "binding of MAPKKK inactivator";
    a2 = 1000; d2 = 150;
  r2b: E2_P_KKK => E2 + KKK; compartment*r2b_k2*E2_P_KKK; r2b is "MAPKKK inactivation";
    r2b_k2 = 150;
  r3a: KK + P_KKK -> P_KKK_KK; compartment*(a3*KK*P_KKK - d3*P_KKK_KK); r3a is "binding P-MAPKKK and MAPKK";
    a3 = 1000; d3 = 150;
  r3b: P_KKK_KK => P_KK + P_KKK; compartment*k3*P_KKK_KK; r3b is "phosphorylation of MAPKK";
    k3 = 150;
  r4a: P_KK + KKPase -> KKPase_P_KK; compartment*(a4*P_KK*KKPase - d4*KKPase_P_KK); r4a is "binding MAPKK-Pase and P-MAPKK";
    a4 = 1000; d4 = 150;
  r4b: KKPase_P_KK => KK + KKPase; compartment*k4*KKPase_P_KK; r4b is "dephosphorylation of P-MAPKK";
    k4 = 150;
  r5a: P_KK + P_KKK -> P_KKK_P_KK; compartment*(a5*P_KK*P_KKK - d5*P_KKK_P_KK); r5a is "binding P-MAPKKK and P-MAPKK";
    a5 = 1000; d5 = 150;
  r5b: P_KKK_P_KK => PP_KK + P_KKK; compartment*k5*P_KKK_P_KK; r5b is "phosphorylation of P-MAPKK";
    k5 = 150;
  r6a: PP_KK + KKPase -> KKPase_PP_KK; compartment*(a6*PP_KK*KKPase - d6*KKPase_PP_KK); r6a is "binding MAPKK-Pase and PP-MAPKK";
    a6 = 1000; d6 = 150;
  r6b: KKPase_PP_KK => P_KK + KKPase; compartment*k6*KKPase_PP_KK; r6b is "dephosphorylation of PP-MAPKK";
    k6 = 150;
  r7a: K + PP_KK -> PP_KK_K; compartment*(a7*K*PP_KK - d7*PP_KK_K); r7a is "binding MAPK and PP-MAPKK";
    a7 = 1000; d7 = 150;
  r7b: PP_KK_K => P_K + PP_KK; compartment*k7*PP_KK_K; r7b is "phosphorylation of MAPK";
    k7 = 150;
  r8a: P_K + KPase -> KPase_P_K; compartment*(a8*P_K*KPase - d8*KPase_P_K); r8a is "binding MAPK-Pase and P-MAPK";
    a8 = 1000; d8 = 150;
  r8b: KPase_P_K => K + KPase; compartment*k8*KPase_P_K; r8b is "dephosphorylation of P-MAPK";
    k8 = 150;
  r9a: P_K + PP_KK -> PP_KK_P_K; compartment*(a9*P_K*PP_KK - d9*PP_KK_P_K); r9a is "binding PP-MAPKK and P-MAPK";
    a9 = 1000; d9 = 150;
  r9b: PP_KK_P_K => PP_KK + PP_K; compartment*k9*PP_KK_P_K; r9b is "phosphorylation of P-MAPK";
    k9 = 150;
  r10a: PP_K + KPase -> KPase_PP_K; compartment*(a10*PP_K*KPase - d10*KPase_PP_K); r10a is "binding MAPK-Pase and PP-MAPK";
    a10 = 1000; d10 = 150;
  r10b: KPase_PP_K => P_K + KPase; compartment*k10*KPase_PP_K; r10b is "dephosphorylation of PP-MAPK";
    k10 = 150;

  // Unit definitions:
  unit substance = 1e-6 mole; substance is "micromole";
end
