// SBML level 2 version 1

model MAPK_in_Solution()
  // Levchenko2000_MAPK_noScaffold
  // MAPK cascade in solution (no scaffold)
  // Citation
  // Levchenko, A., Bruck, J., Sternberg, P.W. (2000) .Scaffold proteins may biphasically affect the levels of mitogen- activated protein kinase signaling and reduce its threshold properties. Proc. Natl. Acad. Sci. USA 97( 11):5818-5823. http://www.pnas.org/cgi/content/abstract/97/11/5818
  // Description
  // This model describes a basic 3- stage Mitogen Activated Protein Kinase (MAPK) cascade in solution. This cascade is typically expressed as RAF= =>MEK==>MAPK (alternative forms are K3==>K2==> K1 and KKK==>KK==>K) . The input signal is RAFK (RAF Kinase) and the output signal is MAPKpp ( doubly phosphorylated form of MAPK) . RAFK phosphorylates RAF once to RAFp. RAFp, the phosphorylated form of RAF induces two phoshporylations of MEK, to MEKp and MEKpp. MEKpp, the doubly phosphorylated form of MEK, induces two phosphorylations of MAPK to MAPKp and MAPKpp.
  // Rate constant Reaction
  // a10 = 5. MAPKPH + MAPKpp -> MAPKppMAPKPH
  // a1 = 1. RAF + RAFK -> RAFRAFK
  // a2 = 0.5 RAFp + RAFPH -> RAFpRAFPH
  // a3 = 3.3 MEK + RAFp -> MEKRAFp
  // a4 = 10. MEKp + MEKPH -> MEKpMEKPH
  // a5 = 3.3 MEKp + RAFp -> MEKpRAFp
  // a6 = 10. MEKPH + MEKpp -> MEKppMEKPH
  // a7 = 20. MAPK + MEKpp -> MAPKMEKpp
  // a8 = 5. MAPKp + MAPKPH -> MAPKpMAPKPH
  // a9 = 20. MAPKp + MEKpp -> MAPKpMEKpp
  // d10 = 0.4 MAPKppMAPKPH -> MAPKPH + MAPKpp
  // d1 = 0.4 RAFRAFK -> RAF + RAFK
  // d2 = 0.5 RAFpRAFPH -> RAFp + RAFPH
  // d3 = 0.42 MEKRAFp -> MEK + RAFp
  // d4 = 0.8 MEKpMEKPH -> MEKp + MEKPH
  // d5 = 0.4 MEKpRAFp -> MEKp + RAFp
  // d6 = 0.8 MEKppMEKPH -> MEKPH + MEKpp
  // d7 = 0.6 MAPKMEKpp -> MAPK + MEKpp
  // d8 = 0.4 MAPKpMAPKPH -> MAPKp + MAPKPH
  // d9 = 0.6 MAPKpMEKpp -> MAPKp + MEKpp
  // k10 = 0.1 MAPKppMAPKPH -> MAPKp + MAPKPH
  // k1 = 0.1 RAFRAFK -> RAFK + RAFp
  // k2 = 0.1 RAFpRAFPH -> RAF + RAFPH
  // k3 = 0.1 MEKRAFp -> MEKp + RAFp
  // k4 = 0.1 MEKpMEKPH -> MEK + MEKPH
  // k5 = 0.1 MEKpRAFp -> MEKpp + RAFp
  // k6 = 0.1 MEKppMEKPH -> MEKp + MEKPH
  // k7 = 0.1 MAPKMEKpp -> MAPKp + MEKpp
  // k8 = 0.1 MAPKpMAPKPH -> MAPK + MAPKPH
  // k9 = 0.1 MAPKpMEKpp -> MAPKpp + MEKpp
  // Variable IC ODE
  // MAPK 0.3 MAPK'[t] == d7*MAPKMEKpp[t] + k8*MAPKpMAPKPH[t] - a7*MAPK[t]*MEKpp[t]
  // MAPKMEKpp 0 MAPKMEKpp'[t] == -(d7*MAPKMEKpp[t]) - k7*MAPKMEKpp[t] + a7*MAPK[t]*MEKpp[t]
  // MAPKp 0 MAPKp'[t] == k7*MAPKMEKpp[t] - a8*MAPKp[t]*MAPKPH[t] + d8*MAPKpMAPKPH[t] + d9*MAPKpMEKpp[t] + k10* MAPKppMAPKPH[t] - a9*MAPKp[t]*MEKpp[t]
  // MAPKPH 0.3 MAPKPH'[t] == -(a8*MAPKp[t]*MAPKPH[t]) + d8*MAPKpMAPKPH[ t] + k8*MAPKpMAPKPH[t] - a10*MAPKPH[t]*MAPKpp[t] + d10*MAPKppMAPKPH[t] + k10*MAPKppMAPKPH[t]
  // MAPKpMAPKPH 0 MAPKpMAPKPH'[t] == a8*MAPKp[t]*MAPKPH[t] - d8* MAPKpMAPKPH[t] - k8*MAPKpMAPKPH[t]
  // MAPKpMEKpp 0 MAPKpMEKpp'[t] == -(d9*MAPKpMEKpp[t]) - k9*MAPKpMEKpp[t] + a9*MAPKp[t]*MEKpp[t]
  // MAPKpp 0 MAPKpp'[t] == k9*MAPKpMEKpp[t] - a10*MAPKPH[t]*MAPKpp[t] + d10*MAPKppMAPKPH[t]
  // MAPKppMAPKPH 0 MAPKppMAPKPH'[t] == a10*MAPKPH[t]*MAPKpp[t] - d10* MAPKppMAPKPH[t] - k10*MAPKppMAPKPH[t]
  // MEK 0.2 MEK'[t] == k4*MEKpMEKPH[t] + d3*MEKRAFp[t] - a3*MEK[t]*RAFp[t]
  // MEKp 0 MEKp'[t] == -(a4*MEKp[t]*MEKPH[t]) + d4*MEKpMEKPH[t] + k6*MEKppMEKPH[t] + d5*MEKpRAFp[t] + k3*MEKRAFp[ t] - a5*MEKp[t]*RAFp[t]
  // MEKPH 0.2 MEKPH'[t] == -(a4*MEKp[t]*MEKPH[t]) + d4*MEKpMEKPH[t] + k4*MEKpMEKPH[t] - a6*MEKPH[t]*MEKpp[t] + d6* MEKppMEKPH[t] + k6*MEKppMEKPH[t]
  // MEKpMEKPH 0 MEKpMEKPH'[t] == a4*MEKp[t]*MEKPH[t] - d4*MEKpMEKPH[t] - k4*MEKpMEKPH[t]
  // MEKpp 0 MEKpp'[t] == d7*MAPKMEKpp[t] + k7*MAPKMEKpp[t] + d9*MAPKpMEKpp[t] + k9*MAPKpMEKpp[t] - a7*MAPK[t]* MEKpp[t] - a9*MAPKp[t]*MEKpp[t] - a6*MEKPH[t]*MEKpp[t] + d6*MEKppMEKPH[t] + k5*MEKpRAFp[t]
  // MEKppMEKPH 0 MEKppMEKPH'[t] == a6*MEKPH[t]*MEKpp[t] - d6*MEKppMEKPH[ t] - k6*MEKppMEKPH[t]
  // MEKpRAFp 0 MEKpRAFp'[t] == -(d5*MEKpRAFp[t]) - k5*MEKpRAFp[t] + a5*MEKp[t]*RAFp[t]
  // MEKRAFp 0 MEKRAFp'[t] == -(d3*MEKRAFp[t]) - k3*MEKRAFp[t] + a3*MEK[t]*RAFp[t]
  // RAF 0.4 RAF'[t] == -(a1*RAF[t]*RAFK[t]) + k2*RAFpRAFPH[t] + d1*RAFRAFK[t]
  // RAFK 0.1 RAFK'[t] == -(a1*RAF[t]*RAFK[t]) + d1*RAFRAFK[t] + k1*RAFRAFK[t]
  // RAFp 0 RAFp'[t] == d5*MEKpRAFp[t] + k5*MEKpRAFp[t] + d3*MEKRAFp[t] + k3*MEKRAFp[t] - a3*MEK[t]*RAFp[t] - a5*MEKp[t]*RAFp[t] - a2*RAFp[t]*RAFPH[t] + d2* RAFpRAFPH[t] + k1*RAFRAFK[t]
  // RAFPH 0.3 RAFPH'[t] == -(a2*RAFp[t]*RAFPH[t]) + d2*RAFpRAFPH[t] + k2*RAFpRAFPH[t]
  // RAFpRAFPH 0 RAFpRAFPH'[t] == a2*RAFp[t]*RAFPH[t] - d2*RAFpRAFPH[t] - k2*RAFpRAFPH[t]
  // RAFRAFK 0 RAFRAFK'[t] == a1*RAF[t]*RAFK[t] - d1*RAFRAFK[t] - k1*RAFRAFK[t]
  // Generated by Cellerator Version 1.4.3 (6-March-2004) using Mathematica 5.0 for Mac OS X (November 19, 2003), March 6, 2004 12:18:07, using (PowerMac, PowerPC,Mac OS X,MacOSX,Darwin)
  // author=B.E.Shapiro
  // This model originates from BioModels Database: A Database of Annotated Published Models. It is copyright (c) 2005-2007 The BioModels Team.
  // For more information see the terms of use.

  // Compartments:
  compartment Cytoplasm = 1;

  // Species:
  substanceOnly species MAPK in Cytoplasm = 0.3;
  substanceOnly species MAPKMEKpp in Cytoplasm = 0; MAPKMEKpp is "MAPK_MEK-PP";
  substanceOnly species MAPKp in Cytoplasm = 0; MAPKp is "MAPK-P";
  substanceOnly species MAPKPH in Cytoplasm = 0.3; MAPKPH is "MAPK phosphatase";
  substanceOnly species MAPKpMAPKPH in Cytoplasm = 0; MAPKpMAPKPH is "MAPK-P_MAPKPase";
  substanceOnly species MAPKpMEKpp in Cytoplasm = 0; MAPKpMEKpp is "MAPK-P_MEK-PP";
  substanceOnly species MAPKpp in Cytoplasm = 0; MAPKpp is "MAPK-PP";
  substanceOnly species MAPKppMAPKPH in Cytoplasm = 0; MAPKppMAPKPH is "MAPK-PP_MAPKPase";
  substanceOnly species MEK in Cytoplasm = 0.2;
  substanceOnly species MEKp in Cytoplasm = 0; MEKp is "MEK-P";
  substanceOnly species MEKPH in Cytoplasm = 0.2; MEKPH is "MEK phosphatase";
  substanceOnly species MEKpMEKPH in Cytoplasm = 0; MEKpMEKPH is "MEK-P_MEKPase";
  substanceOnly species MEKpp in Cytoplasm = 0; MEKpp is "MEK-PP";
  substanceOnly species MEKppMEKPH in Cytoplasm = 0; MEKppMEKPH is "MEK-PP_MEKPase";
  substanceOnly species MEKpRAFp in Cytoplasm = 0; MEKpRAFp is "MEK-P_RAF-P";
  substanceOnly species MEKRAFp in Cytoplasm = 0; MEKRAFp is "MEK_RAF-P";
  substanceOnly species RAF in Cytoplasm = 0.4;
  substanceOnly species RAFK in Cytoplasm = 0.1;
  substanceOnly species RAFp in Cytoplasm = 0; RAFp is "RAF-P";
  substanceOnly species RAFPH in Cytoplasm = 0.3; RAFPH is "RAF phosphatase";
  substanceOnly species RAFpRAFPH in Cytoplasm = 0; RAFpRAFPH is "RAF-P_RAFPase";
  substanceOnly species RAFRAFK in Cytoplasm = 0; RAFRAFK is "RAF_RAFK";

  // Reactions:
  binding_of_RAF_and_RAFK: RAF + RAFK => RAFRAFK; a1*RAF*RAFK;
    a1 = 1;
  dissociation_of_RAF_RAFK: RAFRAFK => RAF + RAFK; d1*RAFRAFK;
    d1 = 0.4;
  phosphorylation_of_RAF: RAFRAFK => RAFK + RAFp; k1*RAFRAFK;
    k1 = 0.1;
  Reaction4: RAFp + RAFPH => RAFpRAFPH; a2*RAFp*RAFPH; Reaction4 is "binding of RAF-P and RAF phosphatase";
    a2 = 0.5;
  dissociation_of_RAF_P_RAFPase: RAFpRAFPH => RAFp + RAFPH; d2*RAFpRAFPH; dissociation_of_RAF_P_RAFPase is "dissociation of RAF-P_RAFPase";
    d2 = 0.5;
  dephosphorylation_of_RAF_P: RAFpRAFPH => RAF + RAFPH; k2*RAFpRAFPH; dephosphorylation_of_RAF_P is "dephosphorylation of RAF-P";
    k2 = 0.1;
  binding_of_MEK_and_RAF_P: MEK + RAFp => MEKRAFp; a3*MEK*RAFp; binding_of_MEK_and_RAF_P is "binding of MEK and RAF-P";
    a3 = 3.3;
  dissociation_of_MEK_RAF_P: MEKRAFp => MEK + RAFp; d3*MEKRAFp; dissociation_of_MEK_RAF_P is "dissociation of MEK_RAF-P";
    d3 = 0.42;
  phosphorylation_of_MEK: MEKRAFp => MEKp + RAFp; k3*MEKRAFp;
    k3 = 0.1;
  Reaction10: MEKp + MEKPH => MEKpMEKPH; a4*MEKp*MEKPH; Reaction10 is "binding of MEK-P and MEK phosphatase";
    a4 = 10;
  dissociation_of_MEK_P_MEKPase: MEKpMEKPH => MEKp + MEKPH; d4*MEKpMEKPH; dissociation_of_MEK_P_MEKPase is "dissociation of MEK-P_MEKPase";
    d4 = 0.8;
  dephosphorylation_of_MEK_P: MEKpMEKPH => MEK + MEKPH; k4*MEKpMEKPH; dephosphorylation_of_MEK_P is "dephosphorylation of MEK-P";
    k4 = 0.1;
  binding_of_MEK_P_and_RAF_P: MEKp + RAFp => MEKpRAFp; a5*MEKp*RAFp; binding_of_MEK_P_and_RAF_P is "binding of MEK-P and RAF-P";
    a5 = 3.3;
  dissociation_of_MEK_P_RAF_P: MEKpRAFp => MEKp + RAFp; d5*MEKpRAFp; dissociation_of_MEK_P_RAF_P is "dissociation of MEK-P_RAF-P";
    d5 = 0.4;
  phosphorylation_of_MEK_P: MEKpRAFp => MEKpp + RAFp; k5*MEKpRAFp; phosphorylation_of_MEK_P is "phosphorylation of MEK-P";
    k5 = 0.1;
  Reaction16: MEKPH + MEKpp => MEKppMEKPH; a6*MEKPH*MEKpp; Reaction16 is "binding of MEK-PP and MEK phosphatase";
    a6 = 10;
  dissociation_of_MEK_PP_MEKPase: MEKppMEKPH => MEKPH + MEKpp; d6*MEKppMEKPH; dissociation_of_MEK_PP_MEKPase is "dissociation of MEK-PP_MEKPase";
    d6 = 0.8;
  dephosphorylation_of_MEK_PP: MEKppMEKPH => MEKp + MEKPH; k6*MEKppMEKPH; dephosphorylation_of_MEK_PP is "dephosphorylation of MEK-PP";
    k6 = 0.1;
  binding_of_MAPK_and_MEK_PP: MAPK + MEKpp => MAPKMEKpp; a7*MAPK*MEKpp; binding_of_MAPK_and_MEK_PP is "binding of MAPK and MEK-PP";
    a7 = 20;
  dissociation_of_MAPK_MEK_PP: MAPKMEKpp => MAPK + MEKpp; d7*MAPKMEKpp; dissociation_of_MAPK_MEK_PP is "dissociation of MAPK_MEK-PP";
    d7 = 0.6;
  phosphorylation_of_MAPK: MAPKMEKpp => MAPKp + MEKpp; k7*MAPKMEKpp;
    k7 = 0.1;
  Reaction22: MAPKp + MAPKPH => MAPKpMAPKPH; a8*MAPKp*MAPKPH; Reaction22 is "binding of MAPK-P and MAPK phosphatase";
    a8 = 5;
  dissociation_of_MAPK_P_MAPKPase: MAPKpMAPKPH => MAPKp + MAPKPH; d8*MAPKpMAPKPH; dissociation_of_MAPK_P_MAPKPase is "dissociation of MAPK-P_MAPKPase";
    d8 = 0.4;
  dephosphorylation_of_MAPK_P: MAPKpMAPKPH => MAPK + MAPKPH; k8*MAPKpMAPKPH; dephosphorylation_of_MAPK_P is "dephosphorylation of MAPK-P";
    k8 = 0.1;
  binding_of_MAPK_P_and_MEK_PP: MAPKp + MEKpp => MAPKpMEKpp; a9*MAPKp*MEKpp; binding_of_MAPK_P_and_MEK_PP is "binding of MAPK-P and MEK-PP";
    a9 = 20;
  dissociation_of_MAPK_P_MEK_PP: MAPKpMEKpp => MAPKp + MEKpp; d9*MAPKpMEKpp; dissociation_of_MAPK_P_MEK_PP is "dissociation of MAPK-P_MEK-PP";
    d9 = 0.6;
  phosphorylation_of_MAPK_P: MAPKpMEKpp => MAPKpp + MEKpp; k9*MAPKpMEKpp; phosphorylation_of_MAPK_P is "phosphorylation of MAPK-P";
    k9 = 0.1;
  Reaction28: MAPKPH + MAPKpp => MAPKppMAPKPH; a10*MAPKPH*MAPKpp; Reaction28 is "binding of MAPK-PP and MAPK phosphatase";
    a10 = 5;
  dissociation_of_MAPK_PP_MAPKPase: MAPKppMAPKPH => MAPKPH + MAPKpp; d10*MAPKppMAPKPH; dissociation_of_MAPK_PP_MAPKPase is "dissociation of MAPK-PP_MAPKPase";
    d10 = 0.4;
  dephosphorylation_of_MAPK_PP: MAPKppMAPKPH => MAPKp + MAPKPH; k10*MAPKppMAPKPH; dephosphorylation_of_MAPK_PP is "dephosphorylation of MAPK-PP";
    k10 = 0.1;
end
