// SBML level 2 version 1

model untitled()
  // Poolman2004_CalvinCycle
  // This model originates from BioModels Database: A Database of Annotated Published Models. It is copyright (c) 2005-2007 The BioModels Team.
  // For more information see the terms of use.

  // Compartments:
  compartment uVol = 1;

  // Species:
  species $x_CO2 in uVol = 1/uVol;
  substanceOnly species RuBP_ch in uVol = 0.33644;
  substanceOnly species PGA_ch in uVol = 3.35479;
  substanceOnly species ATP_ch in uVol = 0.49806;
  substanceOnly species BPGA_ch in uVol = 0.14825;
  substanceOnly species $x_NADPH_ch in uVol = 0.21;
  species GAP_ch in uVol = 0.01334/uVol;
  species Pi_ch in uVol = 1.5662/uVol;
  species DHAP_ch in uVol = 0.29345/uVol;
  species FBP_ch in uVol = 0.02776/uVol;
  species F6P_ch in uVol = 1.36481/uVol;
  species E4P_ch in uVol = 0.41021/uVol;
  species X5P_ch in uVol = 0.00363/uVol;
  species SBP_ch in uVol = 1.56486/uVol;
  species S7P_ch in uVol = 0.00541/uVol;
  species R5P_ch in uVol = 0.00599/uVol;
  species Ru5P_ch in uVol = 0.00235/uVol;
  species $x_Pi_cyt in uVol = 0.5/uVol;
  species $x_GAP_cyt in uVol = 1/uVol;
  species G6P_ch in uVol = 3.1396/uVol;
  species $x_NADP_ch in uVol = 0.29/uVol;
  species $x_PGA_cyt in uVol = 1/uVol;
  species ADP_ch in uVol = 0.00149/uVol;
  species $x_DHAP_cyt in uVol = 1/uVol;
  species $x_Proton_ch in uVol = 1.26e-5/uVol;
  species G1P_ch in uVol = 0.18206/uVol;
  species $x_Starch_ch in uVol = 1/uVol;

  // Parameters:
  Light_on = 1;

  // Reactions:
  J0: RuBP_ch + $x_CO2 => 2 PGA_ch; Light_on*Rbco_vm*RuBP_ch/(RuBP_ch + Rbco_km*(1 + PGA_ch/Rbco_KiPGA + FBP_ch/Rbco_KiFBP + SBP_ch/Rbco_KiSBP + Pi_ch/Rbco_KiPi + x_NADPH_ch/Rbco_KiNADPH));  // modifiers: FBP_ch, SBP_ch, Pi_ch, x_NADPH_ch
    Rbco_vm = 340; Rbco_km = 0.02; Rbco_KiPGA = 0.84; Rbco_KiFBP = 0.04; Rbco_KiSBP = 0.075; Rbco_KiPi = 0.9; Rbco_KiNADPH = 0.07;
  J1: GAP_ch -> DHAP_ch; TPI_v*(GAP_ch - DHAP_ch/q4);
    TPI_v = 5000000000; q4 = 22;
  J2: GAP_ch + DHAP_ch -> FBP_ch; F_Aldo_v*(DHAP_ch*GAP_ch - FBP_ch/q5);
    F_Aldo_v = 5000000000; q5 = 7.1;
  J3: GAP_ch + F6P_ch -> X5P_ch + E4P_ch; F_TKL_v*(F6P_ch*GAP_ch - E4P_ch*X5P_ch/q7);
    F_TKL_v = 5000000000; q7 = 0.084;
  J4: DHAP_ch + E4P_ch -> SBP_ch; E_Aldo_v*(E4P_ch*DHAP_ch - SBP_ch/q8);
    E_Aldo_v = 5000000000; q8 = 13;
  J5: S7P_ch + GAP_ch -> R5P_ch + X5P_ch; G_TKL_v*(GAP_ch*S7P_ch - X5P_ch*R5P_ch/q10);
    G_TKL_v = 5000000000; q10 = 0.85;
  J6: R5P_ch -> Ru5P_ch; R5Piso_v*(R5P_ch - Ru5P_ch/q11);
    R5Piso_v = 5000000000; q11 = 0.4;
  J7: X5P_ch -> Ru5P_ch; X5Pepi_v*(X5P_ch - Ru5P_ch/q12);
    X5Pepi_v = 5000000000; q12 = 0.67;
  J8: $x_Pi_cyt + PGA_ch => $x_PGA_cyt + Pi_ch; PGA_xpMult*J8_TP_Piap_vm*PGA_ch/(J8_TP_Piap_kPGA_ch*(1 + (1 + J8_TP_Piap_kPi_cyt/x_Pi_cyt)*(Pi_ch/J8_TP_Piap_kPi_ch + PGA_ch/J8_TP_Piap_kPGA_ch + DHAP_ch/J8_TP_Piap_kDHAP_ch + GAP_ch/J8_TP_Piap_kGAP_ch)));  // modifiers: DHAP_ch, GAP_ch
    PGA_xpMult = 0.2; J8_TP_Piap_vm = 250; J8_TP_Piap_kPGA_ch = 0.25; J8_TP_Piap_kPi_cyt = 0.74; J8_TP_Piap_kPi_ch = 0.63; J8_TP_Piap_kDHAP_ch = 0.077; J8_TP_Piap_kGAP_ch = 0.075;
  J9: $x_Pi_cyt + GAP_ch => $x_GAP_cyt + Pi_ch; J9_TP_Piap_vm*GAP_ch/(J9_TP_Piap_kGAP_ch*(1 + (1 + J9_TP_Piap_kPi_cyt/x_Pi_cyt)*(Pi_ch/J9_TP_Piap_kPi_ch + PGA_ch/J9_TP_Piap_kPGA_ch + DHAP_ch/J9_TP_Piap_kDHAP_ch + GAP_ch/J9_TP_Piap_kGAP_ch)));  // modifiers: PGA_ch, DHAP_ch
    J9_TP_Piap_vm = 250; J9_TP_Piap_kGAP_ch = 0.075; J9_TP_Piap_kPi_cyt = 0.74; J9_TP_Piap_kPi_ch = 0.63; J9_TP_Piap_kPGA_ch = 0.25; J9_TP_Piap_kDHAP_ch = 0.077;
  J10: F6P_ch -> G6P_ch; PGI_v*(F6P_ch - G6P_ch/q14);
    PGI_v = 5000000000; q14 = 2.3;
  J11: G6P_ch -> G1P_ch; PGM_v*(G6P_ch - G1P_ch/q15);
    PGM_v = 5000000000; q15 = 0.058;
  J12: Pi_ch + ADP_ch => ATP_ch; Light_on*LR_vm*ADP_ch*Pi_ch/((ADP_ch + LR_kmADP)*(Pi_ch + LR_kmPi));
    LR_vm = 1500; LR_kmADP = 0.014; LR_kmPi = 0.3;
  J13: Ru5P_ch + ATP_ch => RuBP_ch + ADP_ch; Light_on*Ru5Pk_ch_vm*Ru5P_ch*ATP_ch/((Ru5P_ch + Ru5Pk_ch_km1*(1 + PGA_ch/Ru5Pk_ch_KiPGA + RuBP_ch/Ru5Pk_ch_KiRuBP + Pi_ch/Ru5Pk_ch_KiPi))*(ATP_ch*(1 + ADP_ch/Ru5Pk_ch_KiADP1) + Ru5Pk_ch_km2*(1 + ADP_ch/Ru5Pk_ch_KiADP2)));  // modifiers: PGA_ch, Pi_ch
    Ru5Pk_ch_vm = 10000; Ru5Pk_ch_km1 = 0.05; Ru5Pk_ch_KiPGA = 2; Ru5Pk_ch_KiRuBP = 0.7; Ru5Pk_ch_KiPi = 4; Ru5Pk_ch_KiADP1 = 2.5; Ru5Pk_ch_km2 = 0.05; Ru5Pk_ch_KiADP2 = 0.4;
  J14: PGA_ch + ATP_ch => BPGA_ch + ADP_ch; Light_on*PGK_v*(PGA_ch*ATP_ch - BPGA_ch*ADP_ch/q2);
    PGK_v = 5000000000; q2 = 0.00031;
  J15: ATP_ch + G1P_ch => $x_Starch_ch + ADP_ch + Pi_ch; StSyn_vm*G1P_ch*ATP_ch/((G1P_ch + stsyn_ch_km1)*(1 + ADP_ch/stsyn_ch_Ki)*(ATP_ch + stsyn_ch_km2) + stsyn_ch_km2*Pi_ch/(stsyn_ch_ka1*PGA_ch) + stsyn_ch_ka2*F6P_ch + stsyn_ch_ka3*FBP_ch);  // modifiers: PGA_ch, F6P_ch, FBP_ch
    StSyn_vm = 40; stsyn_ch_km1 = 0.08; stsyn_ch_Ki = 10; stsyn_ch_km2 = 0.08; stsyn_ch_ka1 = 0.1; stsyn_ch_ka2 = 0.02; stsyn_ch_ka3 = 0.02;
  J16: $x_Starch_ch + Pi_ch => G1P_ch; StPase_Vm*Pi_ch/(Pi_ch + StPase_km*(1 + G1P_ch/StPase_kiG1P));
    StPase_Vm = 40; StPase_km = 5; StPase_kiG1P = 3.12;
  J17: FBP_ch => F6P_ch + Pi_ch; Light_on*FBPase_ch_vm*FBP_ch/(FBP_ch + FBPase_ch_km*(1 + F6P_ch/FBPase_ch_KiF6P + Pi_ch/FBPase_ch_KiPi));
    FBPase_ch_vm = 200; FBPase_ch_km = 0.03; FBPase_ch_KiF6P = 0.7; FBPase_ch_KiPi = 12;
  J18: $x_Pi_cyt + DHAP_ch => $x_DHAP_cyt + Pi_ch; J18_TP_Piap_vm*DHAP_ch/(J18_TP_Piap_kDHAP_ch*(1 + (1 + J18_TP_Piap_kPi_cyt/x_Pi_cyt)*(Pi_ch/J18_TP_Piap_kPi_ch + PGA_ch/J18_TP_Piap_kPGA_ch + DHAP_ch/J18_TP_Piap_kDHAP_ch + GAP_ch/J18_TP_Piap_kGAP_ch)));  // modifiers: PGA_ch, GAP_ch
    J18_TP_Piap_vm = 250; J18_TP_Piap_kDHAP_ch = 0.077; J18_TP_Piap_kPi_cyt = 0.74; J18_TP_Piap_kPi_ch = 0.63; J18_TP_Piap_kPGA_ch = 0.25; J18_TP_Piap_kGAP_ch = 0.075;
  J19: $x_NADPH_ch + BPGA_ch + $x_Proton_ch => $x_NADP_ch + GAP_ch + Pi_ch; Light_on*G3Pdh_v*(BPGA_ch*x_NADPH_ch*x_Proton_ch - x_NADP_ch*GAP_ch*Pi_ch/q3);
    G3Pdh_v = 5000000000; q3 = 16000000;
  J20: SBP_ch => Pi_ch + S7P_ch; Light_on*SBPase_ch_vm*SBP_ch/(SBP_ch + SBPase_ch_km*(1 + Pi_ch/SBPase_ch_KiPi));
    SBPase_ch_vm = 40; SBPase_ch_km = 0.013; SBPase_ch_KiPi = 12;
end
