// SBML level 2 version 1

model MorrisonAllegra()
  // Morrison1989_FolateCycle
  // This is a folate model that includes folate polyglutamation.
  // Morrison and Allegra, JBC:264,10552-10566 (1989)
  // Folate cycle kinetics in breast cancer cells
  // Note: two flow BCs were converted into two downstream concentration BCs, thus removing the GAR and dUMP state variables.
  // This dropped the number of ODEs from 21 to 19.
  // This model originates from BioModels Database: A Database of Annotated Published Models. It is copyright (c) 2005-2007 The BioModels Team.
  // For more information see the terms of use.

  // Compartments:
  compartment ext = 1;
  compartment cell in ext = 1;

  // Species:
  species FH2f in cell = 0.0012; FH2f is "dihydrofolate free";
  species $FH2b in cell; FH2b is "dihydrofolate bound";
  species DHFRf in cell = 0.64; DHFRf is "dihydrofolate reductase free";
  species $DHFRtot in cell; DHFRtot is "dihydrofolate reductase total";
  species FH4 in cell = 0.46; FH4 is "tetrahydrofolate";
  species CH2FH4 in cell = 0.26; CH2FH4 is "5,10-methylene-tetrahydrofolate";
  species CH3FH4 in cell = 1.63; CH3FH4 is "5-methyl-tetrahydrofolate";
  species CHOFH4 in cell = 1; CHOFH4 is "10-formyl-tetrahydrofolate";
  species FFH2 in cell = 0.000332; FFH2 is "10-formyl-dihydrofolate";
  species HCHO in cell = 0.0074;
  species FGAR in cell = 16.49;
  species AICAR in cell = 3.695;
  species MTX1 in cell = 0;
  species MTX2 in cell = 0;
  species MTX3 in cell = 0;
  species MTX4 in cell = 0;
  species MTX5 in cell = 0;
  species MTX1b in cell = 0;
  species MTX2b in cell = 0;
  species MTX3b in cell = 0;
  species MTX4b in cell = 0;
  species MTX5b in cell = 0;
  species $EMTX in ext = 0;
  species $dUMP in cell = 20.76;
  species $GAR in cell = 689.6;
  species $serine in cell = 123.3;
  species $formate in cell = 500;
  species $ATP in cell = 2980;
  species $glutamine in cell = 7170;
  species $glycine in cell = 1600;
  species $NADP in cell = 6.73;
  species $NADPH in cell = 294;
  species $homocysteine in cell = 10;

  // Parameters:
  Keq = 0.32;

  // Assignment rules:
  FH2b := FH2f*DHFRf/Keq;
  DHFRtot := FH2b + DHFRf + MTX1b + MTX2b + MTX3b + MTX4b + MTX5b;

  // Reactions:
  SHMT: FH4 + $serine => CH2FH4; cell*(SHMT_Vm*(serine/SHMT_Km2/(1 + serine/SHMT_Km2))*(FH4/SHMT_Km1)/(1 + FH4/SHMT_Km1));
    SHMT_Vm = 18330; SHMT_Km1 = 1.7; SHMT_Km2 = 210;
  SHMTr: CH2FH4 => FH4; cell*(SHMTr_Vm*(glycine/SHMTr_Km2/(1 + glycine/SHMTr_Km2))*(CH2FH4/SHMTr_Km1)/(1 + CH2FH4/SHMTr_Km1));  // modifiers: glycine
    SHMTr_Vm = 12200000; SHMTr_Km1 = 3200; SHMTr_Km2 = 10000;
  HCHOtoCH2FH4: FH4 + HCHO => CH2FH4; cell*hp*FH4*HCHO;
    hp = 23.2;
  CH2FH4toHCHO: CH2FH4 => FH4 + HCHO; cell*hl*CH2FH4;
    hl = 0.3;
  MTHFR: CH2FH4 + $NADPH => CH3FH4; cell*(MTHFR_Vm*CH2FH4*NADPH/(NADPH*CH2FH4 + CH2FH4*MTHFR_Km2 + (NADPH + MTHFR_Km2)*MTHFR_Km1*(1 + MTX1/MTHFR_Ki21 + MTX2/MTHFR_Ki22 + MTX3/MTHFR_Ki23 + MTX4/MTHFR_Ki24 + MTX5/MTHFR_Ki25 + FH2f/MTHFR_Ki1)));  // modifiers: FH2f, MTX1, MTX2, MTX3, MTX4, MTX5
    MTHFR_Vm = 224.8; MTHFR_Km1 = 50; MTHFR_Km2 = 50; MTHFR_Ki1 = 0.4; MTHFR_Ki21 = 59; MTHFR_Ki22 = 21.3; MTHFR_Ki23 = 7.68; MTHFR_Ki24 = 2.77; MTHFR_Ki25 = 1;
  MTR: CH3FH4 + $homocysteine => FH4; cell*(MTR_Vm*(homocysteine/MTR_Km2/(1 + homocysteine/MTR_Km2))*(CH3FH4/MTR_Km1)/(1 + CH3FH4/MTR_Km1));
    MTR_Vm = 22600; MTR_Km1 = 125; MTR_Km2 = 2900;
  HCOOHtoCHOFH4: FH4 + $formate + $ATP => CHOFH4; cell*(HCOOHtoCHOFH4_Vm/((1 + HCOOHtoCHOFH4_Km1/FH4)*(1 + HCOOHtoCHOFH4_Km2/ATP)*(1 + Km3/formate)));
    HCOOHtoCHOFH4_Vm = 3600; HCOOHtoCHOFH4_Km1 = 230; HCOOHtoCHOFH4_Km2 = 56; Km3 = 1600;
  GARFT: CHOFH4 + $GAR => FGAR + FH4; cell*(GARFT_Vm*CHOFH4*GAR/(GAR*CHOFH4 + CHOFH4*GARFT_Km2 + (GAR + GARFT_Km2)*GARFT_Km1*(1 + MTX1/GARFT_Ki21 + MTX2/GARFT_Ki22 + MTX3/GARFT_Ki23 + MTX4/GARFT_Ki24 + MTX5/GARFT_Ki25 + FH2f/GARFT_Ki1 + FFH2/GARFT_Ki1f)));  // modifiers: FH2f, FFH2, MTX1, MTX2, MTX3, MTX4, MTX5
    GARFT_Vm = 4126; GARFT_Km1 = 4.9; GARFT_Km2 = 52; GARFT_Ki1 = 5; GARFT_Ki1f = 1; GARFT_Ki21 = 84; GARFT_Ki22 = 60; GARFT_Ki23 = 43; GARFT_Ki24 = 31; GARFT_Ki25 = 22;
  ATIC7: CHOFH4 + AICAR => FH4; cell*(ATIC7_Vm*CHOFH4*AICAR/(AICAR*CHOFH4 + CHOFH4*ATIC7_Km2 + (AICAR + ATIC7_Km2)*ATIC7_Km1*(1 + MTX1/ATIC7_Ki21 + MTX2/ATIC7_Ki22 + MTX3/ATIC7_Ki23 + MTX4/ATIC7_Ki24 + MTX5/ATIC7_Ki25 + FH2f/ATIC7_Ki1 + FFH2/ATIC7_Ki1f)));  // modifiers: FH2f, FFH2, MTX1, MTX2, MTX3, MTX4, MTX5
    ATIC7_Vm = 31675; ATIC7_Km1 = 5.5; ATIC7_Km2 = 24; ATIC7_Ki1 = 2.89; ATIC7_Ki1f = 5.3; ATIC7_Ki21 = 40; ATIC7_Ki22 = 31.5; ATIC7_Ki23 = 2.33; ATIC7_Ki24 = 3.61; ATIC7_Ki25 = 5.89;
  MTHFD: CH2FH4 + $NADP => CHOFH4; cell*MTHFD_Vm*(CH2FH4/MTHFD_Km1/(1 + CH2FH4/MTHFD_Km1))*(NADP/MTHFD_Km2/(1 + NADP/MTHFD_Km2));
    MTHFD_Vm = 68500; MTHFD_Km1 = 3; MTHFD_Km2 = 21.8;
  TYMS: CH2FH4 + $dUMP => FH2f; cell*(TYMS_Vm*CH2FH4*dUMP/(dUMP*CH2FH4*(1 + MTX1/TYMS_Ki21 + MTX2/TYMS_Ki22 + MTX3/TYMS_Ki23 + MTX4/TYMS_Ki24 + MTX5/TYMS_Ki25 + FH2f/TYMS_Ki1) + TYMS_Km1*dUMP*(FFH2/TYMS_Ki1f*(MTX1/TYMS_Ki21) + (1 + FFH2/TYMS_Ki1f)*(1 + MTX2/TYMS_Ki22 + MTX3/TYMS_Ki23 + MTX4/TYMS_Ki24 + MTX5/TYMS_Ki25 + FH2f/TYMS_Ki1)) + TYMS_Km1*TYMS_Km2*(1 + MTX2/TYMS_Ki22 + MTX3/TYMS_Ki23 + MTX4/TYMS_Ki24 + MTX5/TYMS_Ki25 + FH2f/TYMS_Ki1)));  // modifiers: FFH2, MTX1, MTX2, MTX3, MTX4, MTX5
    TYMS_Vm = 58; TYMS_Km1 = 2.5; TYMS_Km2 = 1.8; TYMS_Ki1 = 3; TYMS_Ki1f = 1.6; TYMS_Ki21 = 13; TYMS_Ki22 = 0.08; TYMS_Ki23 = 0.07; TYMS_Ki24 = 0.065; TYMS_Ki25 = 0.047;
  DHFReductase: FH2f => FH4; cell*kter*FH2b;  // modifiers: FH2b
    kter = 2109.4;
  FFH2syn: FH2f => FFH2; cell*FFH2syn_Vm*FH2f;
    FFH2syn_Vm = 65;
  ATIC12: FFH2 + AICAR => FH2f; cell*(ATIC12_Vm*FFH2*AICAR/(AICAR*FFH2 + FFH2*ATIC12_Km2 + (AICAR + ATIC12_Km2)*ATIC12_Km1*(1 + MTX1/ATIC12_Ki21 + MTX2/ATIC12_Ki22 + MTX3/ATIC12_Ki23 + MTX4/ATIC12_Ki24 + MTX5/ATIC12_Ki25 + FH2f/ATIC12_Ki1 + FFH2/ATIC12_Ki1f)));  // modifiers: MTX1, MTX2, MTX3, MTX4, MTX5
    ATIC12_Vm = 9503; ATIC12_Km1 = 5.3; ATIC12_Km2 = 24; ATIC12_Ki1 = 2.89; ATIC12_Ki1f = 5.5; ATIC12_Ki21 = 40; ATIC12_Ki22 = 31.5; ATIC12_Ki23 = 2.33; ATIC12_Ki24 = 3.61; ATIC12_Ki25 = 5.89;
  AICARsyn: FGAR => AICAR; cell*AICARsyn_Vm*(glutamine/AICARsyn_Km1/(1 + glutamine/AICARsyn_Km1))*(FGAR/AICARsyn_Km2/(1 + FGAR/AICARsyn_Km2));  // modifiers: glutamine
    AICARsyn_Vm = 4656; AICARsyn_Km1 = 100; AICARsyn_Km2 = 100;
  FPGS12: MTX1 => MTX2; cell*FPGS12_Vm*MTX1;
    FPGS12_Vm = 0.129;
  FPGS23: MTX2 => MTX3; cell*FPGS23_Vm*MTX2;
    FPGS23_Vm = 0.369;
  FPGS34: MTX3 => MTX4; cell*FPGS34_Vm*MTX3;
    FPGS34_Vm = 0.118;
  FPGS45: MTX4 => MTX5; cell*FPGS45_Vm*MTX4;
    FPGS45_Vm = 0.185;
  GGH21: MTX2 => MTX1; cell*GGH21_Vm*MTX2;
    GGH21_Vm = 0.195;
  GGH32: MTX3 => MTX2; cell*GGH32_Vm*MTX3;
    GGH32_Vm = 0.025;
  GGH43: MTX4 => MTX3; cell*GGH43_Vm*MTX4;
    GGH43_Vm = 0.031;
  GGH54: MTX5 => MTX4; cell*GGH54_Vm*MTX5;
    GGH54_Vm = 0.191;
  RFC: $EMTX => MTX1; ext*(RFC_Vm*EMTX/(Km + EMTX));
    RFC_Vm = 82.2; Km = 8.2;
  MTX1export: MTX1 => ; cell*MTX1export_Vm*MTX1;
    MTX1export_Vm = 4.65;
  MTX2export: MTX2 => ; cell*MTX2export_Vm*MTX2;
    MTX2export_Vm = 0;
  MTX3export: MTX3 => ; cell*MTX3export_Vm*MTX3;
    MTX3export_Vm = 0.063;
  MTX4export: MTX4 => ; cell*MTX4export_Vm*MTX4;
    MTX4export_Vm = 0.063;
  MTX5export: MTX5 => ; cell*MTX5export_Vm*MTX5;
    MTX5export_Vm = 0.063;
  MTX1on: MTX1 + DHFRf => MTX1b; cell*MTX1on_Vm*DHFRf*MTX1;
    MTX1on_Vm = 23100;
  MTX2on: MTX2 + DHFRf => MTX2b; cell*MTX2on_Vm*DHFRf*MTX2;
    MTX2on_Vm = 44300;
  MTX3on: MTX3 + DHFRf => MTX3b; cell*MTX3on_Vm*DHFRf*MTX3;
    MTX3on_Vm = 85100;
  MTX4on: MTX4 + DHFRf => MTX4b; cell*MTX4on_Vm*DHFRf*MTX4;
    MTX4on_Vm = 163000;
  MTX5on: MTX5 + DHFRf => MTX5b; cell*MTX5on_Vm*DHFRf*MTX5;
    MTX5on_Vm = 314000;
  MTX1off: MTX1b => MTX1 + DHFRf; cell*MTX1off_Vm*MTX1b;
    MTX1off_Vm = 0.42;
  MTX2off: MTX2b => MTX2 + DHFRf; cell*MTX2off_Vm*MTX2b;
    MTX2off_Vm = 0.42;
  MTX3off: MTX3b => MTX3 + DHFRf; cell*MTX3off_Vm*MTX3b;
    MTX3off_Vm = 0.42;
  MTX4off: MTX4b => MTX4 + DHFRf; cell*MTX4off_Vm*MTX4b;
    MTX4off_Vm = 0.42;
  MTX5off: MTX5b => MTX5 + DHFRf; cell*MTX5off_Vm*MTX5b;
    MTX5off_Vm = 0.42;
  DHFRfsyn: => DHFRf; cell*(k0 + k1*EMTX);  // modifiers: EMTX
    k0 = 0.0192; k1 = 0.04416;
  DHFRdeg: DHFRf => ; DHFRdeg_Vm*cell*(DHFRf + FH2b);  // modifiers: FH2b
    DHFRdeg_Vm = 0.03;
  FH2bdeg: => FH2f; cell*FH2bdeg_Vm*FH2b;  // modifiers: FH2b
    FH2bdeg_Vm = 0.03;
  MTX1deg: MTX1b => MTX1; cell*MTX1deg_Vm*MTX1b;
    MTX1deg_Vm = 0.03;
  MTX2deg: MTX2b => MTX2; cell*MTX2deg_Vm*MTX2b;
    MTX2deg_Vm = 0.03;
  MTX3deg: MTX3b => MTX3; cell*MTX3deg_Vm*MTX3b;
    MTX3deg_Vm = 0.03;
  MTX4deg: MTX4b => MTX4; cell*MTX4deg_Vm*MTX4b;
    MTX4deg_Vm = 0.03;
  MTX5deg: MTX5b => MTX5; cell*MTX5deg_Vm*MTX5b;
    MTX5deg_Vm = 0.03;

  // Unit definitions:
  // Default unit of substance redefined to micromole by comparison with the article. Nicolas Le Novere
  unit substance = 1e-6 mole; substance is "micromole (new default)";
  // Default unit of time redefined to hour by comparison with the article. Nicolas Le Novere
  unit time = 3600 second; time is "heure (new default)";
end
