// SBML level 2 version 1

model Ueda2001_CircClock()
  // Bruce Shapiro: Generated by Cellerator Version 1.0 update 3.0303 using Mathematica 4.1 for Microsoft Windows (June 13, 2001), April 2, 2003 16:49:13, using (PC,x86, Microsoft Windows,WindowsNT,Windows)
  // Bruce Shapiro: Corrected 29 March 2005
  // Nicolas Le Novère: Added Dbt and Cyc species, and the corresponding reactions. 23 April 2005
  // This model originates from BioModels Database: A Database of Annotated Published Models. It is copyright (c) 2005-2007 The BioModels Team.
  // For more information see the terms of use.

  // Compartments:
  compartment Drosophilia = 1;
  compartment cytoplasm = 1;
  compartment nucleus in cytoplasm = 1;

  // Species:
  species $EmptySet in Drosophilia = 0;
  species CCc in cytoplasm = 0.3/cytoplasm; CCc is "Clk-Cyc_cyt";
  species CCn in nucleus = 0.4/nucleus; CCn is "Clk-Cyc_nuc";
  species Clkc in cytoplasm = 0.2/cytoplasm; Clkc is "Clk_cyt";
  species Clkm in cytoplasm = 0.1/cytoplasm; Clkm is "Clk_mRNA";
  species Perc in cytoplasm = 0.6/cytoplasm; Perc is "Per_cyt";
  species Perm in cytoplasm = 0.5/cytoplasm; Perm is "Per_mRNA";
  species PTc in cytoplasm = 0.9/cytoplasm; PTc is "Per-Tim_cyt";
  species PTn in nucleus = 1/nucleus; PTn is "Per-Tim_nuc";
  species Timc in cytoplasm = 0.8/cytoplasm; Timc is "Tim_cyt";
  species Timm in cytoplasm = 0.7/cytoplasm; Timm is "Tim_mRNA";
  species $Cyc_cyt in cytoplasm = 1/cytoplasm;
  species $Dbt_cyt in cytoplasm = 1/cytoplasm;

  // Reactions:
  Per_transcription: $EmptySet => Perm; cytoplasm*(c1 + (B1 + (CCn/A1)^Per_transcription_a)*s1/(1 + B1 + (CCn/A1)^Per_transcription_a + (PTn/r1)^Per_transcription_r));  // modifiers: CCn, PTn
    Per_transcription_a = 1; A1 = 0.45; B1 = 0; c1 = 0; r1 = 1.02; s1 = 1.45; Per_transcription_r = 4;
  Reaction2: Perm => $EmptySet; cytoplasm*Reaction2_D0*Perm; Reaction2 is "non-specific Per mRNA degradation";
    Reaction2_D0 = 0.012;
  Tim_transcription: $EmptySet => Timm; cytoplasm*(c2 + (B2 + (CCn/A2)^Tim_transcription_a)*s3/(1 + B2 + (CCn/A2)^Tim_transcription_a + (PTn/r2)^Tim_transcription_r));  // modifiers: CCn, PTn
    Tim_transcription_a = 1; A2 = 0.45; B2 = 0; c2 = 0; r2 = 1.02; s3 = 1.45; Tim_transcription_r = 4;
  Reaction4: Timm => $EmptySet; Drosophilia*Reaction4_D0*Timm; Reaction4 is "non-specific Tim mRNA degradation";
    Reaction4_D0 = 0.012;
  Clk_transcription: $EmptySet => Clkm; cytoplasm*(c3 + (B3 + (PTn/A3)^Clk_transcription_a)*s5/(1 + B3 + (PTn/A3)^Clk_transcription_a + (CCn/r3)^Clk_transcription_r));  // modifiers: PTn, CCn
    Clk_transcription_a = 1; A3 = 0.8; B3 = 0.6; c3 = 0; r3 = 0.89; s5 = 1.63; Clk_transcription_r = 4;
  Reaction6: Clkm => $EmptySet; Drosophilia*Clkm*Reaction6_D0; Reaction6 is "non-specific Clk mRNA degradation";
    Reaction6_D0 = 0.012;
  Clk_Cyc_nuclear_import: CCc => CCn; cytoplasm*(CCc*T3/(k3 + CCc)); Clk_Cyc_nuclear_import is "Clk-Cyc nuclear import";
    k3 = 2; T3 = 1.63;
  Clk_Cyc_nuclear_export: CCn => CCc; nucleus*(CCn*T4/(k4 + CCn)); Clk_Cyc_nuclear_export is "Clk-Cyc nuclear export";
    k4 = 2; T4 = 0.52;
  Per_Tim_nuclear_export: PTn => PTc; nucleus*(PTn*T2/(k2 + PTn)); Per_Tim_nuclear_export is "Per-Tim nuclear export";
    k2 = 2; T2 = 0.72;
  Per_Tim_nuclear_import: PTc => PTn; cytoplasm*(PTc*T1/(k1 + PTc)); Per_Tim_nuclear_import is "Per-Tim nuclear import";
    k1 = 2; T1 = 1.73;
  Clk_Cyc_equilibrium: $Cyc_cyt + Clkc -> CCc; cytoplasm*(Clkc*v3*Cyc_cyt - parameter_0000073*CCc);
    v3 = 1.63; parameter_0000073 = 1.63;
  Per_Tim_equilibrium: Perc + Timc -> PTc; cytoplasm*(Perc*Timc*v1 - parameter_0000072*PTc);
    v1 = 1.45; parameter_0000072 = 1.45;
  Tim_translation: $EmptySet => Timc; cytoplasm*s4*Timm;  // modifiers: Timm
    s4 = 0.48;
  Clk_translation: $EmptySet => Clkc; cytoplasm*Clkm*s6;  // modifiers: Clkm
    s6 = 0.47;
  Per_translation: $EmptySet => Perc; cytoplasm*s2*Perm;  // modifiers: Perm
    s2 = 0.48;
  non_specific_Per_cyt_degradation: Perc => $EmptySet; Drosophilia*non_specific_Per_cyt_degradation_D0*Perc; non_specific_Per_cyt_degradation is "non-specific Per_cyt degradation";
    non_specific_Per_cyt_degradation_D0 = 0.012;
  Reaction21: PTc => $EmptySet; cytoplasm*Reaction21_D0*PTc; Reaction21 is "non-specific Per-Tim_cyt degradation";
    Reaction21_D0 = 0.012;
  Reaction23: PTn => $EmptySet; nucleus*Reaction23_D0*PTn; Reaction23 is "non-specific Per-Tim_nuc degradation";
    Reaction23_D0 = 0.012;
  Reaction24: CCc => $EmptySet; cytoplasm*CCc*Reaction24_D0; Reaction24 is "non-specific Clk-Cyc_cyt degradation";
    Reaction24_D0 = 0.012;
  non_specific_Clk_cyt_degradation: Clkc => $EmptySet; cytoplasm*Clkc*non_specific_Clk_cyt_degradation_D0; non_specific_Clk_cyt_degradation is "non-specific Clk_cyt degradation";
    non_specific_Clk_cyt_degradation_D0 = 0.012;
  Reaction26: CCn => $EmptySet; nucleus*CCn*Reaction26_D0; Reaction26 is "non-specific Clk-Cyc_nuc degradation";
    Reaction26_D0 = 0.012;
  non_specific_Tim_cyt_degradation: Timc => $EmptySet; cytoplasm*non_specific_Tim_cyt_degradation_D0*Timc; non_specific_Tim_cyt_degradation is "non-specific Tim_cyt degradation";
    non_specific_Tim_cyt_degradation_D0 = 0.012;
  Per_mRNA_degradation: Perm => $EmptySet; cytoplasm*(D1*Perm/(L1 + Perm));
    D1 = 0.94; L1 = 0.3;
  Reaction29: Perc => $EmptySet; cytoplasm*(D2*Dbt_cyt*Perc/(L2 + Perc)); Reaction29 is "Dbt regulated Per_cyt degradation";  // modifiers: Dbt_cyt
    D2 = 0.44; L2 = 0.2;
  Tim_mRNA_degradation: Timm => $EmptySet; cytoplasm*(D3*Timm/(L3 + Timm));
    D3 = 0.94; L3 = 0.3;
  Tim_cyt_degradation: Timc => $EmptySet; cytoplasm*(D4*Timc/(L4 + Timc));
    D4 = 0.44; L4 = 0.2;
  Per_Tim_cyt_degradation: PTc => $EmptySet; cytoplasm*(D5*PTc/(L5 + PTc)); Per_Tim_cyt_degradation is "Per-Tim_cyt degradation";
    D5 = 0.44; L5 = 0.2;
  Per_Tim_nuc_degradation: PTn => $EmptySet; nucleus*(D6*PTn/(L6 + PTn)); Per_Tim_nuc_degradation is "Per-Tim_nuc degradation";
    D6 = 0.29; L6 = 0.2;
  Clk_mRNA_degradation: Clkm => $EmptySet; cytoplasm*(Clkm*D7/(Clkm + L7));
    D7 = 0.54; L7 = 0.13;
  Clk_cyt_degradation: Clkc => $EmptySet; cytoplasm*(Clkc*D8/(Clkc + L8));
    D8 = 0.6; L8 = 0.2;
  Clk_Cyc_cyt_degradation: CCc => $EmptySet; cytoplasm*(CCc*D9/(CCc + L9)); Clk_Cyc_cyt_degradation is "Clk-Cyc_cyt degradation";
    D9 = 0.6; L9 = 0.2;
  Reaction37: CCn => $EmptySet; nucleus*(CCn*D10/(CCn + L10));
    D10 = 0.3; L10 = 0.2;

  // Unit definitions:
  unit substance = 1e-9 mole; substance is "nanomole (default)";
  unit time = 3600 second; time is "hour (default)";
end
