// SBML level 2 version 1

model Scheper1999()
  // Scheper1999_CircClock
  // This model originates from BioModels Database: A Database of Annotated Published Models. It is copyright (c) 2005-2007 The BioModels Team.
  // For more information see the terms of use.

  // Compartments:
  compartment cytoplasm = 1e-15;

  // Species:
  species $EmptySet in cytoplasm = 0;
  species M in cytoplasm = 1e-15/cytoplasm; M is "mRNA";
  species P in cytoplasm = 1e-15/cytoplasm; P is "protein";

  // Reactions:
  TC: $EmptySet => M; cytoplasm*(rM/(1 + (P/k)^n)); TC is "mRNA production";  // modifiers: P
    rM = 1; k = 1; n = 2;
  TL: $EmptySet => P; cytoplasm*rP*delay(M, parameter_0000009)^m; TL is "protein production";  // modifiers: M
    rP = 1; m = 3; parameter_0000009 = 4;
  Md: M => $EmptySet; cytoplasm*qM*M; Md is "messenger degradation";
    qM = 0.21;
  Pd: P => $EmptySet; cytoplasm*qP*P; Pd is "protein degradation";
    qP = 0.21;

  // Unit definitions:
  unit time = 3600 second;
end
