// SBML level 2 version 1

model Smolen2002()
  // Smolen2002_CircClock
  // This model originates from BioModels Database: A Database of Annotated Published Models. It is copyright (c) 2005-2007 The BioModels Team.
  // For more information see the terms of use.

  // Compartments:
  compartment CELL = 1e-15;

  // Species:
  species $EmptySet in CELL = 0;
  species Per in CELL = 5e-16/CELL;
  species dClk in CELL = 1e-16/CELL;
  species dClkF in CELL = 0; dClkF is "free dClk";

  // Reactions:
  rPer: $EmptySet -> Per; rPer_V*delay(dClkF/(rPer_K + dClkF), parameter_0000008)*CELL; rPer is "Per production";  // modifiers: dClkF
    rPer_V = 0.5; rPer_K = 0.3; parameter_0000008 = 10;
  rdClk: $EmptySet -> dClk; CELL*rdClk_V*delay(rdClk_K/(rdClk_K + dClkF), parameter_0000009); rdClk is "dClk production";  // modifiers: dClkF
    rdClk_V = 0.25; rdClk_K = 0.1; parameter_0000009 = 10;
  rPerD: Per -> $EmptySet; rPerD_D*Per*CELL; rPerD is "Per degradation";
    rPerD_D = 0.5;
  rdClkD: dClk -> $EmptySet; rdClkD_D*dClk*CELL; rdClkD is "dClk degradation";
    rdClkD_D = 0.5;

  // Events:
  at (dClk - Per < 0): dClkF = 0;
  at (dClk - Per >= 0): dClkF = dClk - Per;

  // Unit definitions:
  unit time = 3600 second; time is "hour (new default)";
  unit substance = 1e-9 mole; substance is "nanomole (new default)";
end
