// SBML level 2 version 1

model Markevich2004_MAPK_orderedelementary()
  // Markevich2004_MAPK_orderedElementary
  // The model corresponds to the schemas 1 and 2 of Markevich et al 2004, as described in the figure 1 and the supplementary table S1. Phosphorylations and dephosphorylations follow distributive ordered kinetics. The phosphorylations are modeled with three elementary reactions:
  // E+S<=>ES->E+P
  // The dephosphorylations are modeled with five elementary reactions:
  // E+S<=>ES->EP<=>E+P
  // This model originates from BioModels Database: A Database of Annotated Published Models. It is copyright (c) 2005-2007 The BioModels Team.
  // For more information see the terms of use.

  // Compartments:
  compartment uVol = 1;

  // Species:
  species M in uVol = 500/uVol;
  species Mp in uVol = 0;
  species Mpp in uVol = 0;
  species MAPKK in uVol = 50/uVol;
  species MKP3 in uVol = 100/uVol;
  species M_MAPKK in uVol = 0;
  species Mp_MAPKK in uVol = 0;
  species Mpp_MKP3 in uVol = 0;
  species Mp_MKP3_dep in uVol = 0;
  species Mp_MKP3 in uVol = 0; Mp_MKP3 is "Mp_MKP*";
  species M_MKP3 in uVol = 0;

  // Parameters:
  k1 = 0.02;
  k_1 = 1;
  k2 = 0.01;
  k3 = 0.032;
  k_3 = 1;
  k4 = 15;
  h1 = 0.045;
  h_1 = 1;
  h2 = 0.092;
  h3 = 1;
  h_3 = 0.01;
  h4 = 0.01;
  h_4 = 1;
  h5 = 0.5;
  h6 = 0.086;
  h_6 = 0.0011;

  // Reactions:
  v1a: M + MAPKK -> M_MAPKK; uVol*(k1*M*MAPKK - k_1*M_MAPKK); v1a is "binding MAPK and PP-MAPKK";
  v1b: M_MAPKK => Mp + MAPKK; uVol*k2*M_MAPKK; v1b is "phosphorylation of MAPK";
  v2a: Mp + MAPKK -> Mp_MAPKK; uVol*(k3*Mp*MAPKK - k_3*Mp_MAPKK); v2a is "binding PP-MAPKK and P-MAPK";
  v2b: Mp_MAPKK => Mpp + MAPKK; uVol*k4*Mp_MAPKK; v2b is "phosphorylation of P-MAPK";
  v3a: Mpp + MKP3 -> Mpp_MKP3; uVol*(h1*Mpp*MKP3 - h_1*Mpp_MKP3); v3a is "binding MKP and PP-MAPK";
  v3b: Mpp_MKP3 => Mp_MKP3_dep; uVol*h2*Mpp_MKP3; v3b is "dephosphorylation of PP-MAPK";
  v3c: Mp_MKP3_dep -> Mp + MKP3; h3*Mp_MKP3_dep - h_3*Mp*MKP3; v3c is "dissociation of MKP from P-MAPK";
  v4a: Mp + MKP3 -> Mp_MKP3; uVol*(h4*Mp*MKP3 - h_4*Mp_MKP3); v4a is "binding MKP and P-MAPK";
  v4b: Mp_MKP3 => M_MKP3; uVol*h5*Mp_MKP3; v4b is "dephosphorylation of P-MAPK";
  v4c: M_MKP3 -> M + MKP3; uVol*(h6*M_MKP3 - h_6*M*MKP3); v4c is "dissociation of MKP from MAPK";

  // Unit definitions:
  unit substance = 1e-9 mole; substance is "nanomole (default)";
end
