// SBML level 2 version 1

model Markevich2004_MAPK_orderedMM()
  // The model corresponds to the schemas 1 and 2 of Markevich et al 2004, as described in the figure 1 and modelled using Michaelis-Menten like kinetics. Phosphorylations and dephosphorylations follow distributive ordered kinetics.
  // This model originates from BioModels Database: A Database of Annotated Published Models. It is copyright (c) 2005-2007 The BioModels Team.
  // For more information see the terms of use.

  // Compartments:
  compartment uVol = 1;

  // Species:
  species M in uVol = 500/uVol;
  species Mp in uVol = 0;
  species Mpp in uVol = 0;
  species $MAPKK in uVol = 50/uVol;
  species $MKP3 in uVol = 100/uVol;

  // Parameters:
  k1cat = 0.01;
  Km1 = 50;
  k2cat = 15;
  Km2 = 500;
  k3cat = 0.084;
  Km3 = 22;
  k4cat = 0.06;
  Km4 = 18;
  Km5 = 78;

  // Reactions:
  phosphorylation_of_MAPK: M => Mp; uVol*(k1cat*MAPKK*M/Km1/(1 + M/Km1 + Mp/Km2));  // modifiers: MAPKK
  phosphorylation_of_P_MAPK: Mp => Mpp; uVol*(k2cat*MAPKK*Mp/Km2/(1 + M/Km1 + Mp/Km2)); phosphorylation_of_P_MAPK is "phosphorylation of P-MAPK";  // modifiers: MAPKK, M
  dephosphorylation_of_PP_MAPK: Mpp => Mp; uVol*(k3cat*MKP3*Mpp/Km3/(1 + Mpp/Km3 + Mp/Km4 + M/Km5)); dephosphorylation_of_PP_MAPK is "dephosphorylation of PP-MAPK";  // modifiers: MKP3, M
  dephosphorylation_of_P_MAPK: Mp => M; uVol*(k4cat*MKP3*Mp/Km4/(1 + Mpp/Km3 + Mp/Km4 + M/Km5)); dephosphorylation_of_P_MAPK is "dephosphorylation of P-MAPK";  // modifiers: MKP3, Mpp

  // Unit definitions:
  unit substance = 1e-9 mole; substance is "nanomole (default)";
end
