// SBML level 2 version 1

model model_0000001()
  // Markevich2004_MAPK_phosphoRandomElementary
  // The model corresponds to the schema 3 of Markevich et al 2004, as described in the figure 2 and the supplementary table S2. Phosphorylations follow distributive random kinetics, while dephosphorylations follow an ordered mechanism. The phosphorylations are modeled with three elementary reactions:
  // E+S<=>ES->E+P
  // The dephosphorylations are modeled with five elementary reactions:
  // E+S<=>ES->EP<=>E+P
  // This model originates from BioModels Database: A Database of Annotated Published Models. It is copyright (c) 2005-2007 The BioModels Team.
  // For more information see the terms of use.

  // Compartments:
  compartment cell = 1;

  // Species:
  species M in cell = 800; M is "ERK";
  species MpY in cell = 0; MpY is "ERK-PY";
  species MpT in cell = 0; MpT is "ERK-PT";
  species Mpp in cell = 0; Mpp is "ERK-PP";
  species MEK in cell = 180;
  species MKP3 in cell = 100;
  species MpY_MEK in cell = 0; MpY_MEK is "ERK-PY_MEK";
  species MpT_MEK in cell = 0; MpT_MEK is "ERK-PT_MEK";
  species M_MEK_Y in cell = 0; M_MEK_Y is "ERK_MEK_Y";
  species M_MEK_T in cell = 0; M_MEK_T is "ERK_MEK_T";
  species Mpp_MKP3 in cell = 0; Mpp_MKP3 is "ERK-PP_MKP3";
  species MpY_MKP3 in cell = 0; MpY_MKP3 is "ERK-PY_MKP3";
  species MpT_MKP3_Y in cell = 0; MpT_MKP3_Y is "ERK-PT_MKP3_Y";
  species MpT_MKP3_T in cell = 0; MpT_MKP3_T is "ERK-PT_MKP3_T";
  species M_MKP3_T in cell = 0; M_MKP3_T is "ERK_MKP3_T";
  species M_MKP3_Y in cell = 0; M_MKP3_Y is "ERK_MKP3_Y";

  // Parameters:
  k1 = 0.005;
  k_1 = 1;
  k2 = 1.08;
  k3 = 0.025;
  k_3 = 1;
  k4 = 0.007;
  k5 = 0.05;
  k_5 = 1;
  k6 = 0.008;
  k7 = 0.005;
  k_7 = 1;
  k8 = 0.45;
  h1 = 0.045;
  h_1 = 1;
  h2 = 0.092;
  h3 = 1;
  h_3 = 0.01;
  h4 = 0.01;
  h_4 = 1;
  h5 = 0.5;
  h6 = 0.086;
  h_6 = 0.0011;
  h7 = 0.01;
  h_7 = 1;
  h8 = 0.47;
  h9 = 0.14;
  h_9 = 0.0018;

  // Reactions:
  reaction_0000001: M + MEK -> M_MEK_Y; cell*(k1*M*MEK - k_1*M_MEK_Y); reaction_0000001 is "binding ERK and MEK";
  reaction_0000002: M_MEK_Y => MpY + MEK; cell*k2*M_MEK_Y; reaction_0000002 is "tyr phosphorylation of ERK";
  binding_ERK_PY_and_MEK: MpY + MEK -> MpY_MEK; cell*(k3*MpY*MEK - k_3*MpY_MEK); binding_ERK_PY_and_MEK is "binding ERK-PY and MEK";
  reaction_0000004: MpY_MEK => Mpp + MEK; cell*k4*MpY_MEK; reaction_0000004 is "thr phosphorylation of ERK";
  reaction_0000005: M + MEK -> M_MEK_T; cell*(k5*M*MEK - k_5*M_MEK_T); reaction_0000005 is "binding ERK and MEK";
  reaction_0000006: M_MEK_T => MpT + MEK; cell*k6*M_MEK_T; reaction_0000006 is "thr phosphorylation of ERK";
  binding_ERK_PT_and_MEK: MpT + MEK -> MpT_MEK; cell*(k7*MpT*MEK - k_7*MpT_MEK); binding_ERK_PT_and_MEK is "binding ERK-PT and MEK";
  reaction_0000008: MpT_MEK => Mpp + MEK; cell*k8*MpT_MEK; reaction_0000008 is "tyr phosphorylation of ERK";
  binding_ERK_PP_and_MKP3: Mpp + MKP3 -> Mpp_MKP3; cell*(h1*Mpp*MKP3 - h_1*Mpp_MKP3); binding_ERK_PP_and_MKP3 is "binding ERK-PP and MKP3";
  reaction_0000010: Mpp_MKP3 => MpT_MKP3_Y; cell*h2*Mpp_MKP3; reaction_0000010 is "dephosphorylation of tyr on ERK-PP";
  dissociation_ERK_PT_and_MKP3: MpT_MKP3_Y -> MpT + MKP3; cell*(h3*MpT_MKP3_Y - h_3*MpT*MKP3); dissociation_ERK_PT_and_MKP3 is "dissociation ERK-PT and MKP3";
  dephosphorylation_of_ERK_PT: MpT_MKP3_T => M_MKP3_T; cell*h5*MpT_MKP3_T; dephosphorylation_of_ERK_PT is "dephosphorylation of ERK-PT";
  binding_ERK_PT_and_MKP3: MpT + MKP3 -> MpT_MKP3_T; cell*(h4*MpT*MKP3 - h_4*MpT_MKP3_T); binding_ERK_PT_and_MKP3 is "binding ERK-PT and MKP3";
  dephosphorylation_of_ERK_PY: MpY_MKP3 => M_MKP3_Y; cell*h8*MpY_MKP3; dephosphorylation_of_ERK_PY is "dephosphorylation of ERK-PY";
  dissociation_ERK_and_MKP3: M_MKP3_T -> M + MKP3; cell*(h6*M_MKP3_T - h_6*M*MKP3);
  binding_ERK_PY_and_MKP3: MpY + MKP3 -> MpY_MKP3; cell*(h7*MpY*MKP3 - h_7*MpY_MKP3); binding_ERK_PY_and_MKP3 is "binding ERK-PY and MKP3";
  Dissociation_ERK_and_MKP3: M_MKP3_Y -> M + MKP3; cell*(h9*M_MKP3_Y - h_9*M*MKP3);

  // Unit definitions:
  unit substance = 1e-9 mole; substance is "nanomole (default)";
end
