// SBML level 2 version 1

model Markevich2004_MAPK_orderedMM2kinases()
  // This model originates from BioModels Database: A Database of Annotated Published Models. It is copyright (c) 2005-2007 The BioModels Team.
  // For more information see the terms of use.

  // Compartments:
  compartment uVol = 1;

  // Species:
  species M in uVol = 500/uVol;
  species Mp in uVol = 0;
  species Mpp in uVol = 0;
  species $MAPKK1 in uVol = 100/uVol;
  species $MAPKK2 in uVol = 1/uVol;
  species $MKP3 in uVol = 100/uVol;

  // Parameters:
  k1cat = 0.01;
  Km1 = 50;
  k2cat = 15;
  Km2 = 500;
  k3cat = 0.084;
  Km3 = 5;
  k4cat = 0.06;
  Km4 = 18;
  Km5 = 78;

  // Reactions:
  phosphorylation_of_MAPK: M => Mp; uVol*(k1cat*MAPKK1*M/Km1/(1 + M/Km1));  // modifiers: MAPKK1
  phosphorylation_of_P_MAPK: Mp => Mpp; uVol*(k2cat*MAPKK2*Mp/Km2/(1 + Mp/Km2)); phosphorylation_of_P_MAPK is "phosphorylation of P-MAPK";  // modifiers: MAPKK2, M
  dephosphorylation_of_PP_MAPK: Mpp => Mp; uVol*(k3cat*MKP3*Mpp/Km3/(1 + Mpp/Km3 + Mp/Km4 + M/Km5)); dephosphorylation_of_PP_MAPK is "dephosphorylation of PP-MAPK";  // modifiers: MKP3, M
  dephosphorylation_of_P_MAPK: Mp => M; uVol*(k4cat*MKP3*Mp/Km4/(1 + Mpp/Km3 + Mp/Km4 + M/Km5)); dephosphorylation_of_P_MAPK is "dephosphorylation of P-MAPK";  // modifiers: MKP3, Mpp

  // Unit definitions:
  unit substance = 1e-9 mole; substance is "nanomole (default)";
end
