// SBML level 2 version 1

model kofahl_pheromone_pathway()
  // Kofahl2004_pheromone
  // SBML level 2 code generated for the JWS Online project by Jacky Snoep using PySCeS
  // Run this model online at http://jjj.biochem.sun.ac.za
  // To cite JWS Online please refer to: Olivier, B.G. and Snoep, J.L. (2004) Web-based modelling using JWS Online, Bioinformatics, 20:2143-2144
  // The following are the four major differences between the original publication by Kofahl et al and the model that actually is able to replicate the results as depicted in the publication (those corrections have been made in agreement with the authors):
  // 1. Bar1 is the inactive protease present inside the cell but the publication wrongly mentions that Bar1 is also the protease that is present on the extracellular surface.
  // The model correctly names the protease in it's different forms by calling inactive Bar1 within the cell as Bar1, active Bar1 within the cell as Bar1a and extracellular Bar1 as Bar1aex
  // 2. The initial amount of Alpha-factor is given as 1000nM but the model uses a value of 100nM.
  // 3. The value of the paramenter k8 is given as 0.33 but the model uses a value of 0.033.
  // 4. The value of the paramenter k41 is given as 0.002 but the model uses a value of 0.02.
  // This model originates from BioModels Database: A Database of Annotated Published Models. It is copyright (c) 2005-2007 The BioModels Team.
  // For more information see the terms of use.

  // Compartments:
  compartment Extracellular = 1;
  compartment compartment in Extracellular = 1; compartment is "cell";

  // Species:
  species alpha in Extracellular = 100; alpha is "&alpha;-factor";
  species Ste2 in compartment = 1666.667;
  species Ste2a in compartment = 0; Ste2a is "Ste2active";
  species Gabc in compartment = 1666.667; Gabc is "G&alpha;&beta;&gamma;";
  species GaGTP in compartment = 0; GaGTP is "G&alpha;GTP";
  species Gbc in compartment = 0; Gbc is "G&beta;&gamma;";
  species GaGDP in compartment = 0; GaGDP is "G&alpha;GDP";
  species complexC in compartment = 235.7249;
  species complexD in compartment = 0;
  species Ste5 in compartment = 158.3318;
  species Ste11 in compartment = 158.3318;
  species complexA in compartment = 105.9433;
  species Ste7 in compartment = 36.3997;
  species Fus3 in compartment = 686.3997;
  species complexB in compartment = 77.87536;
  species Ste20 in compartment = 1000;
  species complexE in compartment = 0;
  species complexF in compartment = 0;
  species complexG in compartment = 0;
  species complexH in compartment = 0;
  species complexI in compartment = 0;
  species complexL in compartment = 0;
  species Fus3PP in compartment = 0;
  species complexK in compartment = 0;
  species Ste12 in compartment = 200;
  species Ste12a in compartment = 0; Ste12a is "Ste12active";
  species Bar1 in compartment = 200;
  species Bar1a in compartment = 0; Bar1a is "Bar1active";
  species Bar1aex in Extracellular = 0; Bar1aex is "Bar1activeEx";
  species Far1 in compartment = 500;
  species Far1PP in compartment = 0;
  species Far1U in compartment = 0; Far1U is "Far1ubiquitin";
  species complexM in compartment = 0;
  species complexN in compartment = 0;
  species Cdc28 in compartment = 300;
  species Sst2 in compartment = 0;
  species $p in compartment = 0;

  // Reactions:
  alpha_degradation: alpha -> ; Extracellular*alpha*Bar1aex*k1;  // modifiers: Bar1aex
    k1 = 0.03 min_inv_nM_inv;
  v2: Ste2 -> Ste2a; compartment*Ste2*alpha*k2;  // modifiers: alpha
    k2 = 0.0012 min_inv_nM_inv;
  v3: Ste2a -> Ste2; compartment*Ste2a*k3;
    k3 = 0.6 min_inv;
  v4: Ste2a -> $p; compartment*Ste2a*k4;
    k4 = 0.24 min_inv;
  v5: Ste2 -> ; compartment*Ste2*k5;
    k5 = 0.024 min_inv;
  v6: Gabc -> GaGTP + Gbc; compartment*Ste2a*Gabc*k6;  // modifiers: Ste2a
    k6 = 0.0036 min_inv_nM_inv;
  v7: GaGTP -> GaGDP; compartment*GaGTP*k7;
    k7 = 0.24 min_inv;
  v8: GaGTP -> GaGDP; compartment*GaGTP*Sst2*k8;  // modifiers: Sst2
    k8 = 0.033 min_inv_nM_inv;
  v9: GaGDP + Gbc -> Gabc; compartment*GaGDP*Gbc*k9;
    k9 = 2000 min_inv_nM_inv;
  v10: Gbc + complexC -> complexD; compartment*Gbc*complexC*k10;
    k10 = 0.1 min_inv_nM_inv;
  v11: complexD -> Gbc + complexC; compartment*complexD*k11;
    k11 = 5 min_inv;
  v12: Ste11 + Ste5 -> complexA; compartment*Ste5*Ste11*k12;
    k12 = 1 min_inv_nM_inv;
  v13: complexA -> Ste11 + Ste5; compartment*complexA*k13;
    k13 = 3 min_inv;
  v14: Fus3 + Ste7 -> complexB; compartment*Ste7*Fus3*k14;
    k14 = 1 min_inv_nM_inv;
  v15: complexB -> Fus3 + Ste7; compartment*complexB*k15;
    k15 = 3 min_inv;
  v16: complexA + complexB -> complexC; compartment*complexA*complexB*k16;
    k16 = 3 min_inv_nM_inv;
  v17: complexC -> Fus3 + Ste11 + Ste7 + Ste5; compartment*complexC*k17;
    k17 = 100 min_inv;
  v18: complexD + Ste20 -> complexE; compartment*complexD*Ste20*k18;
    k18 = 5 min_inv_nM_inv;
  v19: complexE -> complexD + Ste20; compartment*complexE*k19;
    k19 = 1 min_inv;
  v20: complexE -> complexF; compartment*complexE*k20;
    k20 = 10 min_inv;
  v21: complexE -> Gbc + Ste7 + Ste5 + Fus3 + Ste20 + Ste11; compartment*complexE*k21;
    k21 = 5 min_inv;
  v22: complexF -> complexG; compartment*complexF*k22;
    k22 = 47 min_inv;
  v23: complexF -> Gbc + Ste7 + Ste5 + Fus3 + Ste20 + Ste11; compartment*complexF*k23;
    k23 = 5 min_inv;
  v24: complexG -> complexH; compartment*complexG*k24;
    k24 = 345 min_inv;
  v25: complexG -> Gbc + Ste7 + Ste5 + Fus3 + Ste20 + Ste11; compartment*complexG*k25;
    k25 = 5 min_inv;
  v26: complexH -> complexI; compartment*complexH*k26;
    k26 = 50 min_inv;
  v27: complexH -> Gbc + Ste7 + Ste5 + Fus3 + Ste20 + Ste11; compartment*complexH*k27;
    k27 = 5 min_inv;
  v28: complexI -> complexL + Fus3PP; compartment*complexI*k28;
    k28 = 140 min_inv;
  v29: complexL + Fus3 -> complexK; compartment*complexL*Fus3*k29;
    k29 = 10 min_inv_nM_inv;
  v30: complexK -> complexL + Fus3; compartment*complexK*k30;
    k30 = 1 min_inv;
  v31: complexK -> complexI; compartment*complexK*k31;
    k31 = 250 min_inv;
  v32: complexL -> Gbc + Ste7 + Ste5 + Ste20 + Ste11; compartment*complexL*k32;
    k32 = 5 min_inv;
  v33: Fus3PP -> Fus3; compartment*Fus3PP*k33;
    k33 = 50 min_inv;
  v34: Ste12 + Fus3PP -> Ste12a; compartment*Ste12*Fus3PP*k34;
    k34 = 18 min_inv_nM_inv;
  v35: Ste12a -> Ste12 + Fus3PP; compartment*Ste12a*k35;
    k35 = 10 min_inv;
  v36: Bar1 -> Bar1a; compartment*Ste12a*Bar1*k36;  // modifiers: Ste12a
    k36 = 0.1 min_inv_nM_inv;
  v37: Bar1a -> Bar1; compartment*Bar1a*k37;
    k37 = 0.1 min_inv;
  v38: Bar1a -> Bar1aex; compartment*Bar1a*k38;
    k38 = 0.01 min_inv;
  v39: Far1 -> Far1PP; compartment*(Far1*Fus3PP*Fus3PP/(100*100 + Fus3PP*Fus3PP))*k39;  // modifiers: Fus3PP
    k39 = 18 min_inv;
  v40: Far1PP -> Far1; compartment*Far1PP*k40;
    k40 = 1 min_inv;
  v41: Far1 -> Far1U; compartment*Far1*Cdc28*k41;  // modifiers: Cdc28
    k41 = 0.02 min_inv_nM_inv;
  v42: Gbc + Far1PP -> complexM; compartment*Gbc*Far1PP*k42;
    k42 = 0.1 min_inv_nM_inv;
  v43: complexM -> Gbc + Far1PP; compartment*complexM*k43;
    k43 = 0.01 min_inv;
  v44: complexN -> Cdc28 + Far1PP; compartment*complexN*k44;
    k44 = 0.01 min_inv;
  v45: Cdc28 + Far1PP -> complexN; compartment*Far1PP*Cdc28*k45;
    k45 = 0.1 min_inv_nM_inv;
  v46: $p -> Sst2; compartment*(Fus3PP^2/(4^2 + Fus3PP^2))*k46;  // modifiers: Fus3PP
    k46 = 200 nM_min_inv;
  v47: Sst2 -> $p; compartment*Sst2*k47;
    k47 = 1 min_inv;

  // Unit definitions:
  unit substance = 1e-9 mole; substance is "nanomole (default)";
  unit time = 60 second; time is "minute (default)";
  unit nanoMolar = 1e-9 mole / litre;
  unit min_inv = 1 / (60 second);
  unit min_inv_nM_inv = 1 / (1e-9 mole * 60 second);
  unit nM_min_inv = 1e-9 mole / (60 second);
end
