// SBML level 2 version 1

model Brown2004_NGF_EGF_signaling()
  // Contact Ryan Gutenkunst (rng7@cornell.edu) for any questions on the SBMLization or annotation of this model.
  // KS Brown KS and JP Sethna
  // "Statistical mechanical approaches to models with many poorly known parameters."
  // Physical Review E 68:021904 (2003)
  // PMID: 14525003
  // KS Brown, CC Hill, GA Calero, CR Myers, KH Lee, JP Sethna, and RA Cerione
  // "The statistical mechanics of complex signaling networks: nerve growth factor signaling"
  // Physical Biology 1:184-195 (2004)
  // PMID: not yet indexed
  // The figures in the paper show results from computations performed over an ensemble of all parameter sets that fit the avaiable data. This file contains only the best fit parameters. The full ensemble of parameters is available at http://www.lassp.cornell.edu/sethna/GeneDynamics/PC12DataFiles/ (Also, the best-fit parameter set produces a curve for DN Rap1 that is less "peakish" than the ensemble average.)
  // The conversion factors for EGF and NGF concentrations account for their molecular weights and the density of cells in the culture dish. These concentrations are saturating, so the exact values are not critical.
  // Because the Erk data fit to measure only fold changes in activity, there is no absolute scale for the y-axes. Thus the curves from this file have different magnitudes than those published.
  // To reproduce the figures from the paper:
  // 2a) For EGF stimulation, set the initial concentration of EGF to 100 ng/ml * 100020 (molecule/cell)/(ng/ml) = 10002000.
  // For NGF stimulation, set the initial concentration of NGF to 50 ng/ml * 4560 (molecule/cell)/(ng/ml) = 456000
  // 5a) To simulate LY294002 addition, set kPI3KRas and kPI3K to 0.
  // 5b) To simulate a dominant negative Rap1, set kRap1ToBRaf to 0.
  // To simulate a dominant negative Ras, set kRasToRaf1 and kPI3KRas to 0.
  // Almost all the data fit with this model by the authors are from Western blots. Given the uncertainties in antibody effectiveness and other factors, one can't a priori derive a conversion between the arbitrary units for a given set of data and molecules per cell. So the authors used an adjustable "scale factor" that converts between molecules per cell and Western blot units.
  // For the EGF stimulation data in figure 2a) the scale factor conversion is 1.414e-05 (U/mg)/(molecule/cell). For the NGF stimulation data in figure 2a) it is 7.135e-06 (U/mg)/(molecule/cell).
  // This model originates from BioModels Database: A Database of Annotated Published Models. It is copyright (c) 2005-2007 The BioModels Team.
  // For more information see the terms of use.

  // Compartments:
  compartment cell = 1;

  // Species:
  species EGF in cell = 10002000;
  species NGF in cell = 456000;
  species freeEGFReceptor in cell = 80000;
  species boundEGFReceptor in cell = 0;
  species freeNGFReceptor in cell = 10000;
  species boundNGFReceptor in cell = 0;
  species SosInactive in cell = 120000;
  species SosActive in cell = 0;
  species P90RskInactive in cell = 120000;
  species P90RskActive in cell = 0;
  species RasInactive in cell = 120000;
  species RasActive in cell = 0;
  species $RasGapActive in cell = 120000;
  species Raf1Inactive in cell = 120000;
  species Raf1Active in cell = 0;
  species BRafInactive in cell = 120000;
  species BRafActive in cell = 0;
  species MekInactive in cell = 600000;
  species MekActive in cell = 0;
  species ErkInactive in cell = 600000;
  species ErkActive in cell = 0;
  species PI3KInactive in cell = 120000;
  species PI3KActive in cell = 0;
  species AktInactive in cell = 120000;
  species AktActive in cell = 0;
  species C3GInactive in cell = 120000;
  species C3GActive in cell = 0;
  species Rap1Inactive in cell = 120000;
  species Rap1Active in cell = 0;
  species $RapGapActive in cell = 120000;
  species $PP2AActive in cell = 120000;
  species $Raf1PPtase in cell = 120000;

  // Parameters:
  krbEGF = 2.18503e-5;
  kruEGF = 0.0121008;
  krbNGF = 1.38209e-7;
  kruNGF = 0.00723811;
  kEGF = 694.731;
  KmEGF = 6086070;
  kNGF = 389.428;
  KmNGF = 2112.66;
  kdSos = 1611.97;
  KmdSos = 896896;
  kSos = 32.344;
  KmSos = 35954.3;
  kRasGap = 1509.36;
  KmRasGap = 1432410;
  kRasToRaf1 = 0.884096;
  KmRasToRaf1 = 62464.6;
  kpRaf1 = 185.759;
  KmpRaf1 = 4768350;
  kpBRaf = 125.089;
  KmpBRaf = 157948;
  kdMek = 2.83243;
  KmdMek = 518753;
  kpMekCytoplasmic = 9.85367;
  KmpMekCytoplasmic = 1007340;
  kdErk = 8.8912;
  KmdErk = 3496490;
  kpP90Rsk = 0.0213697;
  KmpP90Rsk = 763523;
  kPI3K = 10.6737;
  KmPI3K = 184912;
  kPI3KRas = 0.0771067;
  KmPI3KRas = 272056;
  kAkt = 0.0566279;
  KmAkt = 653951;
  kdRaf1ByAkt = 15.1212;
  KmRaf1ByAkt = 119355;
  kC3GNGF = 146.912;
  KmC3GNGF = 12876.2;
  kC3G = 1.40145;
  KmC3G = 10965.6;
  kRapGap = 27.265;
  KmRapGap = 295990;
  kRap1ToBRaf = 2.20995;
  KmRap1ToBRaf = 1025460;
  kdRaf1 = 0.126329;
  KmdRaf1 = 1061.71;
  kdBRaf = 441.287;
  KmdBRaf = 10879500;

  // Reactions:
  EGFBindingReaction: EGF + freeEGFReceptor => boundEGFReceptor; cell*krbEGF*EGF*freeEGFReceptor; EGFBindingReaction is "EGF binding";
  EGFUnbindingReaction: boundEGFReceptor => EGF + freeEGFReceptor; cell*kruEGF*boundEGFReceptor; EGFUnbindingReaction is "EFG unbinding";
  NGFBindingReaction: NGF + freeNGFReceptor => boundNGFReceptor; krbNGF*NGF*freeNGFReceptor*cell; NGFBindingReaction is "NGF binding";
  NGFUnbindingReaction: boundNGFReceptor => NGF + freeNGFReceptor; kruNGF*boundNGFReceptor*cell; NGFUnbindingReaction is "NGF unbinding";
  SosActivationByEGFReaction: SosInactive -> SosActive; cell*(kEGF*boundEGFReceptor*SosInactive/(SosInactive + KmEGF)); SosActivationByEGFReaction is "SOS activation by EGF";  // modifiers: boundEGFReceptor
  SosActivationByNGFReaction: SosInactive -> SosActive; cell*(kNGF*boundNGFReceptor*SosInactive/(SosInactive + KmNGF)); SosActivationByNGFReaction is "SOS activation by NGF";  // modifiers: boundNGFReceptor
  SosDeactivationReaction: SosActive -> SosInactive; cell*(kdSos*P90RskActive*SosActive/(SosActive + KmdSos)); SosDeactivationReaction is "SOS deactivation";  // modifiers: P90RskActive
  RasActivationReaction: RasInactive -> RasActive; cell*(kSos*SosActive*RasInactive/(RasInactive + KmSos)); RasActivationReaction is "Ras activation";  // modifiers: SosActive
  RasDeactivationReaction: RasActive -> RasInactive; cell*(kRasGap*RasGapActive*RasActive/(RasActive + KmRasGap)); RasDeactivationReaction is "Ras deactivation";  // modifiers: RasGapActive
  Raf1ByRasActivationReaction: Raf1Inactive -> Raf1Active; cell*(kRasToRaf1*RasActive*Raf1Inactive/(Raf1Inactive + KmRasToRaf1)); Raf1ByRasActivationReaction is "Raf1 activation by Ras";  // modifiers: RasActive
  MekbyRaf1ActivationReaction: MekInactive -> MekActive; cell*(kpRaf1*Raf1Active*MekInactive/(MekInactive + KmpRaf1)); MekbyRaf1ActivationReaction is "Mek activation by Raf1";  // modifiers: Raf1Active
  MekbyBRafActivationReaction: MekInactive -> MekActive; cell*(kpBRaf*BRafActive*MekInactive/(MekInactive + KmpBRaf)); MekbyBRafActivationReaction is "Mek activation by B-Raf";  // modifiers: BRafActive
  ErkActivationReaction: ErkInactive -> ErkActive; cell*(kpMekCytoplasmic*MekActive*ErkInactive/(ErkInactive + KmpMekCytoplasmic)); ErkActivationReaction is "Erk activation";  // modifiers: MekActive
  MekDeactivationReaction: MekActive -> MekInactive; cell*(kdMek*PP2AActive*MekActive/(MekActive + KmdMek)); MekDeactivationReaction is "Mek deactivation";  // modifiers: PP2AActive
  ErkDeactivationReaction: ErkActive -> ErkInactive; cell*(kdErk*PP2AActive*ErkActive/(ErkActive + KmdErk)); ErkDeactivationReaction is "Erk deactivation";  // modifiers: PP2AActive
  Raf1byPPtaseDeactivationReaction: Raf1Active -> Raf1Inactive; cell*(kdRaf1*Raf1PPtase*Raf1Active/(Raf1Active + KmdRaf1)); Raf1byPPtaseDeactivationReaction is "Raf1 deactivation by PPase";  // modifiers: Raf1PPtase
  P90RskActivationReaction: P90RskInactive -> P90RskActive; cell*(kpP90Rsk*ErkActive*P90RskInactive/(P90RskInactive + KmpP90Rsk)); P90RskActivationReaction is "P90Rsk activation";  // modifiers: ErkActive
  PI3KbyEGFRActivationReaction: PI3KInactive -> PI3KActive; cell*(kPI3K*boundEGFReceptor*PI3KInactive/(PI3KInactive + KmPI3K)); PI3KbyEGFRActivationReaction is "PI3K activation by EGFR";  // modifiers: boundEGFReceptor
  PI3KbyRasActivationReaction: PI3KInactive -> PI3KActive; cell*(kPI3KRas*RasActive*PI3KInactive/(PI3KInactive + KmPI3KRas)); PI3KbyRasActivationReaction is "PI3K activation by Ras";  // modifiers: RasActive
  AktActivationReaction: AktInactive -> AktActive; cell*(kAkt*PI3KActive*AktInactive/(AktInactive + KmAkt)); AktActivationReaction is "Akt activation";  // modifiers: PI3KActive
  Raf1ByAktDeactivationReaction: Raf1Active -> Raf1Inactive; cell*(kdRaf1ByAkt*AktActive*Raf1Active/(Raf1Active + KmRaf1ByAkt)); Raf1ByAktDeactivationReaction is "Raf1 deactivation by Akt";  // modifiers: AktActive
  C3GActivationReaction: C3GInactive -> C3GActive; cell*(kC3GNGF*boundNGFReceptor*C3GInactive/(C3GInactive + KmC3GNGF)); C3GActivationReaction is "C3G activation";  // modifiers: boundNGFReceptor
  Rap1ActivationReaction: Rap1Inactive -> Rap1Active; cell*(kC3G*C3GActive*Rap1Inactive/(Rap1Inactive + KmC3G)); Rap1ActivationReaction is "Rap1 activation";  // modifiers: C3GActive
  Rap1DeactivationReaction: Rap1Active -> Rap1Inactive; cell*(kRapGap*RapGapActive*Rap1Active/(Rap1Active + KmRapGap)); Rap1DeactivationReaction is "Rap1 deactivation";  // modifiers: RapGapActive
  BRafByRap1ActivationReaction: BRafInactive -> BRafActive; cell*(kRap1ToBRaf*Rap1Active*BRafInactive/(BRafInactive + KmRap1ToBRaf)); BRafByRap1ActivationReaction is "BRaf activation by Rap1";  // modifiers: Rap1Active
  BRafbyPPtaseDeactivationReaction: BRafActive -> BRafInactive; cell*(kdBRaf*Raf1PPtase*BRafActive/(BRafActive + KmdBRaf)); BRafbyPPtaseDeactivationReaction is "BRaf deactivation by PPase";  // modifiers: Raf1PPtase

  // Unit definitions:
  unit substance = item; substance is "item (default)";
  unit time = 60 second; time is "minute (default)";
end
