// SBML level 2 version 1

model model_0000001()
  // Smolen2004_CircClock
  // No inititial conditions are specified in the paper. Because there is a basal rate of transcription for each gene, it doesn't matter much. With the agreement of Paul Smolen, I put all the initial concentration at 0.001 nanomoles. N Le Novère.
  // This model originates from BioModels Database: A Database of Annotated Published Models. It is copyright (c) 2005-2007 The BioModels Team.
  // For more information see the terms of use.

  // Compartments:
  compartment cytoplasm = 1;
  compartment nucleus in cytoplasm = 1;

  // Species:
  species P0nuc in nucleus = 0.001;
  species P1nuc in nucleus = 0.001;
  species P2nuc in nucleus = 0.001;
  species P0cyt in cytoplasm = 0.001;
  species P1cyt in cytoplasm = 0.001;
  species P2cyt in cytoplasm = 0.001;
  species VRI in nucleus = 0.001;
  species CLK in nucleus = 0.001;
  species PDP in nucleus = 0.001;

  // Parameters:
  ACvri = ;
  ACper = ;
  ACpdp = ;
  Kpv = 0.2;
  Kpp = 0.24;
  Kppd = 0.1;
  Kvc = 0.54;
  Kpdc = 0.54;
  Kcv = 0.083;
  Kcp = 0.134;
  Kcpd = 0.248;
  Kvdeac = 0.2124;
  Kpdeac = 0.2124;
  Kpddeac = 0.2124;
  Fv = 1.062;
  Fp = 1.062;
  Fpd = 1.062;
  OPvri = ;
  OPper = ;
  OPpdp = ;
  Tvriop = 2.8249;
  Tperop = 2.8249;
  Tpdpop = 2.8249;
  N = 5;
  Vper = 10.62;
  Vvri = 76.464;
  Vpdp = 344.09;
  Vclk = 1.062;
  Rpbas = 0.02124;
  Rvbas = 0.19116;
  Rcbas = 0.001062;
  Rpdbas = 0.38232;
  Vdclk = 0.2124;
  vdvri = 0.7434;
  vdpdp = 0.6903;
  Tdelay = 2.8249;
  Vpcyt = 1.6992;
  Kpcyt = 0.25;
  Vpnuc = 0.3186;
  Kpnuc = 0.001;
  Vtrans = 1.6992;
  Ktrans = 0.25;
  Vdegp = 5.31;
  Kdegp = 0.01;
  kd = 0.00531;

  // Rate rules:
  ACvri' = Fv*(CLK/(CLK + Kcv))*(Kpv/(Kpv + P0nuc + P1nuc + P2nuc))*(1 - ACvri) - Kvdeac*ACvri;
  ACper' = Fp*(CLK/(CLK + Kcp))*(Kpp/(Kpp + P0nuc + P1nuc + P2nuc))*(1 - ACper) - Kpdeac*ACper;
  ACpdp' = Fpd*(CLK/(CLK + Kcpd))*(Kppd/(Kppd + P0nuc + P1nuc + P2nuc))*(1 - ACpdp) - Kpddeac*ACpdp;
  OPvri' = (ACvri^N - OPvri)/Tvriop;
  OPper' = (ACper^N - OPper)/Tperop;
  OPpdp' = (ACpdp^N - OPpdp)/Tpdpop;

  // Reactions:
  Per_production: => P0cyt; cytoplasm*(Vper*OPper + Rpbas);
  Vri_production: => VRI; nucleus*(Vvri*OPvri + Rvbas);
  Pdp_production: => PDP; nucleus*delay(Vpdp*OPpdp + Rpdbas, Tdelay);
  Clk_production: => CLK; nucleus*(Vclk*(PDP^2/(PDP^2 + Kpdc^2))*(Kvc^2/(VRI^2 + Kvc^2)) + Rcbas);  // modifiers: PDP, VRI
  Clk_specific_degradation: CLK => ; nucleus*Vdclk*CLK;
  Pdp_specific_degradation: PDP => ; nucleus*vdpdp*PDP;
  Vri_specific_degradation: VRI => ; nucleus*vdvri*VRI;
  reaction_0000008: P0cyt => P1cyt; cytoplasm*(Vpcyt*P0cyt/(Kpcyt + P0cyt)); reaction_0000008 is "first cytoplasmic Per phosphorylation";
  reaction_0000009: P1cyt => P2cyt; cytoplasm*(Vpcyt*P1cyt/(Kpcyt + P1cyt)); reaction_0000009 is "second cytoplasmic Per phosphorylation";
  Per_nuclear_transport: P2cyt => P0nuc; cytoplasm*(Vtrans*P2cyt/(Ktrans + P2cyt));
  reaction_0000011: P0nuc => P1nuc; nucleus*(Vpnuc*P0nuc/(Kpnuc + P0nuc)); reaction_0000011 is "first nuclear Per phosphorylation";
  reaction_0000012: P1nuc => P2nuc; nucleus*(Vpnuc*P1nuc/(Kpnuc + P1nuc)); reaction_0000012 is "second nuclear Rer phosphorylation";
  Per_specific_degradation: P2nuc => ; nucleus*(Vdegp*P2nuc/(Kdegp + P2nuc));
  Clk_aspecific_degradation: CLK => ; nucleus*kd*CLK;
  Pdp_aspecific_degradation: PDP => ; nucleus*kd*PDP;
  Vri_aspecific_degradation: VRI => ; nucleus*kd*VRI;
  Per_cyt_aspecific_degradation: P0cyt => ; cytoplasm*kd*P0cyt;
  Per_P_cyt_aspecific_degradation: P1cyt => ; cytoplasm*kd*P1cyt; Per_P_cyt_aspecific_degradation is "Per-P_cyt aspecific degradation";
  Per_PP_cyt_aspecific_degradation: P2cyt => ; cytoplasm*kd*P2cyt; Per_PP_cyt_aspecific_degradation is "Per-PP_cyt aspecific degradation";
  Per_nuc_aspecific_degradation: P0nuc => ; nucleus*kd*P0nuc;
  Per_P_nuc_aspecific_degradation: P1nuc => ; nucleus*kd*P1nuc; Per_P_nuc_aspecific_degradation is "Per-P_nuc aspecific degradation";
  Per_PP_nuc_aspecific_degradation: P2nuc => ; nucleus*kd*P2nuc; Per_PP_nuc_aspecific_degradation is "Per-PP_nuc aspecific degradation";

  // Unit definitions:
  unit time = 3600 second; time is "hour";
  unit substance = 1e-9 mole; substance is "nanomole";
end
