// SBML level 2 version 1

model Tyson1999()
  // Tyson1999_CircClock
  // This model originates from BioModels Database: A Database of Annotated Published Models. It is copyright (c) 2005-2007 The BioModels Team.
  // For more information see the terms of use.

  // Compartments:
  compartment default = 1;
  compartment CYTOPLASM = 1;

  // Species:
  species $EmptySet in default = 0;
  species M in CYTOPLASM = 1/CYTOPLASM;
  species P in CYTOPLASM = 1/CYTOPLASM; P is "Pt";

  // Parameters:
  N_A = 6.0221367e23;

  // Reactions:
  TC: $EmptySet => M; CYTOPLASM*(Vm/(1 + (P*(1 - 2/(1 + (1 + 8*TC_Keq*P)^0.5))/(2*Pcrit))^2)); TC is "transcription";  // modifiers: P
    Vm = 1; Pcrit = 0.1; TC_Keq = 200;
  TL: $EmptySet => P; V*M*CYTOPLASM; TL is "translation";  // modifiers: M
    V = 0.5;
  mRNAD: M => $EmptySet; mRNAD_D*M*CYTOPLASM; mRNAD is "mRNA degradation";
    mRNAD_D = 0.1;
  ProteinD: P => $EmptySet; ProteinD_D*P*CYTOPLASM; ProteinD is "protein degradation";
    ProteinD_D = 0.1;
  DBT: P => $EmptySet; CYTOPLASM*((k1*P*(2/(1 + (1 + 8*DBT_Keq*P)^0.5)) + k2*P)/(J + P)); DBT is "Per phosphorylation and degradation";
    k1 = 10; k2 = 0.03; J = 0.05; DBT_Keq = 200;

  // Unit definitions:
  unit time = 3600 second; time is "hour";
end
