// SBML level 2 version 1

model Marwan_Genetics_2003()
  // This model originates from BioModels Database: A Database of Annotated Published Models. It is copyright (c) 2005-2007 The BioModels Team.
  // For more information see the terms of use.

  // Compartments:
  compartment compartment = 1;

  // Species:
  species Pfr in compartment = 10/compartment;
  species Pr in compartment = 0;
  species Xi in compartment = 6/compartment;
  species Xa in compartment = 0;
  species prepreS in compartment = 200/compartment;
  species preS in compartment = 0;
  species Ya in compartment = 0.9/compartment;
  species S in compartment = 0;
  species $Gluc in compartment = 0;
  species Yi in compartment = 0;
  species V in compartment = 30/compartment;
  species Pi in compartment = 0;

  // Reactions:
  Photoreceptor_activation: Pfr => Pr; compartment*Pfr*IfrSfrPfr;
    IfrSfrPfr = 0.1;
  Photoreceptor_inactivation: Pr => Pfr; IrSrPr*Pr*compartment;
    IrSrPr = 0;
  Transducer_activation: Xi => Xa; Xi*kia*Pr*compartment;  // modifiers: Pr
    kia = 0.1;
  Transducer_inactivation: Xa => Xi; kai*Xa*compartment;
    kai = 0.8;
  preS_formation: prepreS => preS; prepreS*kx*Xa*compartment;  // modifiers: Xa
    kx = 0.2;
  S_generation: preS => S; preS*ky*Ya*compartment;  // modifiers: Ya
    ky = 1;
  Glucose_sensor_inactivation: Ya + $Gluc => Yi; kG*Ya*Gluc*compartment;
    kG = 0.1;
  S_formation: => S; compartment*(alpha1/(1 + V^3));  // modifiers: V
    alpha1 = 30;
  V_formation: => V; compartment*(alpha2/(1 + S^3));  // modifiers: S
    alpha2 = 50;
  S_degradation: S => ; S*compartment;
  V_degradation: V => ; compartment*V;
  Photoreceptor_decay: Pr => Pi; compartment*kd*Pr;
    kd = 0.1;

  // Unit definitions:
  unit time = 3600 second; time is "hour";
end
