// SBML level 2 version 1

model Rohwer2000_Phosphotransferase_System()
  // SBML level 2 code generated for the JWS Online project by Jacky Snoep using PySCeS
  // Run this model online at http://jjj.biochem.sun.ac.za
  // To cite JWS Online please refer to: Olivier, B.G. and Snoep, J.L. (2004) Web-based modelling using JWS Online, Bioinformatics, 20:2143-2144
  // This model originates from BioModels Database: A Database of Annotated Published Models. It is copyright (c) 2005-2007 The BioModels Team.
  // For more information see the terms of use.

  // Compartments:
  compartment compartment = 1; compartment is "cell";

  // Species:
  species EI in compartment = 3;
  species PyrPI in compartment = 0;
  species EIP in compartment = 2;
  species HPr in compartment = 25;
  species EIPHPr in compartment = 0;
  species HPrP in compartment = 25;
  species EIIA in compartment = 20;
  species HPrPIIA in compartment = 0;
  species EIIAP in compartment = 20;
  species EIICB in compartment = 5;
  species EIIAPIICB in compartment = 0;
  species EIICBP in compartment = 5;
  species EIICBPGlc in compartment = 0;
  species $PEP in compartment = 2800;
  species $Pyr in compartment = 900;
  species $GlcP in compartment = 50;
  species $Glc in compartment = 500;

  // Reactions:
  v1: $PEP + EI -> PyrPI; compartment*(k1f*PEP*EI - k1r*PyrPI);
    k1f = 1960; k1r = 480000;
  v2: PyrPI -> EIP + $Pyr; compartment*(k2f*PyrPI - k2r*Pyr*EIP);
    k2f = 108000; k2r = 294;
  v3: HPr + EIP -> EIPHPr; compartment*(k3f*EIP*HPr - k3r*EIPHPr);
    k3f = 14000; k3r = 14000;
  v4: EIPHPr -> HPrP + EI; compartment*(k4f*EIPHPr - k4r*EI*HPrP);
    k4f = 84000; k4r = 3360;
  v5: HPrP + EIIA -> HPrPIIA; compartment*(k5f*HPrP*EIIA - k5r*HPrPIIA);
    k5f = 21960; k5r = 21960;
  v6: HPrPIIA -> EIIAP + HPr; compartment*(k6f*HPrPIIA - k6r*HPr*EIIAP);
    k6f = 4392; k6r = 3384;
  v7: EIICB + EIIAP -> EIIAPIICB; compartment*(k7f*EIIAP*EIICB - k7r*EIIAPIICB);
    k7f = 880; k7r = 880;
  v8: EIIAPIICB -> EIICBP + EIIA; compartment*(k8f*EIIAPIICB - k8r*EIIA*EIICBP);
    k8f = 2640; k8r = 960;
  v9: EIICBP + $Glc -> EIICBPGlc; compartment*(k9f*EIICBP*Glc - k9r*EIICBPGlc);
    k9f = 260; k9r = 389;
  v10: EIICBPGlc -> EIICB + $GlcP; compartment*(k10f*EIICBPGlc - k10r*EIICB*GlcP);
    k10f = 4800; k10r = 0.0054;

  // Unit definitions:
  unit substance = 1e-6 mole; substance is "micromole (default)";
  unit time = 60 second; time is "minute (default)";
end
