// SBML level 2 version 1

model Marhl_Calcium_Oscillations_role_of_mitochondria_and_cytosolic_proteins()
  // Marhl2000_CaOscillations
  // In order to reproduce the model, the volume of all compartment is set to 1, and the stoichiometry of CaER and CaM has been set to 0.25, corresponding to betaER/rhoER and betaM/rhoM described in the paper.
  // This model originates from BioModels Database: A Database of Annotated Published Models. It is copyright (c) 2005-2007 The BioModels Team.
  // For more information see the terms of use.

  // Compartments:
  compartment Cytosol = 1;
  compartment Endoplasmic_Reticulum in Cytosol = 1;
  compartment Mitochondria in Cytosol = 1;

  // Species:
  species Ca_cyt in Cytosol = 0.35;
  species CaER in Endoplasmic_Reticulum = 0.76;
  species CaM in Mitochondria = 0.29;
  species CaPr in Cytosol = 85.45;
  species Pr in Cytosol = 34.55;

  // Reactions:
  Jch: 0.25 CaER => Ca_cyt; Cytosol*(Kch*Ca_cyt^2*(CaER - Ca_cyt)/(K1^2 + Ca_cyt^2));
    Kch = 4100; K1 = 5;
  Jleak: 0.25 CaER => Ca_cyt; Cytosol*Kleak*(CaER - Ca_cyt);
    Kleak = 0.05;
  Jpump: Ca_cyt => 0.25 CaER; Endoplasmic_Reticulum*Kpump*Ca_cyt;
    Kpump = 20;
  Jout: 0.25 CaM => Ca_cyt; Cytosol*CaM*(Kout*Ca_cyt^2/(K3^2 + Ca_cyt^2) + Km);
    Kout = 125; K3 = 5; Km = 0.00625;
  Jin: Ca_cyt => 0.25 CaM; Mitochondria*(Kin*Ca_cyt^8/(K2^8 + Ca_cyt^8));
    Kin = 300; K2 = 0.8;
  dissociation_of_CaPr: CaPr => Pr + Ca_cyt; Cytosol*Kminus*CaPr;
    Kminus = 0.01;
  binding_of_Ca_on_Pr: Pr + Ca_cyt => CaPr; Cytosol*Kplus*Ca_cyt*Pr;
    Kplus = 0.1;

  // Unit definitions:
  unit substance = 1e-6 mole; substance is "micromole (default)";
end
