// SBML level 2 version 1

model Kongas___Van_Beek()
  // Kongas2001_creatine
  // The model has been designed according to the spirit of the paper. In particular, the list of rate in the appendix has been corrected as follow:
  // d[ATP]/dt = (-Vhyd -Vmmck +Jatp) / Vcyt
  // d[ADP]/dt = ( Vhyd +Vmmck +Jadp) / Vcyt
  // d[PCr]/dt = ( Vmmck +Jpcr ) / Vcyt
  // d[Cr]/dt = (-Vmmck +Jpcr ) / Vcyt
  // d[Pi]/dt = ( Vhyd + Jpi ) / Vcyt
  // d[ATPi]/dt = (+Vsyn -Vmick -Jatp) / Vims
  // d[ADPi]/dt = (-Vsyn +Vmick -Jadp) / Vims
  // d[PCri]/dt = ( Vmick -Jpcr ) / Vims
  // d[Cri]/dt = (-Vmick -Jpcr ) / Vims
  // d[Pii]/dt = (-Vsyn -Jpi ) / Vims
  // This model originates from BioModels Database: A Database of Annotated Published Models. It is copyright (c) 2005-2007 The BioModels Team.
  // For more information see the terms of use.

  // Compartments:
  compartment IMS = 0.0625;
  compartment CYT = 0.75;

  // Species:
  species ADPi in IMS = 0;
  species ATPi in IMS = 0;
  species Cri in IMS = 0;
  species PCri in IMS = 0;
  species PCr in CYT = 0;
  species ADP in CYT = 0;
  species ATP in CYT = 9700;
  species Cr in CYT = 26000;
  species Pi in IMS = 32000; Pi is "Pii";
  species P in CYT = 0; P is "Pi";

  // Reactions:
  OxPhos: ADPi + Pi -> ATPi; IMS*(V_1*ADPi*Pi/(Ka_1*Kb_1*(1 + ADPi/Ka_1 + Pi/Kb_1 + ADPi*Pi/(Ka_1*Kb_1)))); OxPhos is "Vsyn";
    V_1 = 4600; Ka_1 = 800; Kb_1 = 20;
  MiCK: ATPi + Cri -> ADPi + PCri; IMS*((Vf_2*ATPi*Cri/(Kia_2*Kb_2) - Vb_2*ADPi*PCri/(Kic_2*Kd_2))/(1 + Cri/Kib_2 + PCri/Kid_2 + ATPi*(1/Kia_2 + Cri/(Kia_2*Kb_2)) + ADPi*(1/Kic_2 + Cri/(Kic_2*Kib_2) + PCri/(Kid_2*(Kic_2*Kd_2/Kid_2))))); MiCK is "Vmick";
    Vf_2 = 2658; Kia_2 = 750; Kb_2 = 5200; Vb_2 = 11160; Kic_2 = 204.8; Kd_2 = 500; Kib_2 = 28800; Kid_2 = 1600;
  MMCK: ATP + Cr -> PCr + ADP; CYT*((Vf_3*ATP*Cr/(Kia_3*Kb_3) - Vb_3*ADP*PCr/(Kic_3*Kd_3))/(1 + Cr/Kib_3 + PCr/Kid_3 + ATP*(1/Kia_3 + Cr/(Kia_3*Kb_3)) + ADP*(1/Kic_3 + Cr/(Kic_3*Kib_3) + PCr/(Kid_3*(Kic_3*Kd_3/Kid_3))))); MMCK is "Vmmck";
    Vf_3 = 6966; Kia_3 = 900; Kb_3 = 15500; Vb_3 = 29250; Kic_3 = 222.4; Kd_3 = 1670; Kib_3 = 34900; Kid_3 = 4730;
  ATPase: ATP => ADP + P; CYT*v_4*ATP; ATPase is "Vhyd";
    v_4 = 4600;
  Pi_diffusion: Pi -> P; IMS*k2_5*Pi - CYT*k2_5*P; Pi_diffusion is "Jpi";
    k2_5 = 18.4;
  Cr_diffusion: Cri -> Cr; IMS*k1_6*Cri - CYT*k1_6*Cr; Cr_diffusion is "Jcr";
    k1_6 = 14.6;
  ADP_diffusion: ADPi -> ADP; IMS*k1_7*ADPi - CYT*k1_7*ADP; ADP_diffusion is "Jadp";
    k1_7 = 8.16;
  PCr_diffusion: PCri -> PCr; IMS*k1_8*PCri - CYT*k1_8*PCr; PCr_diffusion is "Jpcr";
    k1_8 = 14.6;
  ATP_diffusion: ATPi -> ATP; IMS*k1_9*ATPi - CYT*k1_9*ATP; ATP_diffusion is "Jatp";
    k1_9 = 8.16;

  // Unit definitions:
  unit substance = 1e-6 mole; substance is "micromole";
end
