// SBML level 2 version 1

model Glycolysis_Nielsen()
  // Nielsen1998_Glycolysis
  // Reference: Nielsen et al; Biophys. Chem. (1998) 72:49-62
  // The reaction looks like this:
  // reaction_1: GLC + ATP -> F6P + ADP;
  // reaction_2: F6P + ATP -> FBP + ADP;
  // reaction_3: FBP => 2 * GAP;
  // reaction_4: GAP + NAD -> DPG + NADH;
  // reaction_5: DPG + ADP => PEP + ATP;
  // reaction_6: PEP + ADP -> PYR + ATP;
  // reaction_7: PYR -> ACA;
  // reaction_8: ACA + NADH => EtOH + NAD;
  // reaction_9: AMP + ATP => 2 * ADP;
  // reaction_10: F6P -> P;
  // flow reactor:
  // flow = 1.1e-2 reactorvolume/s
  // inflow concentrations:
  // ATP = 3.5 mM
  // ADP = 1.1 mM
  // NADH = 0.24 mM
  // NAD = 4.0 mM
  // GLC = 50 mM
  // specific flow rates (in reactorvolume/seconds):
  // flow = 1.1e-2 : periodic oscillations
  // flow = 8.25e-3 : complex periodic oscillations
  // flow = 8.154e-3 : complex periodic oscillations
  // flow = 1e-3 : harmonic periodic oscillations
  // V4 = 10 mM/s instead of 20 in the paper, in order to reproduce the figures.
  // we can reproduce the results from the paper only If we interpret the *seconds* for the constants from table 2 as *minutes* (to correspond to the flow units in figure 9)
  // Initial amounts are taken from a version of the model on JWS Online because table 3 of the paper contains only the input flows for the reactor and no initial conditions for the various species.
  // This model originates from BioModels Database: A Database of Annotated Published Models. It is copyright (c) 2005-2007 The BioModels Team.
  // For more information see the terms of use.

  // Compartments:
  compartment compartment = 1;

  // Species:
  species ATP in compartment = 4.49064/compartment;
  species ADP in compartment = 0.108367/compartment;
  species AMP in compartment = 0.00261149/compartment;
  species GLC in compartment = 0.0112817/compartment;
  species F6P in compartment = 0.65939/compartment;
  species FBP in compartment = 0.00770135/compartment;
  species GAP in compartment = 0.00190919/compartment;
  species NAD in compartment = 3.62057/compartment;
  species NADH in compartment = 0.616118/compartment;
  species DPG in compartment = 0.299109/compartment;
  species PEP in compartment = 0.0021125/compartment;
  species PYR in compartment = 0.00422702/compartment;
  species ACA in compartment = 0.0738334/compartment;
  species EtOH in compartment = 0.33981/compartment;
  species P in compartment = 0;

  // Parameters:
  V1 = 0.5;
  K1GLC = 0.1;
  K1ATP = 0.063;
  V2 = 1.5;
  K2 = 0.0016;
  k2 = 0.017;
  K2ATP = 0.01;
  k3f = 1;
  k3b = 50;
  V4 = 10;
  K4GAP = 1;
  K4NAD = 1;
  k5f = 1;
  k5b = 0.5;
  V6 = 10;
  K6PEP = 0.2;
  K6ADP = 0.3;
  V7 = 2;
  K7PYR = 0.3;
  k8f = 1;
  k8b = 0.000143;
  k9f = 10;
  k9b = 10;
  k10 = 0.05;
  flow = 0.011;

  // Reactions:
  ATPflow: -> ATP; compartment*(3.5 - ATP)*flow;
  ADPflow: -> ADP; compartment*(1.1 - ADP)*flow;
  NADHflow: -> NADH; compartment*(0.24 - NADH)*flow;
  NADflow: -> NAD; compartment*(4 - NAD)*flow;
  GLCflow: -> GLC; compartment*(50 - GLC)*flow;
  F6Pflow: F6P => ; compartment*F6P*flow;
  FBPflow: FBP => ; compartment*FBP*flow;
  GAPflow: GAP => ; compartment*GAP*flow;
  DPGflow: DPG => ; compartment*DPG*flow;
  PEPflow: PEP => ; compartment*PEP*flow;
  PYRflow: PYR => ; compartment*PYR*flow;
  ACAflow: ACA => ; compartment*ACA*flow;
  EtOHflow: EtOH => ; compartment*EtOH*flow;
  AMPflow: AMP => ; compartment*AMP*flow;
  Pflow: P => ; compartment*P*flow;
  reaction_1: GLC + ATP => F6P + ADP; compartment*(V1*ATP*GLC/((K1GLC + GLC)*(K1ATP + ATP)));
  reaction_2: F6P + ATP => FBP + ADP; compartment*(V2*ATP*F6P^2/((K2*(1 + k2*(ATP/AMP)^2) + F6P^2)*(K2ATP + ATP)));  // modifiers: AMP
  reaction_3: FBP -> 2 GAP; compartment*(k3f*FBP - k3b*GAP^2);
  reaction_4: GAP + NAD => DPG + NADH; compartment*(V4*NAD*GAP/((K4GAP + GAP)*(K4NAD + NAD)));
  reaction_5: DPG + ADP -> PEP + ATP; compartment*(k5f*DPG*ADP - k5b*PEP*ATP);
  reaction_6: PEP + ADP => PYR + ATP; compartment*(V6*ADP*PEP/((K6PEP + PEP)*(K6ADP + ADP)));
  reaction_7: PYR => ACA; compartment*(V7*PYR/(K7PYR + PYR));
  reaction_8: ACA + NADH -> EtOH + NAD; compartment*(k8f*NADH*ACA - k8b*NAD*EtOH);
  reaction_9: AMP + ATP -> 2 ADP; compartment*(k9f*AMP*ATP - k9b*ADP^2);
  reaction_10: F6P => P; compartment*k10*F6P;

  // Unit definitions:
  unit substance = 1e-3 mole; substance is "millimole";
  unit time = 60 second; time is "minute";
end
