// SBML level 2 version 1

model Goldbeter_Calcium_Oscillation_based_on_CICR_AND_CA_channel_inhibition()
  // Borghans1997_CaOscillation_model1
  // This model originates from BioModels Database: A Database of Annotated Published Models. It is copyright (c) 2005-2007 The BioModels Team.
  // For more information see the terms of use.

  // Compartments:
  compartment extracellular = 1;
  compartment cytosol in extracellular = 1;
  compartment intravesicular in cytosol = 1;

  // Species:
  species EC in extracellular = 0;
  species Z in cytosol = 0;
  species Rho in cytosol = 0;
  species Y in intravesicular = 0.36;
  species Fraction_Inactive_Channels in cytosol = 0;

  // Parameters:
  a = 40000;
  d = 100;
  beta = 1;

  // Reactions:
  vin: EC => Z; cytosol*(v0 + v1*beta);
    v0 = 1; v1 = 1;
  v2: Z => Y; intravesicular*(Vm2*Z^2/(K2^2 + Z^2));
    Vm2 = 6.5; K2 = 0.1;
  v3: Y => Z; cytosol*(beta*(Rho*(a/d)*Z^4/(1 + a/d*Z^4))*Vm3*Y^2/(Ky^2 + Y^2));  // modifiers: Rho
    Vm3 = 50; Ky = 0.2;
  v4: Y => Z; cytosol*Kf*Y;
    Kf = 1;
  v5: Z => EC; extracellular*K*Z;
    K = 10;
  v6: Rho => Fraction_Inactive_Channels; cytosol*Kd*Z^4*Rho;  // modifiers: Z
    Kd = 5000;
  v7: Fraction_Inactive_Channels => Rho; cytosol*Kr*(1 - Rho);
    Kr = 5;

  // Unit definitions:
  unit substance = 1e-6 mole; substance is "micromole (default)";
  unit time = 60 second; time is "minute (default)";
end
