// SBML level 2 version 1

model Goldbeter_Calcium_Oscillation_based_on_CICR_AND_CA_Activated_degradation_of_IP3()
  // Borghans1997_CaOscillation_model2
  // This model originates from BioModels Database: A Database of Annotated Published Models. It is copyright (c) 2005-2007 The BioModels Team.
  // For more information see the terms of use.

  // Compartments:
  compartment extracellular = 1;
  compartment cytosol in extracellular = 1;
  compartment intravesicular in cytosol = 1;

  // Species:
  species EC in extracellular = 1000;
  species Z in cytosol = 0;
  species A in cytosol = 0.45;
  species Y in intravesicular = 0.36;
  species Agonist_stimulated_production_of_IP3 in cytosol = 0;
  species Ca_dependant_IP3_degradation in cytosol = 0;
  species Ca_independant_IP3_degradation in cytosol = 0;

  // Parameters:
  beta = 0.5;

  // Reactions:
  vin: EC => Z; cytosol*(v0 + v1*beta);
    v0 = 2; v1 = 1;
  v2: Z => Y; intravesicular*(Vm2*Z^2/(K2^2 + Z^2));
    Vm2 = 6.5; K2 = 0.1;
  v3: Y => Z; cytosol*Vm3*A^4*Y^2*Z^4/((Ka^4 + A^4)*(Ky^2 + Y^2)*(Kz^4 + Z^4));  // modifiers: A
    Vm3 = 19.5; Ka = 0.2; Ky = 0.2; Kz = 0.3;
  v4: Y => Z; cytosol*Kf*Y;
    Kf = 1;
  v5: Z => EC; extracellular*K*Z;
    K = 10;
  v6: Agonist_stimulated_production_of_IP3 => A; cytosol*beta*Vp;
    Vp = 2.5;
  v7: A => Ca_dependant_IP3_degradation; cytosol*Vd*A^2*Z^n/((Kp^2 + A^2)*(Kd^n + Z^n));  // modifiers: Z
    Vd = 80; Kp = 1; Kd = 0.4; n = 4;
  v8: A => Ca_independant_IP3_degradation; cytosol*epsilon*A;
    epsilon = 0.1;

  // Unit definitions:
  unit substance = 1e-6 mole; substance is "micromole (default)";
  unit time = 60 second; time is "minute (default)";
end
