// SBML level 2 version 1

model Goldbeter_Calcium_Oscillation_based_onCICR_AND_two_pool_model()
  // Borghans1997_CaOscillation_model3
  // This model originates from BioModels Database: A Database of Annotated Published Models. It is copyright (c) 2005-2007 The BioModels Team.
  // For more information see the terms of use.

  // Compartments:
  compartment extracellular = 1;
  compartment cytosol in extracellular = 1;
  compartment intravesicular1 in cytosol = 1;
  compartment intravesicular2 in cytosol = 1;

  // Species:
  species EC in extracellular = 0;
  species Z in cytosol = 0;
  species Y in intravesicular2 = 0;
  species X in intravesicular1 = 0.5;

  // Parameters:
  beta = 1;

  // Reactions:
  vin: EC => Z; cytosol*(v0 + v1*beta);
    v0 = 0.015; v1 = 0.012;
  v2i: Z => Y; intravesicular2*Vm2i*Z^2/(K2i^2 + Z^2);
    Vm2i = 3.1; K2i = 0.005;
  v3i: Y => Z; cytosol*Vm3i*Y^2*Z^2/((K3y^2 + Y^2)*(K3z^2 + Z^2));
    Vm3i = 25; K3y = 0.065; K3z = 0.022;
  v4: Y => Z; cytosol*v4_Kf*Y;
    v4_Kf = 0.5;
  v5: Z => EC; extracellular*K*Z;
    K = 1;
  v6: X => Z; cytosol*v6_Kf*X;
    v6_Kf = 0.5;
  v2s: Z => X; intravesicular1*Vm2s*Z^2/(K2s^2 + Z^2);
    Vm2s = 1.5; K2s = 0.0265;
  v3s: X => Z; cytosol*beta*Vm3s*X^2/(K3s^2 + X^2);
    Vm3s = 0.169; K3s = 0.1;

  // Unit definitions:
  unit substance = 1e-6 mole; substance is "micromole (default)";
  unit time = 60 second; time is "minute (default)";
end
