// SBML level 2 version 1

model Olsen2003_peroxidase()
  // Notes of the BioModels curators:
  // The current model reproduce the figure 7, panel B of the paper. Note that there is a typo in the figure. The ordinates represent the concentration of peroxyde, as stated in the legend, and not of oxygen. The model has been tested in COPASI (http://www.copasi.org/, build 13).
  // Notes of the original version of the SBML file:
  // SBML level 2 code generated for the JWS Online project by Jacky Snoep using PySCeS
  // Run this model online at http://jjj.biochem.sun.ac.za
  // To cite JWS Online please refer to: Olivier, B.G. and Snoep, J.L. (2004) Web-based modelling using JWS Online, Bioinformatics, 20:2143-2144
  // This model originates from BioModels Database: A Database of Annotated Published Models. It is copyright (c) 2005-2007 The BioModels Team.
  // For more information see the terms of use.

  // Compartments:
  compartment compartment = 1;

  // Species:
  species NADH in compartment = 0;
  species O2 in compartment = 0;
  species H2O2 in compartment = 0;
  species per3 in compartment = 1.4;
  species coI in compartment = 0;
  species ArH in compartment = 500;
  species coII in compartment = 0;
  species Ar in compartment = 0;
  species NADrad in compartment = 0;
  species super in compartment = 0;
  species coIII in compartment = 0;
  species per2 in compartment = 0;
  species $NAD2 in compartment = 0;
  species $NAD in compartment = 0;
  species $O2g in compartment = 12;
  species $NADHres in compartment = 0;

  // Reactions:
  v1: NADH + O2 -> H2O2 + $NAD; compartment*k1*NADH*O2;
    k1 = 3e-6;
  v2: per3 + H2O2 -> coI; compartment*k2*H2O2*per3;
    k2 = 18;
  v3: ArH + coI -> Ar + coII; compartment*k3*coI*ArH;
    k3 = 0.15;
  v4: coII + ArH -> per3 + Ar; compartment*k4*coII*ArH;
    k4 = 0.0052;
  v5: NADrad + O2 -> $NAD + super; compartment*k5*NADrad*O2;
    k5 = 20;
  v6: per3 + super -> coIII; compartment*k6*super*per3;
    k6 = 17;
  v7: 2 super -> H2O2 + O2; compartment*k7*super*super;
    k7 = 20;
  v8: NADrad + coIII -> $NAD + coI; compartment*k8*coIII*NADrad;
    k8 = 40;
  v9: 2 NADrad -> $NAD2; compartment*k9*NADrad*NADrad;
    k9 = 60;
  v10: per3 + NADrad -> per2 + $NAD; compartment*k10*per3*NADrad;
    k10 = 1.8;
  v11: per2 + O2 -> coIII; compartment*k11*per2*O2;
    k11 = 0.1;
  v12: $NADHres -> NADH; compartment*k12;
    k12 = 0.08;
  v131: $O2g -> O2; compartment*k13f*O2g;
    k13f = 0.006;
  v132: O2 -> $O2g; compartment*k13b*O2;
    k13b = 0.006;
  v14: NADH + Ar -> NADrad + ArH; compartment*k14*Ar*NADH;
    k14 = 0.7;

  // Unit definitions:
  unit substance = 1e-6 mole; substance is "micromole";
end
