// SBML level 2 version 1

model Oxhamre_Bacteria_induced_Ca_oscillations()
  // Oxhamre2005_Ca_oscillation
  // The model should reproduce the figure 1C of the article (successfully reproduced in MathSBML). If your software does not support the variable "time", you can replace the assignmentRule:
  // n = n0 * [ exp(-kbN*time) + kappa * (1 - exp(-kbN*time))]
  // by
  // n = n0 * kappa
  // This model originates from BioModels Database: A Database of Annotated Published Models. It is copyright (c) 2005-2007 The BioModels Team.
  // For more information see the terms of use.

  // Compartments:
  compartment Cytosol = 1;
  compartment Endoplasmic_Reticulum in Cytosol = 1;

  // Species:
  species CaER in Endoplasmic_Reticulum = 0;
  species Ca_Cyt in Cytosol = 0;

  // Parameters:
  n0 = 1;
  kbN = 0.5;
  kappa = 5;
  p11 = 0.2;
  p12 = 0.8;
  K1 = 5;
  K2 = 0.7;
  p3 = 0.95;
  k31 = 0.5;
  K3 = 0.7;

  // Assignment rules:
  n := n0*(exp(-kbN*time) + kappa*(1 - exp(-kbN*time)));
  p1 := p11 + p12*n/(K1 + n);
  p2 := Ca_Cyt/(K2 + Ca_Cyt);

  // Rate rules:
  p3' = -(k31*Ca_Cyt*p3) + k31*K3*(1 - p3);

  // Reactions:
  Jch: CaER => Ca_Cyt; Fch_0*p1*p2*p3;
    Fch_0 = 8;
  Jleak: CaER => Ca_Cyt; Fleak;
    Fleak = 0.5;
  Jpump: Ca_Cyt => CaER; Fpump_0*Ca_Cyt/(Kpump + Ca_Cyt);
    Fpump_0 = 2; Kpump = 0.1;

  // Unit definitions:
  unit substance = 1e-6 mole; substance is "micromole (default)";
  unit time = 60 second; time is "minute (default)";
end
