// SBML level 2 version 1

model Kholodenko1999_EGFRsignaling()
  // SBML level 2 code generated for the JWS Online project by Jacky Snoep using PySCeS
  // Run this model online at http://jjj.biochem.sun.ac.za
  // To cite JWS Online please refer to: Olivier, B.G. and Snoep, J.L. (2004) Web-based modelling using JWS Online, Bioinformatics, 20:2143-2144
  // The model correctly reproduces all the figures from the paper. The curation has been done using SBMLodeSolver.
  // This model originates from BioModels Database: A Database of Annotated Published Models. It is copyright (c) 2005-2007 The BioModels Team.
  // For more information see the terms of use.

  // Compartments:
  // Default size of compartment is 1e-10 litre by comparison with the article.
  compartment compartment = 3e-12; compartment is "cytoplasm";

  // Species:
  species EGF in compartment = 680; EGF is "Epidermal_Growth_Factor";
  species R in compartment = 100; R is "EGFR";
  species Ra in compartment = 0; Ra is "EGF_EGFR";
  species EGF_EGFR_2 in compartment = 0; EGF_EGFR_2 is "(EGF_EGFR)2";
  species RP in compartment = 0; RP is "(EGF_EGFR)2-P";
  species PLCg in compartment = 105;
  species RPLCg in compartment = 0; RPLCg is "(EGF_EGFR)2_PLCg";
  species RPLCgP in compartment = 0; RPLCgP is "(EGF_EGFR)2_PLCg-P";
  species PLCgP in compartment = 0; PLCgP is "PLCg-P";
  species Grb in compartment = 85; Grb is "Grb2";
  species RG in compartment = 0; RG is "(EGF_EGFR)2_Grb2";
  species SOS in compartment = 34;
  species RGS in compartment = 0; RGS is "(EGF_EGFR)2_Grb2_SOS";
  species GS in compartment = 0; GS is "Grb2_SOS";
  species Shc in compartment = 150;
  species RSh in compartment = 0; RSh is "(EGF_EGFR)2_Shc";
  species RShP in compartment = 0; RShP is "(EGF_EGFR)_Shc-P";
  species ShP in compartment = 0; ShP is "Shc-P";
  species RShG in compartment = 0; RShG is "(EGF_EGFR)2_Shc_Grb2";
  species ShG in compartment = 0; ShG is "Shc_Grb2";
  species RShGS in compartment = 0; RShGS is "(EGF_EGFR)2_Shc_Grb2_SOS";
  species ShGS in compartment = 0; ShGS is "Shc_Grb2_SOS";
  species PLCgl in compartment = 0; PLCgl is "PLCgP-I";

  // Reactions:
  EGF_binds_to_EGFR: R + EGF -> Ra; (k1f*R*EGF - k1b*Ra)*compartment;
    k1f = 0.003; k1b = 0.06;
  association_of_2_Ra_into_dimer: 2 Ra -> EGF_EGFR_2; (k2f*Ra*Ra - k2b*EGF_EGFR_2)*compartment;
    k2f = 0.01; k2b = 0.1;
  phosphorylation_of_R2: EGF_EGFR_2 -> RP; (k3f*EGF_EGFR_2 - k3b*RP)*compartment;
    k3f = 1; k3b = 0.01;
  // According to the artical, this dephosphorylation of RP should be irriversible.
  dephosphorylation_of_RP: RP => EGF_EGFR_2; V4*RP/(K4 + RP)*compartment;
    V4 = 450; K4 = 50;
  binding_of_PLCg_to_RP: RP + PLCg -> RPLCg; (k5f*RP*PLCg - k5b*RPLCg)*compartment;
    k5f = 0.06; k5b = 0.2;
  phosphorylation_of_PLCg: RPLCg -> RPLCgP; (k6f*RPLCg - k6b*RPLCgP)*compartment;
    k6f = 1; k6b = 0.05;
  dissociation_of_RPLCgP: RPLCgP -> PLCgP + RP; (k7f*RPLCgP - k7b*RP*PLCgP)*compartment;
    k7f = 0.3; k7b = 0.006;
  // Dephosphorylation is irriversible, according to article.
  dephosphorylation_of_PLCgP: PLCgP => PLCg; V8*PLCgP/(K8 + PLCgP)*compartment;
    V8 = 1; K8 = 100;
  binding_of_Grb2_to_RP: Grb + RP -> RG; (k9f*RP*Grb - k9b*RG)*compartment;
    k9f = 0.003; k9b = 0.05;
  binding_of_SOS_to_RG: RG + SOS -> RGS; (k10f*RG*SOS - k10b*RGS)*compartment;
    k10f = 0.01; k10b = 0.06;
  dissociation_of_RGS: RGS -> GS + RP; (k11f*RGS - k11b*RP*GS)*compartment;
    k11f = 0.03; k11b = 0.0045;
  dissociation_of_GS: GS -> Grb + SOS; (k12f*GS - k12b*Grb*SOS)*compartment;
    k12f = 0.0015; k12b = 0.0001;
  binding_of_Shc_to_RP: Shc + RP -> RSh; (k13f*RP*Shc - k13b*RSh)*compartment;
    k13f = 0.09; k13b = 0.6;
  phosphorylation_of_RSh: RSh -> RShP; (k14f*RSh - k14b*RShP)*compartment;
    k14f = 6; k14b = 0.06;
  dissociation_of_RShp: RShP -> RP + ShP; (k15f*RShP - k15b*ShP*RP)*compartment;
    k15f = 0.3; k15b = 0.0009;
  // Dephosphorylation is irriversible, according to artical.
  dephosphorylation_of_ShP: ShP => Shc; V16*ShP/(K16 + ShP)*compartment;
    V16 = 1.7; K16 = 340;
  binding_of_Grb2_to_RShP: RShP + Grb -> RShG; (k17f*RShP*Grb - k17b*RShG)*compartment;
    k17f = 0.003; k17b = 0.1;
  dissociation_of_RShG: RShG -> ShG + RP; (k18f*RShG - k18b*RP*ShG)*compartment;
    k18f = 0.3; k18b = 0.0009;
  binding_of_SOS_to_RShG: SOS + RShG -> RShGS; (k19f*RShG*SOS - k19b*RShGS)*compartment;
    k19f = 0.01; k19b = 0.0214;
  dissociation_of_RShGS: RShGS -> ShGS + RP; (k20f*RShGS - k20b*ShGS*RP)*compartment;
    k20f = 0.12; k20b = 0.00024;
  binding_of_Grb2_to_ShP: Grb + ShP -> ShG; (k21f*ShP*Grb - k21b*ShG)*compartment;
    k21f = 0.003; k21b = 0.1;
  binding_of_SOS_to_ShG: ShG + SOS -> ShGS; (k22f*ShG*SOS - k22b*ShGS)*compartment;
    k22f = 0.03; k22b = 0.064;
  dissociation_of_ShGS: ShGS -> GS + ShP; (k23f*ShGS - k23b*ShP*GS)*compartment;
    k23f = 0.1; k23b = 0.021;
  association_of_RShP_and_GS: RShP + GS -> RShGS; (k24f*RShP*GS - k24b*RShGS)*compartment;
    k24f = 0.009; k24b = 0.0429;
  translocation_of_PLCgP: PLCgP -> PLCgl; (k25f*PLCgP - k25b*PLCgl)*compartment;
    k25f = 1; k25b = 0.03;

  // Unit definitions:
  // Default unit of substance redefined to nanomole.
  unit substance = 1e-9 mole; substance is "nanomole";
end
