// SBML level 2 version 1

model Chassagnole2002_Carbon_Metabolism()
  // The model reproduces Figures 4,5 and 6 of the publication. The analytical functions for cometabolites Catp, Camp, Cnadph, and Cnadp slightly differ from the equations given in the paper. These changes were made in consultation with Dr. Christophe Chassagnole and are essential for reproducing the figures. The dependency of the rate of change of extracellular glucose concentration on the ratio of biomass concentration to specific weight of biomass (Cx*rPTS/Rhox) is taken into account by appropriately adjusting the stoichiometries of the species involved in the phosphotransferase system (rPTS). The rmax values for the various reactions are obtained from experiments and are not provided in the paper. However, these were personally communicated to the JWS repository. The model has been successfully tested on MathSBML.
  // SBML level 2 code generated for the JWS Online project by Jacky Snoep using PySCeS
  // Run this model online at http://jjj.biochem.sun.ac.za
  // To cite JWS Online please refer to: Olivier, B.G. and Snoep, J.L. (2004) Web-based modelling using JWS Online, Bioinformatics, 20:2143-2144
  // This model originates from BioModels Database: A Database of Annotated Published Models. It is copyright (c) 2005-2007 The BioModels Team.
  // For more information see the terms of use.

  // Compartments:
  compartment extracellular = 1;
  compartment cytosol in extracellular = 1;

  // Species:
  species cpep in cytosol = 2.67; cpep is "Phosphoenol pyruvate";
  species cglcex in extracellular = 2; cglcex is "Extracellular Glucose";
  species cg6p in cytosol = 3.48; cg6p is "Glucose-6-Phosphate";
  species cpyr in cytosol = 2.67; cpyr is "Pyruvate";
  species cf6p in cytosol = 0.6; cf6p is "Fructose-6-Phosphate";
  species cg1p in cytosol = 0.653; cg1p is "Glucose-1-Phosphate";
  species cpg in cytosol = 0.808; cpg is "6-Phosphogluconate";
  species cfdp in cytosol = 0.272; cfdp is "Fructose-1,6-bisphosphate";
  species csed7p in cytosol = 0.276; csed7p is "sedoheptulose-7-phosphate";
  species cgap in cytosol = 0.218; cgap is "Glyceraldehyde-3-Phosphate";
  species ce4p in cytosol = 0.098; ce4p is "Erythrose-4-phosphate";
  species cxyl5p in cytosol = 0.138; cxyl5p is "Xylulose-5-phosphate";
  species crib5p in cytosol = 0.398; crib5p is "Ribose-5-phosphate";
  species cdhap in cytosol = 0.167; cdhap is "Dihydroxyacetonephosphate";
  species cpgp in cytosol = 0.008; cpgp is "1,3-diphosphosphoglycerate";
  species cpg3 in cytosol = 2.13; cpg3 is "3-Phosphoglycerate";
  species cpg2 in cytosol = 0.399; cpg2 is "2-Phosphoglycerate";
  species cribu5p in cytosol = 0.111; cribu5p is "Ribulose-5-phosphate";

  // Parameters:
  catp has mM;
  cadp has mM;
  camp has mM;
  cnadp has mM;
  cnadph has mM;
  cnad has mM;
  cnadh has mM;

  // Assignment rules:
  catp := 4.27 - 4.163*(time/(0.657 + 1.43*time + 0.0364*time^2));
  cadp := 0.582 + 1.73*2.731^(-0.15*time)*(0.12*time + 0.000214*time^3);
  camp := 0.123 + 7.25*(time/(7.25 + 1.47*time + 0.17*time^2)) + 1.073/(1.29 + 8.05*time);
  cnadph := 0.062 + 0.332*2.718^(-0.464*time)*(0.0166*time^1.58 + 0.000166*time^4.73 + 0.1312*10^(-9)*time^7.89 + 0.1362*10^(-12)*time^11 + 0.1233*10^(-15)*time^14.2);
  cnadp := 0.159 - 0.00554*(time/(2.8 - 0.271*time + 0.01*time^2)) + 0.182/(4.82 + 0.526*time);
  cnadh := 0.0934 + 0.00111*2.371^(-0.123*time)*(0.844*time + 0.104*time^3);
  cnad := 1.314 + 1.314*2.73^(-0.0435*time - 0.342) - (time + 7.871)*(2.73^(-0.0218*time - 0.171)/(8.481 + time));

  // Reactions:
  vPTS: cglcex + 65 cpep -> 65 cg6p + 65 cpyr; extracellular*rmaxPTS*cglcex*(cpep/cpyr)/((KPTSa1 + KPTSa2*(cpep/cpyr) + KPTSa3*cglcex + cglcex*(cpep/cpyr))*(1 + cg6p^nPTSg6p/KPTSg6p)); vPTS is "Phosphotransferase system";
    rmaxPTS = 7829.78 mM_per_second; KPTSa1 = 3082.3 mM; KPTSa2 = 0.01 mM; KPTSa3 = 245.3 dimensionless; nPTSg6p = 3.66 dimensionless; KPTSg6p = 2.15 mM;
  vPGI: cg6p -> cf6p; cytosol*rmaxPGI*(cg6p - cf6p/KPGIeq)/(KPGIg6p*(1 + cf6p/(KPGIf6p*(1 + cpg/KPGIf6ppginh)) + cpg/KPGIg6ppginh) + cg6p); vPGI is "Glucose-6-phosphate isomerase";  // modifiers: cpg
    rmaxPGI = 650.9879 mM_per_second; KPGIeq = 0.1725 dimensionless; KPGIg6p = 2.9 mM; KPGIf6p = 0.266 mM; KPGIf6ppginh = 0.2 mM; KPGIg6ppginh = 0.2 mM;
  vPGM: cg6p -> cg1p; cytosol*rmaxPGM*(cg6p - cg1p/KPGMeq)/(KPGMg6p*(1 + cg1p/KPGMg1p) + cg6p); vPGM is "Phosphoglucomutase";
    rmaxPGM = 0.8398243 mM_per_second; KPGMeq = 0.196 dimensionless; KPGMg6p = 1.038 mM; KPGMg1p = 0.0136 mM;
  vG6PDH: cg6p -> cpg; cytosol*rmaxG6PDH*cg6p*cnadp/((cg6p + KG6PDHg6p)*(1 + cnadph/KG6PDHnadphg6pinh)*(KG6PDHnadp*(1 + cnadph/KG6PDHnadphnadpinh) + cnadp)); vG6PDH is "Glucose-6-phosphate dehydrogenase";
    rmaxG6PDH = 1.380197 mM_per_second; KG6PDHg6p = 14.4 mM; KG6PDHnadphg6pinh = 6.43 mM; KG6PDHnadp = 0.0246 mM; KG6PDHnadphnadpinh = 0.01 mM;
  vPFK: cf6p -> cfdp; cytosol*rmaxPFK*catp*cf6p/((catp + KPFKatps*(1 + cadp/KPFKadpc))*(cf6p + KPFKf6ps*(1 + cpep/KPFKpep + cadp/KPFKadpb + camp/KPFKampb)/(1 + cadp/KPFKadpa + camp/KPFKampa))*(1 + LPFK/(1 + cf6p*(1 + cadp/KPFKadpa + camp/KPFKampa)/(KPFKf6ps*(1 + cpep/KPFKpep + cadp/KPFKadpb + camp/KPFKampb)))^nPFK)); vPFK is "Phosphofructokinase";  // modifiers: cpep
    rmaxPFK = 1840.585 mM_per_second; KPFKatps = 0.123 mM; KPFKadpc = 4.14 mM; KPFKf6ps = 0.325 mM; KPFKpep = 3.26 mM; KPFKadpb = 3.89 mM; KPFKampb = 3.2 mM; KPFKadpa = 128 mM; KPFKampa = 19.1 mM; LPFK = 5629067 dimensionless; nPFK = 11.1 dimensionless;
  vTA: cgap + csed7p -> cf6p + ce4p; cytosol*rmaxTA*(cgap*csed7p - ce4p*cf6p/KTAeq); vTA is "Transaldolase";
    rmaxTA = 10.87164 mM_per_second; KTAeq = 1.05 dimensionless;
  vTKA: crib5p + cxyl5p -> cgap + csed7p; cytosol*rmaxTKa*(crib5p*cxyl5p - csed7p*cgap/KTKaeq); vTKA is "Transketolase a";
    rmaxTKa = 9.473385 mM_per_second; KTKaeq = 1.2 dimensionless;
  vTKB: ce4p + cxyl5p -> cgap + cf6p; cytosol*rmaxTKb*(cxyl5p*ce4p - cf6p*cgap/KTKbeq); vTKB is "Transketolase b";
    rmaxTKb = 86.55856 mM_per_second; KTKbeq = 10 dimensionless;
  vMURSyNTH: 2 cf6p -> ; cytosol*rmaxMurSynth; vMURSyNTH is "Mureine synthesis";
    rmaxMurSynth = 0.00043711 mM_per_second;
  vALDO: cfdp -> cdhap + cgap; cytosol*rmaxALDO*(cfdp - cgap*cdhap/kALDOeq)/(kALDOfdp + cfdp + kALDOgap*cdhap/(kALDOeq*VALDOblf) + kALDOdhap*cgap/(kALDOeq*VALDOblf) + cfdp*cgap/kALDOgapinh + cgap*cdhap/(VALDOblf*kALDOeq)); vALDO is "Aldolase";
    rmaxALDO = 17.41464 mM_per_second; kALDOeq = 0.144 mM; kALDOfdp = 1.75 mM; kALDOgap = 0.088 mM; VALDOblf = 2 dimensionless; kALDOdhap = 0.088 mM; kALDOgapinh = 0.6 mM;
  vGAPDH: cgap -> cpgp; cytosol*rmaxGAPDH*(cgap*cnad - cpgp*cnadh/KGAPDHeq)/((KGAPDHgap*(1 + cpgp/KGAPDHpgp) + cgap)*(KGAPDHnad*(1 + cnadh/KGAPDHnadh) + cnad)); vGAPDH is "Glyceraldehyde-3-phosphate dehydrogenase";
    rmaxGAPDH = 921.5943 mM_per_second; KGAPDHeq = 0.63 dimensionless; KGAPDHgap = 0.683 mM; KGAPDHpgp = 1.04e-5 mM; KGAPDHnad = 0.252 mM; KGAPDHnadh = 1.09 mM;
  vTIS: cdhap -> cgap; cytosol*rmaxTIS*(cdhap - cgap/kTISeq)/(kTISdhap*(1 + cgap/kTISgap) + cdhap); vTIS is "Triosephosphate isomerase";
    rmaxTIS = 68.67474 mM_per_second; kTISeq = 1.39 dimensionless; kTISdhap = 2.8 mM; kTISgap = 0.3 mM;
  vTRPSYNTH: -> cpyr + cgap; cytosol*rmaxTrpSynth; vTRPSYNTH is "Tryptophan synthesis";
    rmaxTrpSynth = 0.001037 mM_per_second;
  vG3PDH: cdhap -> ; cytosol*rmaxG3PDH*cdhap/(KG3PDHdhap + cdhap); vG3PDH is "Glycerol-3-phosphate dehydrogenase";
    rmaxG3PDH = 0.01162043 mM_per_second; KG3PDHdhap = 1 mM;
  vPGK: cpgp -> cpg3; cytosol*rmaxPGK*(cadp*cpgp - catp*cpg3/KPGKeq)/((KPGKadp*(1 + catp/KPGKatp) + cadp)*(KPGKpgp*(1 + cpg3/KPGKpg3) + cpgp)); vPGK is "Phosphoglycerate kinase";
    rmaxPGK = 3021.774 mM_per_second; KPGKeq = 1934.4 dimensionless; KPGKadp = 0.185 mM; KPGKatp = 0.653 mM; KPGKpgp = 0.0468 mM; KPGKpg3 = 0.473 mM;
  vsersynth: cpg3 -> ; cytosol*rmaxSerSynth*cpg3/(KSerSynthpg3 + cpg3); vsersynth is "Serine synthesis";
    rmaxSerSynth = 0.025712107 mM_per_second; KSerSynthpg3 = 1 mM;
  vrpGluMu: cpg3 -> cpg2; cytosol*rmaxPGluMu*(cpg3 - cpg2/KPGluMueq)/(KPGluMupg3*(1 + cpg2/KPGluMupg2) + cpg3); vrpGluMu is "Phosphoglycerate mutase";
    rmaxPGluMu = 89.04965 mM_per_second; KPGluMueq = 0.188 dimensionless; KPGluMupg3 = 0.2 mM; KPGluMupg2 = 0.369 mM;
  vENO: cpg2 -> cpep; cytosol*rmaxENO*(cpg2 - cpep/KENOeq)/(KENOpg2*(1 + cpep/KENOpep) + cpg2); vENO is "Enolase";
    rmaxENO = 330.4476 mM_per_second; KENOeq = 6.73 mM; KENOpg2 = 0.1 mM; KENOpep = 0.135 mM;
  vPK: cpep -> cpyr; cytosol*rmaxPK*cpep*(cpep/KPKpep + 1)^(nPK - 1)*cadp/(KPKpep*(LPK*((1 + catp/KPKatp)/(cfdp/KPKfdp + camp/KPKamp + 1))^nPK + (cpep/KPKpep + 1)^nPK)*(cadp + KPKadp)); vPK is "Pyruvate kinase";  // modifiers: cfdp
    rmaxPK = 0.0611315 mM_per_second; KPKpep = 0.31 mM; nPK = 4 dimensionless; LPK = 1000 dimensionless; KPKatp = 22.5 mM; KPKfdp = 0.19 mM; KPKamp = 0.2 mM; KPKadp = 0.26 mM;
  vpepCxylase: cpep -> ; cytosol*rmaxpepCxylase*cpep*(1 + (cfdp/KpepCxylasefdp)^npepCxylasefdp)/(KpepCxylasepep + cpep); vpepCxylase is "PEP carboxylase";  // modifiers: cfdp
    rmaxpepCxylase = 0.1070206 mM_per_second; KpepCxylasefdp = 0.7 mM; npepCxylasefdp = 4.21 dimensionless; KpepCxylasepep = 4.07 mM;
  vSynth1: cpep -> ; cytosol*rmaxSynth1*cpep/(KSynth1pep + cpep); vSynth1 is "Synthesis 1";
    rmaxSynth1 = 0.01953897 mM_per_second; KSynth1pep = 1 mM;
  vSynth2: cpyr -> ; cytosol*rmaxSynth2*cpyr/(KSynth2pyr + cpyr); vSynth2 is "Synthesis 2";
    rmaxSynth2 = 0.07361855 mM_per_second; KSynth2pyr = 1 mM;
  vDAHPS: ce4p + cpep -> ; cytosol*rmaxDAHPS*ce4p^nDAHPSe4p*cpep^nDAHPSpep/((KDAHPSe4p + ce4p^nDAHPSe4p)*(KDAHPSpep + cpep^nDAHPSpep)); vDAHPS is "DAHP synthesis";
    rmaxDAHPS = 0.1079531 mM_per_second; nDAHPSe4p = 2.6 dimensionless; nDAHPSpep = 2.2 dimensionless; KDAHPSe4p = 0.035 mM; KDAHPSpep = 0.0053 mM;
  vPDH: cpyr -> ; cytosol*rmaxPDH*cpyr^nPDH/(KPDHpyr + cpyr^nPDH); vPDH is "Pyruvate dehydrogenase";
    rmaxPDH = 6.059531 mM_per_second; nPDH = 3.68 dimensionless; KPDHpyr = 1159 mM;
  vMethSynth: -> cpyr; cytosol*rmaxMetSynth; vMethSynth is "Methionine synthesis";
    rmaxMetSynth = 0.0022627 mM_per_second;
  vPGDH: cpg -> cribu5p; cytosol*rmaxPGDH*cpg*cnadp/((cpg + KPGDHpg)*(cnadp + KPGDHnadp*(1 + cnadph/KPGDHnadphinh)*(1 + catp/KPGDHatpinh))); vPGDH is "6-Phosphogluconate dehydrogenase";
    rmaxPGDH = 16.23236 mM_per_second; KPGDHpg = 37.5 mM; KPGDHnadp = 0.0506 mM; KPGDHnadphinh = 0.0138 mM; KPGDHatpinh = 208 mM;
  vR5PI: cribu5p -> crib5p; cytosol*rmaxR5PI*(cribu5p - crib5p/KR5PIeq); vR5PI is "Ribose-phosphate isomerase";
    rmaxR5PI = 4.83841193 mM_per_second; KR5PIeq = 4 dimensionless;
  vRu5P: cribu5p -> cxyl5p; cytosol*rmaxRu5P*(cribu5p - cxyl5p/KRu5Peq); vRu5P is "Ribulose-phosphate epimerase";
    rmaxRu5P = 6.739029 mM_per_second; KRu5Peq = 1.4 dimensionless;
  vPPK: crib5p -> ; cytosol*rmaxRPPK*crib5p/(KRPPKrib5p + crib5p); vPPK is "Ribose phosphate pyrophosphokinase";
    rmaxRPPK = 0.01290045 mM_per_second; KRPPKrib5p = 0.1 mM;
  vG1PAT: cg1p -> ; cytosol*rmaxG1PAT*cg1p*catp*(1 + (cfdp/KG1PATfdp)^nG1PATfdp)/((KG1PATatp + catp)*(KG1PATg1p + cg1p)); vG1PAT is "Glucose-1-phosphate adenyltransferase";  // modifiers: cfdp
    rmaxG1PAT = 0.007525458 mM_per_second; KG1PATfdp = 0.119 mM; nG1PATfdp = 1.2 mM; KG1PATatp = 4.42 mM; KG1PATg1p = 3.2 mM;
  vG6P: cg6p -> ; cytosol*vG6P_mu*cg6p; vG6P is "G6P degradation";
    vG6P_mu = 2.78e-5 second_inverse;
  vf6P: cf6p -> ; cytosol*vf6P_mu*cf6p; vf6P is "F6P degradation";
    vf6P_mu = 2.78e-5 second_inverse;
  vfdP: cfdp -> ; cytosol*vfdP_mu*cfdp; vfdP is "FDP degradation";
    vfdP_mu = 2.78e-5 second_inverse;
  vGAP: cgap -> ; cytosol*vGAP_mu*cgap; vGAP is "GAP degradation";
    vGAP_mu = 2.78e-5 second_inverse;
  vDHAP: cdhap -> ; cytosol*vDHAP_mu*cdhap; vDHAP is "DHAP degradation";
    vDHAP_mu = 2.78e-5 second_inverse;
  vPGP: cpgp -> ; cytosol*vPGP_mu*cpgp; vPGP is "PGP degradation";
    vPGP_mu = 2.78e-5 second_inverse;
  vPG3: cpg3 -> ; cytosol*vPG3_mu*cpg3; vPG3 is "PG3 degradation";
    vPG3_mu = 2.78e-5 second_inverse;
  vpg2: cpg2 -> ; cytosol*vpg2_mu*cpg2; vpg2 is "PG2 degradation";
    vpg2_mu = 2.78e-5 second_inverse;
  vPEP: cpep -> ; cytosol*vPEP_mu*cpep; vPEP is "PEP degradation";
    vPEP_mu = 2.78e-5 second_inverse;
  vRibu5p: cribu5p -> ; cytosol*vRibu5p_mu*cribu5p; vRibu5p is "Ribu5P dilution";
    vRibu5p_mu = 2.78e-5 second_inverse;
  vRIB5P: crib5p -> ; cytosol*vRIB5P_mu*crib5p; vRIB5P is "Rib5P dilution";
    vRIB5P_mu = 2.78e-5 second_inverse;
  vXYL5P: cxyl5p -> ; cytosol*vXYL5P_mu*cxyl5p; vXYL5P is "XYL5P dilution";
    vXYL5P_mu = 2.78e-5 second_inverse;
  vSED7P: csed7p -> ; cytosol*vSED7P_mu*csed7p; vSED7P is "SED7P dilution";
    vSED7P_mu = 2.78e-5 second_inverse;
  vpyr: cpyr -> ; cytosol*vpyr_mu*cpyr; vpyr is "Pyruvate dilution";
    vpyr_mu = 2.78e-5 second_inverse;
  vPG: cpg -> ; cytosol*vPG_mu*cpg; vPG is "PG dilution";
    vPG_mu = 2.78e-5 second_inverse;
  vE4P: ce4p -> ; cytosol*vE4P_mu*ce4p; vE4P is "E4P dilution";
    vE4P_mu = 2.78e-5 second_inverse;
  vGLP: cg1p -> ; cytosol*vGLP_mu*cg1p; vGLP is "GLP dilution";
    vGLP_mu = 2.78e-5 second_inverse;
  vEXTER: -> cglcex; extracellular*Dil*(cfeed - cglcex); vEXTER is "Extracellular glucose kinetics";
    Dil = 2.78e-5 second_inverse; cfeed = 110.96 mM;

  // Unit definitions:
  unit substance = 1e-3 mole; substance is "millimole";
  unit mM = 1e-3 mole / litre; mM is "milli Molar";
  unit second_inverse = 1 / second;
  unit mM_per_second = 1e-3 mole / (litre * second);
end
