// SBML level 2 version 1

model Brands2002_MonosaccharideCasein()
  // This model originates from BioModels Database: A Database of Annotated Published Models. It is copyright (c) 2005-2007 The BioModels Team.
  // For more information see the terms of use.

  // Compartments:
  compartment compartment = 1;

  // Species:
  species Glu in compartment = 160;
  species Fru in compartment = 0;
  species Formic_acid in compartment = 0;
  species Triose in compartment = 0;
  species Acetic_acid in compartment = 0;
  species Cn in compartment = 0;
  species Amadori in compartment = 0;
  species AMP in compartment = 0;
  species C5 in compartment = 0;
  species lys_R in compartment = 15;
  species Melanoidin in compartment = 0;

  // Reactions:
  _J1: Glu => Fru; K1*Glu;
    K1 = 0.01;
  _J2: Fru => Glu; K2*Fru;
    K2 = 0.00509;
  _J3: Glu => C5 + Formic_acid; K3*Glu;
    K3 = 0.00047;
  _J4: Fru => C5 + Formic_acid; K4*Fru;
    K4 = 0.0011;
  _J5: Fru => 2 Triose; K5*Fru;
    K5 = 0.00712;
  _J6: Triose => Cn + Acetic_acid; K6*Triose;
    K6 = 0.00439;
  _J7: lys_R + Glu => Amadori; K7*Glu*lys_R;
    K7 = 0.00018;
  _J8: Amadori => Acetic_acid + lys_R; K8*Amadori;
    K8 = 0.11134;
  _J9: Amadori => AMP; K9*Amadori;
    K9 = 0.14359;
  _J10: lys_R + Fru => AMP; K10*Fru*lys_R;
    K10 = 0.00015;
  _J11: AMP => Melanoidin; K11*AMP;
    K11 = 0.12514;

  // Unit definitions:
  unit substance = 1e-3 mole; substance is "millimole (default)";
  unit time = 60 second; time is "minute (default)";
end
