// SBML level 2 version 1

model Ataullahkhanov1996_Adenylate()
  // The model reproduces ion and adenylate pool concentration corresponding to line 2 of Fig 3 of the publication. This model was tested successfully on Jarnac
  // This model originates from BioModels Database: A Database of Annotated Published Models. It is copyright (c) 2005-2007 The BioModels Team.
  // For more information see the terms of use.

  // Compartments:
  compartment cell = 1; cell is "Erythrocyte";

  // Species:
  species I in cell = 10; I is "Ions";
  species E in cell = 2.1; E is "Energy pool";
  species A in cell = 1.11; A is "Adenylate pool";

  // Parameters:
  var T; T is "ATP";
  var M; M is "AMP";
  P = 0.121; P is "Membrane permeability";
  J = 100; J is "Extracellular ion concentration";
  W2 = 0.2; W2 is "Ion pump activity";
  W3 = 13.48; W3 is "Glycolytic activity";
  U = 0.02; U is "de novo AMP synthesis";
  W = 0.01; W is "AMP degradation";
  n = 1.2; n is "Dependence of AMP degradation on ATP";
  k = -1; k is "Dependence of AMP degradation on AMP";

  // Assignment rules:
  T := (A + 3*E - (6*A*E - 3*E^2 + A^2)^0.5)/6;
  M := (7*A - 3*E - (6*A*E - 3*E^2 + A^2)^0.5)/6;

  // Reactions:
  U1: => I; cell*P*J; U1 is "Passive ion influx";
  U2: 3 I + E => ; cell*W2*I*T; U2 is "ATP consumption by ion pump";
  U3: => E; cell*W3*T^0.52*M^0.41; U3 is "ATP from glycolysis";
  U6_plus_3U7: E => ; cell*2*U; U6_plus_3U7 is "AMP synthesis de novo";
  U6_plus_U7_minus_U8: => A; cell*U*(1 - W*T^n*M^k); U6_plus_U7_minus_U8 is "Adenylate pool";

  // Unit definitions:
  unit substance = 1e-3 mole; substance is "millimole (default)";
  unit time = 3600 second; time is "hour (default)";
end
