// SBML level 2 version 1

model Fridlyand2003_Ca_flux_pancreatic_cells()
  // Fridlyand2003_Calcium_flux
  // The model reproduces block A of Fig 5 and also Fig 3 (without the inclusion of Tg action). The model was successfully tested on MathSBML
  // This model originates from BioModels Database: A Database of Annotated Published Models. It is copyright (c) 2005-2007 The BioModels Team.
  // For more information see the terms of use.

  // Compartments:
  compartment compartment = 1; compartment is "cell";

  // Species:
  species Ca_cyt in compartment = 0.085; Ca_cyt is "Cytosolic Calcium";
  species Ca_er in compartment = 22.8; Ca_er is "ER Calcium";
  species IP3_cyt in compartment = 0.33; IP3_cyt is "Cytosolic IP3";
  species Na_cyt in compartment = 9858; Na_cyt is "Cytosolic Sodium";
  species ATP_cyt in compartment = 932.1; ATP_cyt is "Cytosolic ATP";
  species ADP_cyt in compartment; ADP_cyt is "Cytosolic ADP";

  // Parameters:
  n = 0.00123;
  V = -60.9 millivolt;
  Vca has millivolt;
  TV = 26.73 millivolt;
  Ca_ec = 2600 micromole_per_litre;
  Vk has millivolt;
  K_ec = 8000 micromole_per_litre;
  K_cyt = 132400 micromole_per_litre;
  Vna has millivolt;
  Na_ec = 140000 micromole_per_litre;
  Vnaca has millivolt;
  Vcah = -19 millivolt;
  Kcah = 9.5 millivolt;
  gm_CRAN = 0.7 picosiemens_per_millivolt;
  Kcar = 200 micromole_per_litre;
  p_CRAN has millivolt;
  V_CRAN = 0 millivolt;
  pna has dimensionless;
  f5_ast = 0.002 per_microM_per_millisecond;
  b5_ast = 0.03 per_millisecond;
  f_1 = 2.5e-10 per_microMcube_per_millisecond;
  f_4 = 1.5e-8 per_microMsquare_per_millisecond;
  b_2 = 0.0001 per_microM_per_millisecond;
  b_3 = 1.72e-17 per_microMcube_per_millisecond;
  b_4 = 0.0002 per_microM_per_millisecond;
  P = 4950 micromole_per_litre;
  b_6 = 6e-7 per_microM_per_millisecond;
  Ksup = 150400 micromole_per_litre;
  f_2 = 10 per_millisecond;
  f_3 = 0.172 per_millisecond;
  f_6 = 11.5 per_millisecond;
  b_1 = 100 per_millisecond;
  f_Ca has dimensionless;
  Kkca = 0.1 micromole_per_litre;
  Okatp has dimensionless;
  Kdd = 17 micromole_per_litre;
  Ktd = 26 micromole_per_litre;
  Ktt = 1 micromole_per_litre;
  n_infinity has dimensionless;
  Vn = -14 millivolt;
  Sn = 7 millivolt;
  tau_n has dimensionless;
  c = 20 time;
  Vtau = -75 millivolt;
  a = 65 millivolt;
  b = 20 millivolt;
  I_Vca has femtoamperes;
  gmvca = 770 picosiemens;
  I_CaPump has femtoamperes;
  Pmcap = 2000 femtoamperes;
  Kcap = 0.1 micromole_per_litre;
  I_NaCa has femtoamperes;
  gnaca = 271 picosiemens;
  Knaca = 0.75 micromole_per_litre;
  I_CRAN has femtoamperes;
  I_Na has femtoamperes;
  gmna = 1200 picosiemens;
  I_NaK has femtoamperes;
  Pnak = 600 femtoamperes;
  I_KDr has femtoamperes;
  gmKDr = 3000 picosiemens;
  I_KCa has femtoamperes;
  gmkca = 130 picosiemens;
  I_KATP has femtoamperes;
  gmkatp = 24000 picosiemens;
  Jerp has microM_per_millisecond;
  Pcaer = 0.105 microM_per_millisecond;
  Kcarp = 0.5 micromole_per_litre;
  O_infinity has dimensionless;
  Krca = 0.077 micromole_per_litre;
  Kip3 = 3.2 micromole_per_litre;
  Jout has microM_per_millisecond;
  Pleak = 1e-16 litres_per_millisecond;
  Pip3 = 1.2e-15 litres_per_millisecond;
  Cm = 6158 femtofarads;

  // Assignment rules:
  ADP_cyt := 4000 - ATP_cyt;
  Vca := TV/2*ln(Ca_ec/Ca_cyt);
  Vk := TV*ln(K_ec/K_cyt);
  Vna := TV*ln(Na_ec/Na_cyt);
  Vnaca := TV*(3*ln(Na_ec/Na_cyt) - ln(Ca_ec/Ca_cyt));
  pvca := 1/(1 + exp((Vcah - V)/Kcah));
  f_CRAN := -gm_CRAN/(1 + exp((Ca_er - Kcar)/3));
  p_CRAN := V - V_CRAN;
  pna := 1/(1 + exp((104 + V)/8));
  f_5 := f5_ast*exp(V/(2*TV));
  b_5 := b5_ast*exp(-V/(2*TV));
  F1 := f_1*Na_cyt^3;
  F4 := f_4*K_ec^2;
  F5 := f_5*ATP_cyt;
  B2 := b_2*ADP_cyt;
  B3 := b_3*Na_ec^3;
  B4 := b_4*P;
  B6 := b_6*Ksup^2;
  D := f_2*f_3*F4*F5*f_6 + b_1*f_3*F4*F5*f_6 + b_1*B2*F4*F5*f_6 + b_1*B2*B3*F5*f_6 + b_1*B2*B3*B4*f_6 + b_1*B2*B3*B4*b_5;
  f_Ca := Ca_cyt^4/(Ca_cyt^4 + Kkca^4);
  Okatp := (0.08*(1 + 0.33*(ADP_cyt/Kdd)) + 0.89*(0.165*(ADP_cyt/Kdd))^2)/((1 + 0.165*(ADP_cyt/Kdd))^2*(1 + 0.135*(ADP_cyt/Ktd) + 0.05*(ATP_cyt/Ktt)));
  n_infinity := 1/(1 + exp((Vn - V)/Sn));
  tau_n := c/(exp((V - Vtau)/a) + exp((Vtau - V)/b));
  I_Vca := gmvca*pvca*(V - Vca);
  I_CaPump := Pmcap*Ca_cyt^2/(Kcap^2 + Ca_cyt^2);
  I_NaCa := gnaca*Ca_cyt^5*(V - Vnaca)/(Ca_cyt^5 + Knaca^5);
  I_CRAN := f_CRAN*p_CRAN*(V - Vna);
  I_Na := gmna*pna*(V - Vna);
  I_NaK := Pnak*(F1*f_2*f_3*F4*F5*f_6 - b_1*B2*B3*B4*b_5*B6)/D;
  I_KDr := gmKDr*n*(V - Vk);
  I_KCa := gmkca*f_Ca*(V - Vk);
  I_KATP := gmkatp*Okatp*(V - Vk);
  Jerp := Pcaer*Ca_cyt^2/(Ca_cyt^2 + Kcarp^2);
  O_infinity := Ca_cyt*IP3_cyt^3/((Ca_cyt + Krca)*(IP3_cyt^3 + Kip3^3));
  Jout := (Pleak + Pip3*O_infinity)*(Ca_er - Ca_cyt);

  // Rate rules:
  n' = (n_infinity - n)/tau_n;
  V' = (0 - (I_Vca + I_CaPump + I_NaCa + I_CRAN + I_Na + I_NaK + I_KDr + I_KCa + I_KATP))/Cm;

  // Reactions:
  Calcium_cyt_Ivca: => Ca_cyt; compartment*Calcium_cyt_Ivca_fi*(-I_Vca)/(2*Calcium_cyt_Ivca_F*Calcium_cyt_Ivca_Vi);
    Calcium_cyt_Ivca_fi = 0.01 dimensionless; Calcium_cyt_Ivca_F = 9.6485e16 fA_msec_per_micromole; Calcium_cyt_Ivca_Vi = 7.64e-13 litre;
  Calcium_cyt_Inaca: => Ca_cyt; compartment*Calcium_cyt_Inaca_fi*2*I_NaCa/(2*Calcium_cyt_Inaca_F*Calcium_cyt_Inaca_Vi);
    Calcium_cyt_Inaca_fi = 0.01 dimensionless; Calcium_cyt_Inaca_F = 9.6485e16 fA_msec_per_micromole; Calcium_cyt_Inaca_Vi = 7.64e-13 litre;
  Calcium_cyt_Icapump: Ca_cyt => ; compartment*Calcium_cyt_Icapump_fi*2*I_CaPump/(2*Calcium_cyt_Icapump_F*Calcium_cyt_Icapump_Vi);
    Calcium_cyt_Icapump_fi = 0.01 dimensionless; Calcium_cyt_Icapump_F = 9.6485e16 fA_msec_per_micromole; Calcium_cyt_Icapump_Vi = 7.64e-13 litre;
  Calcium_cyt_Jerp: Ca_cyt => ; compartment*Calcium_cyt_Jerp_fi*Jerp;
    Calcium_cyt_Jerp_fi = 0.01 dimensionless;
  Calcium_cyt_Jout: => Ca_cyt; compartment*Calcium_cyt_Jout_fi*Jout/Calcium_cyt_Jout_Vi;
    Calcium_cyt_Jout_fi = 0.01 dimensionless; Calcium_cyt_Jout_Vi = 7.64e-13 litre;
  Calcium_cyt_sequestration: Ca_cyt => ; compartment*ksg*Ca_cyt;
    ksg = 0.0001 per_millisecond;
  Calcium_er_Jerp: => Ca_er; compartment*Calcium_er_Jerp_fer*Jerp*Calcium_er_Jerp_Vi/Calcium_er_Jerp_Ver;
    Calcium_er_Jerp_fer = 0.03 dimensionless; Calcium_er_Jerp_Vi = 7.64e-13 litre; Calcium_er_Jerp_Ver = 2.8e-13 litre;
  Calcium_er_Jout: Ca_er => ; compartment*Calcium_er_Jout_fer*Jout/Calcium_er_Jout_Ver;
    Calcium_er_Jout_fer = 0.03 dimensionless; Calcium_er_Jout_Ver = 2.8e-13 litre;
  IP3_synthesis: => IP3_cyt; compartment*kip*Ca_cyt^2/(Ca_cyt^2 + Kipca^2);  // modifiers: Ca_cyt
    kip = 0.0003 microM_per_millisecond; Kipca = 0.4 micromole_per_litre;
  IP3_degradation: IP3_cyt => ; compartment*kdip*IP3_cyt;
    kdip = 4e-5 per_millisecond;
  Na_Inaca: Na_cyt => ; compartment*3*I_NaCa/(Na_Inaca_Vi*Na_Inaca_F);
    Na_Inaca_Vi = 7.64e-13 litre; Na_Inaca_F = 9.6485e16 fA_msec_per_micromole;
  Na_Inak: Na_cyt => ; compartment*3*I_NaK/(Na_Inak_Vi*Na_Inak_F);
    Na_Inak_Vi = 7.64e-13 litre; Na_Inak_F = 9.6485e16 fA_msec_per_micromole;
  Na_Ina: => Na_cyt; compartment*(-I_Na)/(Na_Ina_Vi*Na_Ina_F);
    Na_Ina_Vi = 7.64e-13 litre; Na_Ina_F = 9.6485e16 fA_msec_per_micromole;
  Na_Icran: => Na_cyt; compartment*(-I_CRAN)/(Na_Icran_Vi*Na_Icran_F);
    Na_Icran_Vi = 7.64e-13 litre; Na_Icran_F = 9.6485e16;
  ATP_production: => ATP_cyt; compartment*kadp*ADP_cyt;  // modifiers: ADP_cyt
    kadp = 0.00037 per_millisecond;
  ATP_NaKATPase: ATP_cyt => ; compartment*I_NaK/(ATP_NaKATPase_Vi*ATP_NaKATPase_F);
    ATP_NaKATPase_Vi = 7.64e-13 litre; ATP_NaKATPase_F = 9.6485e16 fA_msec_per_micromole;
  ATP_Capump: ATP_cyt => ; compartment*I_CaPump/(ATP_Capump_Vi*ATP_Capump_F);
    ATP_Capump_Vi = 7.64e-13 litre; ATP_Capump_F = 9.6485e16 fA_msec_per_micromole;
  ATP_Jerp: ATP_cyt => ; compartment*Jerp/2;
  ATP_Ca_dependent_consumption: ATP_cyt => ; compartment*katpca*Ca_cyt*ATP_cyt;  // modifiers: Ca_cyt
    katpca = 5e-5 per_microM_per_millisecond;
  ATP_consumption: ATP_cyt => ; compartment*katp*ATP_cyt;
    katp = 5e-5 per_millisecond;

  // Unit definitions:
  unit substance = 1e-6 mole; substance is "Micromole";
  unit time = 1e-3 second; time is "milliseconds";
  unit millivolt = 1e-3 volt; millivolt is "Voltage";
  unit femtoamperes = 1e-15 ampere; femtoamperes is "Current";
  unit micromole_per_litre = 1e-6 mole / litre; micromole_per_litre is "Concentration";
  unit picosiemens = 1e-12 siemens; picosiemens is "Conductance";
  unit femtofarads = 1e-15 farad; femtofarads is "Capacitance";
  unit per_millisecond = 1 / (1e-3 second); per_millisecond is "Time inverse";
  unit picosiemens_per_millivolt = 1e-12 siemens / (1e-3 volt); picosiemens_per_millivolt is "Conductance coefficient";
  unit microM_per_millisecond = 1e-6 mole / (1e-3 second * litre); microM_per_millisecond is "concentration per time";
  unit litres_per_millisecond = litre / (1e-3 second); litres_per_millisecond is "volume per time";
  unit per_microM_per_millisecond = litre / (1e-6 mole * 1e-3 second); per_microM_per_millisecond is "per concentration per time";
  unit per_microMcube_per_millisecond = litre^3 / ((1e-6 mole)^3 * 1e-3 second); per_microMcube_per_millisecond is "per concentration cubed per time";
  unit per_microMsquare_per_millisecond = litre^2 / ((1e-6 mole)^2 * 1e-3 second); per_microMsquare_per_millisecond is "per Concentration square per time";
  unit per_microM = litre / (1e-6 mole); per_microM is "per concentration";
  unit fA_msec_per_micromole = 1e-15 ampere * 1e-3 second / (1e-6 mole); fA_msec_per_micromole is "Faraday constant";
end
