// SBML level 2 version 1

model Keizer1996_Ryanodine_receptor_adaptation()
  // The model reproduces the time profile of Open probability of the ryanodine receptor as shown in Fig 2A and 2B of the paper. The model was successfully tested on MathSBML and Jarnac
  // This model originates from BioModels Database: A Database of Annotated Published Models. It is copyright (c) 2005-2007 The BioModels Team.
  // For more information see the terms of use.

  // Compartments:
  compartment compartment = 1;

  // Species:
  species Pc1 in compartment = 0.963/compartment;
  species Po2 in compartment = 0;
  species Po1 in compartment = 0;
  species Pc2 in compartment = 0.037/compartment;

  // Parameters:
  Open_probability has dimensionless;

  // Assignment rules:
  Open_probability := Po1 + Po2;

  // Reactions:
  Closed_state_1: Po1 -> Pc1; ka_minus*Po1 - ka_plus*Closed_state_1_Ca^n*Pc1;
    ka_minus = 28.8 per_second; ka_plus = 1500 per_microM4sec; Closed_state_1_Ca = 0.9 microM; n = 4 dimensionless;
  Open_state_2: Po1 -> Po2; kb_plus*Open_state_2_Ca^m*Po1 - kb_minus*Po2;
    kb_plus = 1500 per_microM3sec; Open_state_2_Ca = 0.9 microM; m = 3 dimensionless; kb_minus = 385.9 per_second;
  Closed_State_2: Po1 -> Pc2; kc_plus*Po1 - kc_minus*Pc2;
    kc_plus = 1.75 per_second; kc_minus = 0.1 per_second;

  // Unit definitions:
  unit per_microM4sec = litre^4 / ((1e-6 mole)^4 * second); per_microM4sec is "microM-4sec-1";
  unit per_microM3sec = litre^3 / ((1e-6 mole)^3 * second); per_microM3sec is "microM-3sec-1";
  unit per_second = 1 / second;
  unit microM = 1e-6 mole / litre;
end
