// SBML level 2 version 1

model Hynne2001_Glycolysis()
  // The model reproduces Fig 6 of the paper. The stoichiometry and rate of reactions involving uptake of metabolites from extracellular medium have been changed corresponding to Yvol (ratio of extracellular volume to cytosolic volume) mentioned in the publication. The extracellular and cytosolic compartments have been set to 1. Concentration of extracellular glucose, GlcX, is set to 6.7 according to the equation for cellular glucose uptake rate in Table 7 of the paper. The model was successfully tested on MathSBML and Jarnac
  // .
  // .
  // .
  // SBML level 2 code generated for the JWS Online project by Jacky Snoep using PySCeS
  // Run this model online at http://jjj.biochem.sun.ac.za
  // To cite JWS Online please refer to: Olivier, B.G. and Snoep, J.L. (2004) Web-based modelling using JWS Online, Bioinformatics, 20:2143-2144
  // .
  // .
  // .
  // .
  // .
  // .
  // This model originates from BioModels Database: A Database of Annotated Published Models. It is copyright (c) 2005-2007 The BioModels Team.
  // For more information see the terms of use.

  // Compartments:
  compartment extracellular = 1;
  compartment cytosol in extracellular = 1;

  // Species:
  species GlcX in extracellular = 6.7; GlcX is "Extracellular glucose";
  species Glc in cytosol = 0.573074; Glc is "Cytosolic glucose";
  species ATP in cytosol = 2.1;
  species G6P in cytosol = 4.2; G6P is "Glucose-6-Phosphate";
  species ADP in cytosol = 1.5;
  species F6P in cytosol = 0.49; F6P is "Fructose-6-Phosphate";
  species FBP in cytosol = 4.64; FBP is "Fructose 1,6-bisphosphate";
  species GAP in cytosol = 0.115; GAP is "Glyceraldehyde 3-phosphate";
  species DHAP in cytosol = 2.95; DHAP is "Dihydroxyacetone phosphate";
  species NAD in cytosol = 0.65;
  species BPG in cytosol = 0.00027; BPG is "1,3-Bisphosphoglycerate";
  species NADH in cytosol = 0.33;
  species PEP in cytosol = 0.04; PEP is "Phosphoenolpyruvate";
  species Pyr in cytosol = 8.7; Pyr is "Pyruvate";
  species ACA in cytosol = 1.48153; ACA is "Acetaldehyde";
  species EtOH in cytosol = 19.2379;
  species EtOHX in extracellular = 16.4514; EtOHX is "Extracellular ethanol";
  species Glyc in cytosol = 4.196; Glyc is "Glycerol";
  species GlycX in extracellular = 1.68478; GlycX is "Extracellular glycerol";
  species ACAX in extracellular = 1.28836; ACAX is "Extracellular acetaldehyde";
  species CNX in extracellular = 5.20358; CNX is "Extracellular cyanide";
  species AMP in cytosol = 0.33;
  species $P in extracellular = 0;
  species $CNX0 in extracellular = 5.6; CNX0 is "Mixed flow cyanide";
  species $GlcX0 in extracellular = 24; GlcX0 is "Mixed flow glucose";

  // Reactions:
  vinGlc: $GlcX0 -> GlcX; extracellular*vinGlc_k0*(GlcX0 - GlcX); vinGlc is "Glucose Mixed flow to extracellular medium";
    vinGlc_k0 = 0.048 min_inverse;
  vGlcTrans: GlcX -> 59 Glc; extracellular*V2f/vGlcTrans_Yvol*(GlcX/K2Glc/(1 + GlcX/K2Glc + (P2*(GlcX/K2Glc) + 1)/(P2*(Glc/K2Glc) + 1)*(1 + Glc/K2Glc + G6P/K2IG6P + Glc*G6P/(K2Glc*K2IIG6P)))) - cytosol*V2r/vGlcTrans_Yvol*(Glc/K2Glc/(1 + Glc/K2Glc + (P2*(Glc/K2Glc) + 1)/(P2*(GlcX/K2Glc) + 1)*(1 + GlcX/K2Glc) + G6P/K2IG6P + Glc*G6P/(K2Glc*K2IIG6P))); vGlcTrans is "Glucose uptake";  // modifiers: G6P
    V2f = 1014.96 mM_per_minute; vGlcTrans_Yvol = 59 dimensionless; K2Glc = 1.7 mM; P2 = 1 dimensionless; K2IG6P = 1.2 mM; K2IIG6P = 7.2 mM; V2r = 1014.96 mM_per_minute;
  vHK: ATP + Glc -> G6P + ADP; cytosol*V3m*ATP*Glc/(K3DGlc*K3ATP + K3Glc*ATP + K3ATP*Glc + Glc*ATP); vHK is "Hexokinase";
    V3m = 51.7547 mM_per_minute; K3DGlc = 0.37 mM; K3ATP = 0.1 mM; K3Glc = 0 mM;
  vPGI: G6P -> F6P; cytosol*(V4f*G6P/(K4G6P + G6P + K4G6P/K4F6P*F6P) - V4r*(F6P/K4eq)/(K4G6P + G6P + K4G6P/K4F6P*F6P)); vPGI is "Phosphoglucoisomerase";
    V4f = 496.042 mM_per_minute; K4G6P = 0.8 mM; K4F6P = 0.15 mM; V4r = 496.042 mM_per_minute; K4eq = 0.13 dimensionless;
  vPFK: F6P + ATP -> FBP + ADP; cytosol*(V5m*F6P^2/(K5*(1 + kappa5*(ATP/AMP)*(ATP/AMP)) + F6P^2)); vPFK is "Phosphofructokinase";  // modifiers: AMP
    V5m = 45.4327 mM_per_minute; K5 = 0.021 mM_squared; kappa5 = 0.15 dimensionless;
  vALD: FBP -> GAP + DHAP; cytosol*(V6f*FBP/(K6FBP + FBP + GAP*K6DHAP*V6f/(K6eq*V6f*ratio6) + DHAP*K6GAP*V6f/(K6eq*V6f*ratio6) + FBP*GAP/K6IGAP + GAP*DHAP*V6f/(K6eq*V6f*ratio6)) - V6f*GAP*DHAP/K6eq/(K6FBP + FBP + GAP*K6DHAP*V6f/(K6eq*V6f*ratio6) + DHAP*K6GAP*V6f/(K6eq*V6f*ratio6) + FBP*GAP/K6IGAP + GAP*DHAP*V6f/(K6eq*V6f*ratio6))); vALD is "Aldolase";
    V6f = 2207.82 mM_per_minute; K6FBP = 0.3 mM; K6DHAP = 2 mM; K6eq = 0.081 mM; ratio6 = 5 dimensionless; K6GAP = 4 mM; K6IGAP = 10 mM;
  vTIM: DHAP -> GAP; cytosol*(V7f*DHAP/(K7DHAP + DHAP + K7DHAP/K7GAP*GAP) - V7r*(GAP/K7eq)/(K7DHAP + DHAP + K7DHAP/K7GAP*GAP)); vTIM is "Triosephosphate isomerase";
    V7f = 116.365 mM_per_minute; K7DHAP = 1.23 mM; K7GAP = 1.27 mM; V7r = 116.365 mM_per_minute; K7eq = 0.055 dimensionless;
  vGAPDH: GAP + NAD -> NADH + BPG; cytosol*(V8f*GAP*NAD/K8GAP/K8NAD/((1 + GAP/K8GAP + BPG/K8BPG)*(1 + NAD/K8NAD + NADH/K8NADH)) - V8r*BPG*NADH/K8eq/K8GAP/K8NAD/((1 + GAP/K8GAP + BPG/K8BPG)*(1 + NAD/K8NAD + NADH/K8NADH))); vGAPDH is "Glyceraldehyde 3-phosphate dehydrogenase";
    V8f = 833.858 mM_per_minute; K8GAP = 0.6 mM; K8NAD = 0.1 mM; K8BPG = 0.01 mM; K8NADH = 0.06 mM; V8r = 833.858 mM_per_minute; K8eq = 0.0055 dimensionless;
  vlpPEP: BPG + ADP -> PEP + ATP; cytosol*(k9f*BPG*ADP - k9r*PEP*ATP); vlpPEP is "Phosphoenolpyruvate synthesis";
    k9f = 443866 mM_inverse_min_inverse; k9r = 1528.62 mM_inverse_min_inverse;
  vPK: ADP + PEP -> Pyr + ATP; cytosol*(V10m*ADP*PEP/((K10PEP + PEP)*(K10ADP + ADP))); vPK is "Pyruvate kinase";
    V10m = 343.096 mM_per_minute; K10PEP = 0.2 mM; K10ADP = 0.17 mM;
  vPDC: Pyr -> ACA; cytosol*(V11m*Pyr/(K11 + Pyr)); vPDC is "Pyruvate decarboxylase";
    V11m = 53.1328 mM_per_minute; K11 = 0.3 mM;
  vADH: NADH + ACA -> NAD + EtOH; cytosol*(V12m*ACA*NADH/((K12NADH + NADH)*(K12ACA + ACA))); vADH is "Alcohol dehydrogenase";
    V12m = 89.8023 mM_per_minute; K12NADH = 0.1 mM; K12ACA = 0.71 mM;
  vdifEtOH: 59 EtOH -> EtOHX; k13/vdifEtOH_Yvol*(cytosol*EtOH - extracellular*EtOHX); vdifEtOH is "Ethanol out";
    k13 = 16.72 min_inverse; vdifEtOH_Yvol = 59 dimensionless;
  voutEtOH: EtOHX -> $P; extracellular*voutEtOH_k0*EtOHX; voutEtOH is "Ethanol flow";
    voutEtOH_k0 = 0.048 min_inverse;
  vlpGlyc: DHAP + NADH -> Glyc + NAD; cytosol*(V15m*DHAP/(K15DHAP*(1 + K15INADH/NADH*(1 + NAD/K15INAD)) + DHAP*(1 + K15NADH/NADH*(1 + NAD/K15INAD)))); vlpGlyc is "Glycerol synthesis";
    V15m = 81.4797 mM_per_minute; K15DHAP = 25 mM; K15INADH = 0.034 mM; K15INAD = 0.13 mM; K15NADH = 0.13 mM;
  vdifGlyc: 59 Glyc -> GlycX; k16/vdifGlyc_Yvol*(cytosol*Glyc - extracellular*GlycX); vdifGlyc is "Glycerol out";
    k16 = 1.9 min_inverse; vdifGlyc_Yvol = 59 dimensionless;
  voutGlyc: GlycX -> $P; extracellular*voutGlyc_k0*GlycX; voutGlyc is "Glycerol flow";
    voutGlyc_k0 = 0.048 min_inverse;
  vdifACA: 59 ACA -> ACAX; k18/vdifACA_Yvol*(cytosol*ACA - extracellular*ACAX); vdifACA is "Acetaldehyde out";
    k18 = 24.7 min_inverse; vdifACA_Yvol = 59 dimensionless;
  voutACA: ACAX -> $P; extracellular*voutACA_k0*ACAX; voutACA is "Acetaldehyde flow";
    voutACA_k0 = 0.048 min_inverse;
  vlacto: CNX + ACAX -> $P; extracellular*k20*ACAX*CNX; vlacto is "Cyanide-Acetaldehyde flow";
    k20 = 0.00283828 mM_inverse_min_inverse;
  vinCN: $CNX0 -> CNX; extracellular*vinCN_k0*(CNX0 - CNX); vinCN is "Cyanide flow";
    vinCN_k0 = 0.048 min_inverse;
  vstorage: ATP + G6P -> ADP; cytosol*k22*ATP*G6P; vstorage is "Storage";
    k22 = 2.25932 mM_inverse_min_inverse;
  vconsum: ATP -> ADP; cytosol*k23*ATP; vconsum is "ATP consumption";
    k23 = 3.2076 min_inverse;
  vAK: ATP + AMP -> 2 ADP; cytosol*(k24f*AMP*ATP - k24r*ADP^2); vAK is "Adenylate kinase";
    k24f = 432.9 mM_per_minute; k24r = 133.333 mM_per_minute;

  // Unit definitions:
  unit substance = 1e-3 mole; substance is "millimole";
  unit time = 60 second; time is "minute";
  unit mM_per_minute = 1e-3 mole / (litre * 60 second);
  unit min_inverse = 1 / (60 second); min_inverse is "minute inverse";
  unit mM_inverse_min_inverse = litre / (1e-3 mole * 60 second);
  unit mM_squared = (1e-3 mole)^2 / litre^2;
  unit mM = 1e-3 mole / litre; mM is "milliMolar";
end
