// SBML level 2 version 1

model Bhartiya2003_Tryptophan_operon()
  // bhartiya2003 tryptophan operon
  // SBML level 2 code originaly generated for the JWS Online project by Jacky Snoep using PySCeS
  // Run this model online at http://jjj.biochem.sun.ac.za
  // To cite JWS Online please refer to: Olivier, B.G. and Snoep, J.L. (2004) Web-based modelling using JWS Online, Bioinformatics, 20:2143-2144
  // BioModels Curation: The model reproduces Fig 3B and 3D(ii) of the publication. By substituting a value of 1.4 for Tex it is possible to reproduce Fig 3C and 3D(iii), however, Fig 3A and 3D(i), plots obtained for Tex=0 cannot be reproduced with this model. In order to reproduce these figures, the assignment rule for Tt needs to removed and Tt should be substituted with Ts elsewhere in the model. Also, note that the tryptophan concentrations have been normalized by 82 micromolar. The model was successfully tested on MathSBML.
  // This model originates from BioModels Database: A Database of Annotated Published Models. It is copyright (c) 2005-2007 The BioModels Team.
  // For more information see the terms of use.

  // Compartments:
  compartment compartment = 1; compartment is "cell";

  // Species:
  species Enz in compartment = 0; Enz is "Anthranilate synthase";
  species Ts in compartment = 0; Ts is "Synthesized tryptophan";
  species Tt in compartment; Tt is "Total tryptophan";

  // Parameters:
  Tomax = 100 concentration;
  Tex = 0.14 concentration;
  e_val = 0.9 concentration;
  f_val = 380 concentration;

  // Assignment rules:
  Tt := (-f_val*e_val - f_val*Tex + Tex*Ts + ((f_val*(e_val + Tex) - Tex*Ts)^2 - 4*f_val*Tex*(-e_val*Ts - Tex*Tomax - Tex*Ts))^0.5)/(2*Tex);

  // Reactions:
  Enzyme_synthesis: -> Enz; compartment*k1*ki1^nH*Ot/(ki1^nH + Tt^nH); Enzyme_synthesis is "Anthranilate synthase synthesis";  // modifiers: Tt
    k1 = 65 time_inverse; ki1 = 3.53 concentration; nH = 1.92 dimensionless; Ot = 0.0033 concentration;
  Enzyme_dilution: Enz -> ; compartment*Enzyme_dilution_mu*Enz; Enzyme_dilution is "Enzyme dilution due to cell growth";
    Enzyme_dilution_mu = 0.01 time_inverse;
  tryptophan_synthesis: -> Ts; compartment*k2*Enz*Ki2/(Ki2 + Tt); tryptophan_synthesis is "Tryptophan synthesis";  // modifiers: Enz, Tt
    k2 = 25 time_inverse; Ki2 = 810 concentration;
  tryptophan_consumption: Ts -> ; compartment*g*Ts/(Kg + Ts); tryptophan_consumption is "Tryptophan consumption for protein synthesis";
    g = 25 Concentration_per_time; Kg = 0.2 concentration;
  tryptophan_dilution: Ts -> ; compartment*tryptophan_dilution_mu*Ts; tryptophan_dilution is "Tryptophan dilution due to cell growth";
    tryptophan_dilution_mu = 0.01 time_inverse;

  // Unit definitions:
  unit substance = 1e-6 mole; substance is "micromole";
  unit time = 60 second; time is "minutes";
  unit concentration = 1e-6 mole / litre; concentration is "microM";
  unit Concentration_per_time = 1e-6 mole / (litre * 60 second); Concentration_per_time is "microM_per_min";
  unit time_inverse = 1 / (60 second); time_inverse is "per_min";
end
