// SBML level 2 version 1

model Galazzo1990_pathway_kinetics()
  // .
  // .
  // .
  // SBML level 2 code generated for the JWS Online project by Jacky Snoep using PySCeS
  // Run this model online at http://jjj.biochem.sun.ac.za
  // To cite JWS Online please refer to: Olivier, B.G. and Snoep, J.L. (2004) Web-based modelling using JWS Online, Bioinformatics, 20:2143-2144
  // .
  // .
  // .
  // .
  // .
  // .
  // Biomodels Curation: The model reproduces Fig 2 of the paper. However, it appears that the figures are swapped, hence the plot for V/Vmax vs Glucose actually represnts V/Vmax vs ATP and the vice versa is true for the other figure. The rate of hexokinase reaction that is obtained upon simulation of the model is 17.24 mM/min, therefore V/Vmax has a value of 17.24/68.5=0.25. For steady state values of Glucose and ATP (0.038 and 1.213 mM respectively), the V/Vmax values correctly correspond to 0.25, if we were to assume that the figures are swapped.
  // This model originates from BioModels Database: A Database of Annotated Published Models. It is copyright (c) 2005-2007 The BioModels Team.
  // For more information see the terms of use.

  // Compartments:
  compartment extracellular = 1; extracellular is "Extracellular";
  compartment cytoplasm in extracellular = 1; cytoplasm is "Cytoplasm";

  // Species:
  species Glci in cytoplasm = 0.0345; Glci is "Glucose inside the cell";
  species ATP in cytoplasm = 1.19;
  species G6P in cytoplasm = 1.011; G6P is "Glucose 6-phosphate";
  species FDP in cytoplasm = 9.144; FDP is "Fructose 1,6-phosphate";
  species PEP in cytoplasm = 0.0095; PEP is "Phosphoenol pyruvate";
  species $Gly in cytoplasm = 0; Gly is "Glycerol";
  species $EtOH in cytoplasm = 0; EtOH is "Ethanol";
  species $Carbo in cytoplasm = 0; Carbo is "Glycogen and Trehalose";
  species $Glco in extracellular = 1; Glco is "Glucose outside the cell";

  // Reactions:
  Vin: $Glco -> Glci; Vm1 - Ki1G6P*G6P; Vin is "Glucose in";  // modifiers: G6P
    Vm1 = 19.7 mM_per_minute; Ki1G6P = 3.7 min_inv;
  Vhk: ATP + Glci -> G6P; Vm2/(1 + Km2Glc/Glci + Km2ATP/ATP + Ks2Glc*Km2ATP/(Glci*ATP)); Vhk is "Hexokinase";
    Vm2 = 68.5 mM_per_minute; Km2Glc = 0.11 mM; Km2ATP = 0.1 mM; Ks2Glc = 0.0062 mM;
  Vpol: ATP + G6P -> $Carbo; 1.1*Vm3*G6P^n3/(K3Gly^n3 + G6P^n3)/(1 + Km30/0.7*(1 + Km3G6P/G6P)); Vpol is "Trehalose and Glycogen formation";
    Vm3 = 14.31 mM_per_minute; n3 = 8.25 dimensionless; K3Gly = 2 mM; Km30 = 1 mM; Km3G6P = 1.1 mM;
  Vpfk: ATP + G6P -> FDP; Vm4*g4R*0.3*G6P/K4F6P*ATP/K4ATP*(1 + 0.3*G6P/K4F6P + ATP/K4ATP + g4R*0.3*G6P/K4F6P*ATP/K4ATP)/((1 + 0.3*G6P/K4F6P + ATP/K4ATP + g4R*0.3*G6P/K4F6P*ATP/K4ATP)^2 + L40*((1 + c4AMP*(3 - ATP - 0.5*(-ATP + (12*ATP - 3*ATP^2)^0.5))/K4AMP)/(1 + (3 - ATP - 0.5*(-ATP + (12*ATP - 3*ATP^2)^0.5))/K4AMP))^2*(1 + c4F6P*0.3*G6P/K4F6P + c4ATP*ATP/K4ATP + gT*c4F6P*0.3*G6P/K4F6P*c4ATP*ATP/K4ATP)^2); Vpfk is "Phosphofructokinase";
    Vm4 = 31.7 mM_per_minute; g4R = 10 dimensionless; K4F6P = 1 mM; K4ATP = 0.06 mM; L40 = 3342 dimensionless; c4AMP = 0.019 dimensionless; K4AMP = 0.025 mM; c4F6P = 0.0005 dimensionless; c4ATP = 1 dimensionless; gT = 1 dimensionless;
  Vgapd: FDP -> 2 ATP + 2 PEP; Vm5/(1 + K5G3P/(0.01*FDP) + (K5NAD/NAD + K5G3P*K5NAD/(NAD*0.01*FDP) + K5G3P*K5NAD*NADH/(NAD*0.01*FDP*K5NADH))*(1 + 0.5*(-ATP + (12*ATP - 3*ATP^2)^0.5)/K5ADP + (3 - ATP - 0.5*(-ATP + (12*ATP - 3*ATP^2)^0.5))/K5AMP + ATP/K5ATP)); Vgapd is "GAPD";
    Vm5 = 49.9 mM_per_minute; K5G3P = 0.0025 mM; K5NAD = 0.18 dimensionless; NAD = 1.91939 mM; NADH = 0.0806142 mM; K5NADH = 0.0003 mM; K5ADP = 1.5 mM; K5AMP = 1.1 mM; K5ATP = 2.5 mM;
  Vpk: PEP -> ATP + $EtOH; Vm6*(PEP/Vpk_K6PEP*0.5*(-ATP + (12*ATP - 3*ATP^2)^0.5)/Vpk_K6ADP)*(Vpk_g6R*(1 + PEP/Vpk_K6PEP + 0.5*(-ATP + (12*ATP - 3*ATP^2)^0.5)/Vpk_K6ADP + Vpk_g6R*PEP/Vpk_K6PEP*0.5*(-ATP + (12*ATP - 3*ATP^2)^0.5)/Vpk_K6ADP) + Vpk_q6*Vpk_L60*((1 + Vpk_c6FDP*FDP/Vpk_K6FDP)/(1 + FDP/Vpk_K6FDP))^2*Vpk_g6T*Vpk_c6PEP*PEP/Vpk_K6PEP*Vpk_c6ADP*0.5*(-ATP + (12*ATP - 3*ATP^2)^0.5)/Vpk_K6ADP*(1 + Vpk_c6PEP*PEP/Vpk_K6PEP + Vpk_c6ADP*0.5*(-ATP + (12*ATP - 3*ATP^2)^0.5)/Vpk_K6ADP + Vpk_g6T*Vpk_c6PEP*PEP/Vpk_K6PEP*Vpk_c6ADP*0.5*(-ATP + (12*ATP - 3*ATP^2)^0.5)/Vpk_K6ADP))/((1 + 9.55*10^(-9)/Vpk_h6)*((1 + PEP/Vpk_K6PEP + 0.5*(-ATP + (12*ATP - 3*ATP^2)^0.5)/Vpk_K6ADP + Vpk_g6R*PEP/Vpk_K6PEP*0.5*(-ATP + (12*ATP - 3*ATP^2)^0.5)/Vpk_K6ADP)^2 + Vpk_L60*((1 + Vpk_c6FDP*FDP/Vpk_K6FDP)/(1 + FDP/Vpk_K6FDP))^2*(1 + Vpk_c6PEP*PEP/Vpk_K6PEP + Vpk_c6ADP*0.5*(-ATP + (12*ATP - 3*ATP^2)^0.5)/Vpk_K6ADP + Vpk_g6T*Vpk_c6PEP*PEP/Vpk_K6PEP*Vpk_c6ADP*0.5*(-ATP + (12*ATP - 3*ATP^2)^0.5)/Vpk_K6ADP)^2)); Vpk is "Pyruvate kinase";  // modifiers: FDP
    Vm6 = 3440 mM_per_minute; Vpk_K6PEP = 0.00793966 mM; Vpk_K6ADP = 5 mM; Vpk_g6R = 0.1 dimensionless; Vpk_q6 = 1 dimensionless; Vpk_L60 = 164.084 dimensionless; Vpk_c6FDP = 0.01 dimensionless; Vpk_K6FDP = 0.2 mM; Vpk_g6T = 1 dimensionless; Vpk_c6PEP = 0.000158793 dimensionless; Vpk_c6ADP = 1 dimensionless; Vpk_h6 = 1.14815e-7 dimensionless;
  Vgol: 0.5 FDP -> $Gly; Vm7*(PEP/Vgol_K6PEP*0.5*(-ATP + (12*ATP - 3*ATP^2)^0.5)/Vgol_K6ADP)*(Vgol_g6R*(1 + PEP/Vgol_K6PEP + 0.5*(-ATP + (12*ATP - 3*ATP^2)^0.5)/Vgol_K6ADP + Vgol_g6R*PEP/Vgol_K6PEP*0.5*(-ATP + (12*ATP - 3*ATP^2)^0.5)/Vgol_K6ADP) + Vgol_q6*Vgol_L60*((1 + Vgol_c6FDP*FDP/Vgol_K6FDP)/(1 + FDP/Vgol_K6FDP))^2*Vgol_g6T*Vgol_c6PEP*PEP/Vgol_K6PEP*Vgol_c6ADP*0.5*(-ATP + (12*ATP - 3*ATP^2)^0.5)/Vgol_K6ADP*(1 + Vgol_c6PEP*PEP/Vgol_K6PEP + Vgol_c6ADP*0.5*(-ATP + (12*ATP - 3*ATP^2)^0.5)/Vgol_K6ADP + Vgol_g6T*Vgol_c6PEP*PEP/Vgol_K6PEP*Vgol_c6ADP*0.5*(-ATP + (12*ATP - 3*ATP^2)^0.5)/Vgol_K6ADP))/((1 + 9.55*10^(-9)/Vgol_h6)*((1 + PEP/Vgol_K6PEP + 0.5*(-ATP + (12*ATP - 3*ATP^2)^0.5)/Vgol_K6ADP + Vgol_g6R*PEP/Vgol_K6PEP*0.5*(-ATP + (12*ATP - 3*ATP^2)^0.5)/Vgol_K6ADP)^2 + Vgol_L60*((1 + Vgol_c6FDP*FDP/Vgol_K6FDP)/(1 + FDP/Vgol_K6FDP))^2*(1 + Vgol_c6PEP*PEP/Vgol_K6PEP + Vgol_c6ADP*0.5*(-ATP + (12*ATP - 3*ATP^2)^0.5)/Vgol_K6ADP + Vgol_g6T*Vgol_c6PEP*PEP/Vgol_K6PEP*Vgol_c6ADP*0.5*(-ATP + (12*ATP - 3*ATP^2)^0.5)/Vgol_K6ADP)^2)); Vgol is "Glycerol synthesis";  // modifiers: PEP, ATP
    Vm7 = 203 mM_per_minute; Vgol_K6PEP = 0.00793966 mM; Vgol_K6ADP = 5 mM; Vgol_g6R = 0.1 dimensionless; Vgol_q6 = 1 dimensionless; Vgol_L60 = 164.084 dimensionless; Vgol_c6FDP = 0.01 dimensionless; Vgol_K6FDP = 0.2 mM; Vgol_g6T = 1 dimensionless; Vgol_c6PEP = 0.000158793 dimensionless; Vgol_c6ADP = 1 dimensionless; Vgol_h6 = 1.14815e-7 dimensionless;
  Vatpase: ATP -> ; Vm8*ATP; Vatpase is "ATPase";
    Vm8 = 25.1 min_inv;

  // Unit definitions:
  unit substance = 1e-3 mole; substance is "millimole";
  unit time = 60 second; time is "minute";
  unit mM = 1e-3 mole / litre; mM is "milliMolar";
  unit mM_per_minute = 1e-3 mole / (litre * 60 second);
  unit min_inv = 1 / (60 second); min_inv is "minute_inverse";
end
