// SBML level 2 version 1

model Teusink2000_Glycolysis()
  // The model reproduces the steady-state fluxes and metabolite concentrations of the branched model as given in Table 4 of the paper. For Vmax values, please note that there is a conversion factor of 270 to convert from U/mg-protein to mmol/min-Lcytosol as shown in Table 1 of the paper. For ADH the Keq given in the paper is for the reverse reaction and hence in the forward direction is 1/Keq. The model was successfully tested on MathSBML
  // This model originates from BioModels Database: A Database of Annotated Published Models. It is copyright (c) 2005-2007 The BioModels Team.
  // For more information see the terms of use.

  // Compartments:
  compartment extracellular = 1;
  compartment cytosol in extracellular = 1;

  // Species:
  species GLCi in cytosol = 0.087; GLCi is "Glucose in Cytosol";
  species G6P in cytosol = 2.45; G6P is "Glucose 6 Phosphate";
  species F6P in cytosol = 0.62; F6P is "Fructose 6 Phosphate";
  species F16P in cytosol = 5.51; F16P is "Fructose-1,6 bisphosphate";
  species TRIO in cytosol = 0.96; TRIO is "Triose-phosphate";
  species BPG in cytosol = 0; BPG is "1,3-bisphosphoglycerate";
  species P3G in cytosol = 0.9; P3G is "3-phosphoglycerate";
  species P2G in cytosol = 0.12; P2G is "2-phosphoglycerate";
  species PEP in cytosol = 0.07; PEP is "Phosphoenolpyruvate";
  species PYR in cytosol = 1.85; PYR is "Pyruvate";
  species ACE in cytosol = 0.17; ACE is "Acetaldehyde";
  species P in cytosol = 6.31; P is "High energy phosphates";
  species NAD in cytosol = 1.2;
  species NADH in cytosol = 0.39;
  species $Glyc in cytosol = 0; Glyc is "Glycogen";
  species $Trh in cytosol = 0; Trh is "Trehalose";
  species $CO2 in cytosol = 1;
  species $SUCC in cytosol = 0; SUCC is "Succinate";
  species $GLCo in extracellular = 50; GLCo is "Extracellular Glucose";
  species $ETOH in cytosol = 50; ETOH is "Ethanol";
  species $GLY in cytosol = 0.15; GLY is "Glycerol";

  // Parameters:
  Lambda1 has dimensionless;
  Lambda2 has dimensionless;
  R_PFK has dimensionless;
  T_PFK has dimensionless;
  L_PFK has dimensionless;
  gR_5 = 5.12 dimensionless;
  KmPFKF6P_5 = 0.1 mM;
  KeqAK_5 = 0.45 dimensionless;
  SUMAXP_5 = 4.1 mM;
  KmPFKATP_5 = 0.71 mM;
  Lzero_5 = 0.66 dimensionless;
  CiPFKATP_5 = 100 dimensionless;
  KiPFKATP_5 = 0.65 mM;
  CPFKAMP_5 = 0.0845 dimensionless;
  KPFKAMP_5 = 0.0995 mM;
  CPFKF26BP_5 = 0.0174 dimensionless;
  F26BP_5 = 0.02 mM;
  KPFKF26BP_5 = 0.000682 mM;
  CPFKF16BP_5 = 0.397 dimensionless;
  KPFKF16BP_5 = 0.111 mM;
  CPFKATP_5 = 3 dimensionless;

  // Assignment rules:
  L_PFK := Lzero_5*((1 + CiPFKATP_5*((P - 4*KeqAK_5*P - SUMAXP_5 + (P^2 - 4*KeqAK_5*P^2 - 2*P*SUMAXP_5 + 8*KeqAK_5*P*SUMAXP_5 + SUMAXP_5^2)^0.5)/(2 - 8*KeqAK_5)/KiPFKATP_5))/(1 + (P - 4*KeqAK_5*P - SUMAXP_5 + (P^2 - 4*KeqAK_5*P^2 - 2*P*SUMAXP_5 + 8*KeqAK_5*P*SUMAXP_5 + SUMAXP_5^2)^0.5)/(2 - 8*KeqAK_5)/KiPFKATP_5))^2*((1 + CPFKAMP_5*(2*KeqAK_5*(SUMAXP_5 - (P^2 - 4*KeqAK_5*P^2 - 2*P*SUMAXP_5 + 8*KeqAK_5*P*SUMAXP_5 + SUMAXP_5^2)^0.5)^2/((-1 + 4*KeqAK_5)*(-P + 4*KeqAK_5*P + SUMAXP_5 - (P^2 - 4*KeqAK_5*P^2 - 2*P*SUMAXP_5 + 8*KeqAK_5*P*SUMAXP_5 + SUMAXP_5^2)^0.5)))/KPFKAMP_5)/(1 + 2*KeqAK_5*(SUMAXP_5 - (P^2 - 4*KeqAK_5*P^2 - 2*P*SUMAXP_5 + 8*KeqAK_5*P*SUMAXP_5 + SUMAXP_5^2)^0.5)^2/((-1 + 4*KeqAK_5)*(-P + 4*KeqAK_5*P + SUMAXP_5 - (P^2 - 4*KeqAK_5*P^2 - 2*P*SUMAXP_5 + 8*KeqAK_5*P*SUMAXP_5 + SUMAXP_5^2)^0.5))/KPFKAMP_5))^2*((1 + CPFKF26BP_5*F26BP_5/KPFKF26BP_5 + CPFKF16BP_5*F16P/KPFKF16BP_5)/(1 + F26BP_5/KPFKF26BP_5 + F16P/KPFKF16BP_5))^2;
  Lambda1 := F6P/KmPFKF6P_5;
  Lambda2 := (P - 4*KeqAK_5*P - SUMAXP_5 + (P^2 - 4*KeqAK_5*P^2 - 2*P*SUMAXP_5 + 8*KeqAK_5*P*SUMAXP_5 + SUMAXP_5^2)^0.5)/(2 - 8*KeqAK_5)/KmPFKATP_5;
  R_PFK := 1 + F6P/KmPFKF6P_5 + (P - 4*KeqAK_5*P - SUMAXP_5 + (P^2 - 4*KeqAK_5*P^2 - 2*P*SUMAXP_5 + 8*KeqAK_5*P*SUMAXP_5 + SUMAXP_5^2)^0.5)/(2 - 8*KeqAK_5)/KmPFKATP_5 + gR_5*F6P/KmPFKF6P_5*((P - 4*KeqAK_5*P - SUMAXP_5 + (P^2 - 4*KeqAK_5*P^2 - 2*P*SUMAXP_5 + 8*KeqAK_5*P*SUMAXP_5 + SUMAXP_5^2)^0.5)/(2 - 8*KeqAK_5)/KmPFKATP_5);
  T_PFK := 1 + CPFKATP_5*((P - 4*KeqAK_5*P - SUMAXP_5 + (P^2 - 4*KeqAK_5*P^2 - 2*P*SUMAXP_5 + 8*KeqAK_5*P*SUMAXP_5 + SUMAXP_5^2)^0.5)/(2 - 8*KeqAK_5))/KmPFKATP_5;

  // Reactions:
  vGLK: GLCi + P -> G6P; cytosol*VmGLK_1/(KmGLKGLCi_1*KmGLKATP_1)*(GLCi*((P - 4*KeqAK_1*P - SUMAXP_1 + (P^2 - 4*KeqAK_1*P^2 - 2*P*SUMAXP_1 + 8*KeqAK_1*P*SUMAXP_1 + SUMAXP_1^2)^0.5)/(2 - 8*KeqAK_1)) - G6P*(SUMAXP_1 - (P^2 - 4*KeqAK_1*P^2 - 2*P*SUMAXP_1 + 8*KeqAK_1*P*SUMAXP_1 + SUMAXP_1^2)^0.5)/(1 - 4*KeqAK_1)/KeqGLK_1)/((1 + GLCi/KmGLKGLCi_1 + G6P/KmGLKG6P_1)*(1 + (P - 4*KeqAK_1*P - SUMAXP_1 + (P^2 - 4*KeqAK_1*P^2 - 2*P*SUMAXP_1 + 8*KeqAK_1*P*SUMAXP_1 + SUMAXP_1^2)^0.5)/(2 - 8*KeqAK_1)/KmGLKATP_1 + (SUMAXP_1 - (P^2 - 4*KeqAK_1*P^2 - 2*P*SUMAXP_1 + 8*KeqAK_1*P*SUMAXP_1 + SUMAXP_1^2)^0.5)/(1 - 4*KeqAK_1)/KmGLKADP_1)); vGLK is "Hexokinase";
    VmGLK_1 = 226.8 mM_per_minute; KmGLKGLCi_1 = 0.08 mM; KmGLKATP_1 = 0.15 mM; KeqAK_1 = 0.45; SUMAXP_1 = 4.1 mM; KeqGLK_1 = 3800 dimensionless; KmGLKG6P_1 = 30 mM; KmGLKADP_1 = 0.23 mM;
  vPGI: G6P -> F6P; cytosol*VmPGI_2/KmPGIG6P_2*(G6P - F6P/KeqPGI_2)/(1 + G6P/KmPGIG6P_2 + F6P/KmPGIF6P_2); vPGI is "Glucose-6-phosphate isomerase";
    VmPGI_2 = 340.2 mM_per_minute; KmPGIG6P_2 = 1.4 mM; KeqPGI_2 = 0.314 dimensionless; KmPGIF6P_2 = 0.3 mM;
  vGLYCO: G6P + P -> $Glyc; cytosol*KGLYCOGEN_3; vGLYCO is "Glycogen synthesis";
    KGLYCOGEN_3 = 6 mM_per_minute;
  vTreha: 2 G6P + P -> $Trh; cytosol*KTREHALOSE_4; vTreha is "Trehalose 6-phosphate synthase";
    KTREHALOSE_4 = 2.4 mM_per_minute;
  vPFK: F6P + P -> F16P; cytosol*VmPFK_5*gR_5*Lambda1*Lambda2*R_PFK/(R_PFK^2 + L_PFK*T_PFK^2); vPFK is "Phosphofructokinase";
    VmPFK_5 = 183.6 mM_per_minute;
  vALD: F16P -> 2 TRIO; cytosol*VmALD_6/KmALDF16P_6*(F16P - KeqTPI_6/(1 + KeqTPI_6)*TRIO*(1/(1 + KeqTPI_6))*TRIO/KeqALD_6)/(1 + F16P/KmALDF16P_6 + KeqTPI_6/(1 + KeqTPI_6)*TRIO/KmALDGAP_6 + 1/(1 + KeqTPI_6)*TRIO/KmALDDHAP_6 + KeqTPI_6/(1 + KeqTPI_6)*TRIO*(1/(1 + KeqTPI_6))*TRIO/(KmALDGAP_6*KmALDDHAP_6) + F16P*(KeqTPI_6/(1 + KeqTPI_6))*TRIO/(KmALDGAPi_6*KmALDF16P_6)); vALD is "Aldolase";
    VmALD_6 = 321.3 mM_per_minute; KmALDF16P_6 = 0.3 mM; KeqTPI_6 = 0.045 dimensionless; KeqALD_6 = 0.069 dimensionless; KmALDGAP_6 = 2 mM; KmALDDHAP_6 = 2.4 mM; KmALDGAPi_6 = 10 mM;
  vGAPDH: TRIO + NAD -> BPG + NADH; cytosol*(VmGAPDHf_7*(KeqTPI_7/(1 + KeqTPI_7))*TRIO*NAD/(KmGAPDHGAP_7*KmGAPDHNAD_7) - VmGAPDHr_7*BPG*NADH/(KmGAPDHBPG_7*KmGAPDHNADH_7))/((1 + KeqTPI_7/(1 + KeqTPI_7)*TRIO/KmGAPDHGAP_7 + BPG/KmGAPDHBPG_7)*(1 + NAD/KmGAPDHNAD_7 + NADH/KmGAPDHNADH_7)); vGAPDH is "Glyceraldehyde 3-phosphate dehydrogenase";
    VmGAPDHf_7 = 1188 mM_per_minute; KeqTPI_7 = 0.045 dimensionless; KmGAPDHGAP_7 = 0.21 mM; KmGAPDHNAD_7 = 0.09 mM; VmGAPDHr_7 = 6561 mM_per_minute; KmGAPDHBPG_7 = 0.0098 mM; KmGAPDHNADH_7 = 0.06 mM;
  vPGK: BPG -> P3G + P; cytosol*VmPGK_8/(KmPGKP3G_8*KmPGKATP_8)*(KeqPGK_8*BPG*(SUMAXP_8 - (P^2 - 4*KeqAK_8*P^2 - 2*P*SUMAXP_8 + 8*KeqAK_8*P*SUMAXP_8 + SUMAXP_8^2)^0.5)/(1 - 4*KeqAK_8) - P3G*((P - 4*KeqAK_8*P - SUMAXP_8 + (P^2 - 4*KeqAK_8*P^2 - 2*P*SUMAXP_8 + 8*KeqAK_8*P*SUMAXP_8 + SUMAXP_8^2)^0.5)/(2 - 8*KeqAK_8)))/((1 + BPG/KmPGKBPG_8 + P3G/KmPGKP3G_8)*(1 + (P - 4*KeqAK_8*P - SUMAXP_8 + (P^2 - 4*KeqAK_8*P^2 - 2*P*SUMAXP_8 + 8*KeqAK_8*P*SUMAXP_8 + SUMAXP_8^2)^0.5)/(2 - 8*KeqAK_8)/KmPGKATP_8 + (SUMAXP_8 - (P^2 - 4*KeqAK_8*P^2 - 2*P*SUMAXP_8 + 8*KeqAK_8*P*SUMAXP_8 + SUMAXP_8^2)^0.5)/(1 - 4*KeqAK_8)/KmPGKADP_8)); vPGK is "Phosphoglycerate kinase";
    VmPGK_8 = 1296 mM_per_minute; KmPGKP3G_8 = 0.53 mM; KmPGKATP_8 = 0.3 mM; KeqPGK_8 = 3200 dimensionless; SUMAXP_8 = 4.1 mM; KeqAK_8 = 0.45 mM; KmPGKBPG_8 = 0.003 mM; KmPGKADP_8 = 0.2 mM;
  vPGM: P3G -> P2G; cytosol*VmPGM_9/KmPGMP3G_9*(P3G - P2G/KeqPGM_9)/(1 + P3G/KmPGMP3G_9 + P2G/KmPGMP2G_9); vPGM is "Phosphoglycerate mutase";
    VmPGM_9 = 2538 mM_per_minute; KmPGMP3G_9 = 1.2 mM; KeqPGM_9 = 0.19 dimensionless; KmPGMP2G_9 = 0.1 mM;
  vENO: P2G -> PEP; cytosol*VmENO_10/KmENOP2G_10*(P2G - PEP/KeqENO_10)/(1 + P2G/KmENOP2G_10 + PEP/KmENOPEP_10); vENO is "Enolase";
    VmENO_10 = 364.5 mM_per_minute; KmENOP2G_10 = 0.04 mM; KeqENO_10 = 6.7 dimensionless; KmENOPEP_10 = 0.5 mM;
  vPYK: PEP -> PYR + P; cytosol*VmPYK_11/(KmPYKPEP_11*KmPYKADP_11)*(PEP*(SUMAXP_11 - (P^2 - 4*KeqAK_11*P^2 - 2*P*SUMAXP_11 + 8*KeqAK_11*P*SUMAXP_11 + SUMAXP_11^2)^0.5)/(1 - 4*KeqAK_11) - PYR*((P - 4*KeqAK_11*P - SUMAXP_11 + (P^2 - 4*KeqAK_11*P^2 - 2*P*SUMAXP_11 + 8*KeqAK_11*P*SUMAXP_11 + SUMAXP_11^2)^0.5)/(2 - 8*KeqAK_11))/KeqPYK_11)/((1 + PEP/KmPYKPEP_11 + PYR/KmPYKPYR_11)*(1 + (P - 4*KeqAK_11*P - SUMAXP_11 + (P^2 - 4*KeqAK_11*P^2 - 2*P*SUMAXP_11 + 8*KeqAK_11*P*SUMAXP_11 + SUMAXP_11^2)^0.5)/(2 - 8*KeqAK_11)/KmPYKATP_11 + (SUMAXP_11 - (P^2 - 4*KeqAK_11*P^2 - 2*P*SUMAXP_11 + 8*KeqAK_11*P*SUMAXP_11 + SUMAXP_11^2)^0.5)/(1 - 4*KeqAK_11)/KmPYKADP_11)); vPYK is "Pyruvate kinase";
    VmPYK_11 = 1093.5 mM_per_minute; KmPYKPEP_11 = 0.14 mM; KmPYKADP_11 = 0.53 mM; SUMAXP_11 = 4.1 mM; KeqAK_11 = 0.45 dimensionless; KeqPYK_11 = 6500 dimensionless; KmPYKPYR_11 = 21 mM; KmPYKATP_11 = 1.5 mM;
  vPDC: PYR -> ACE + $CO2; cytosol*VmPDC_12*(PYR^nPDC_12/KmPDCPYR_12^nPDC_12)/(1 + PYR^nPDC_12/KmPDCPYR_12^nPDC_12); vPDC is "Pyruvate decarboxylase";
    VmPDC_12 = 175.5 mM_per_minute; nPDC_12 = 1.9 dimensionless; KmPDCPYR_12 = 4.33 mM;
  vSUC: 2 ACE + 3 NAD + 4 P -> 3 NADH + $SUCC; cytosol*KSUCC_13*ACE; vSUC is "Succinate synthesis";
    KSUCC_13 = 21.4 per_minute;
  vGLT: $GLCo -> GLCi; VmGLT_14/KmGLTGLCo_14*(extracellular*GLCo - cytosol*GLCi/KeqGLT_14)/(1 + GLCo/KmGLTGLCo_14 + GLCi/KmGLTGLCi_14 + 0.91*GLCo*GLCi/(KmGLTGLCo_14*KmGLTGLCi_14)); vGLT is "Glucose transport";
    VmGLT_14 = 97.2 mM_per_minute; KmGLTGLCo_14 = 1.1918 mM; KeqGLT_14 = 1 dimensionless; KmGLTGLCi_14 = 1.1918 mM;
  vADH: ACE + NADH -> NAD + $ETOH; -cytosol*(VmADH_15/(KiADHNAD_15*KmADHETOH_15)*(NAD*ETOH - NADH*ACE/KeqADH_15)/(1 + NAD/KiADHNAD_15 + KmADHNAD_15*ETOH/(KiADHNAD_15*KmADHETOH_15) + KmADHNADH_15*ACE/(KiADHNADH_15*KmADHACE_15) + NADH/KiADHNADH_15 + NAD*ETOH/(KiADHNAD_15*KmADHETOH_15) + KmADHNADH_15*NAD*ACE/(KiADHNAD_15*KiADHNADH_15*KmADHACE_15) + KmADHNAD_15*ETOH*NADH/(KiADHNAD_15*KmADHETOH_15*KiADHNADH_15) + NADH*ACE/(KiADHNADH_15*KmADHACE_15) + NAD*ETOH*ACE/(KiADHNAD_15*KmADHETOH_15*KiADHACE_15) + ETOH*NADH*ACE/(KiADHETOH_15*KiADHNADH_15*KmADHACE_15))); vADH is "Alcohol dehydrogenase";
    VmADH_15 = 810 mM_per_minute; KiADHNAD_15 = 0.92 mM; KmADHETOH_15 = 17 mM; KeqADH_15 = 6.9e-5 dimensionless; KmADHNAD_15 = 0.17 mM; KmADHNADH_15 = 0.11 mM; KiADHNADH_15 = 0.031 mM; KmADHACE_15 = 1.11 mM; KiADHACE_15 = 1.1 mM; KiADHETOH_15 = 90 mM;
  vG3PDH: TRIO + NADH -> NAD + $GLY; cytosol*VmG3PDH_16/(KmG3PDHDHAP_16*KmG3PDHNADH_16)*(1/(1 + KeqTPI_16)*TRIO*NADH - GLY*NAD/KeqG3PDH_16)/((1 + 1/(1 + KeqTPI_16)*TRIO/KmG3PDHDHAP_16 + GLY/KmG3PDHGLY_16)*(1 + NADH/KmG3PDHNADH_16 + NAD/KmG3PDHNAD_16)); vG3PDH is "Glycerol 3-phosphate dehydrogenase";
    VmG3PDH_16 = 70.2 mM_per_minute; KmG3PDHDHAP_16 = 0.4 mM; KmG3PDHNADH_16 = 0.023 mM; KeqTPI_16 = 0.045 dimensionless; KeqG3PDH_16 = 4300 dimensionless; KmG3PDHGLY_16 = 1 mM; KmG3PDHNAD_16 = 0.93 mM;
  vATP: P -> ; cytosol*KATPASE_17*((P - 4*KeqAK_17*P - SUMAXP_17 + (P^2 - 4*KeqAK_17*P^2 - 2*P*SUMAXP_17 + 8*KeqAK_17*P*SUMAXP_17 + SUMAXP_17^2)^0.5)/(2 - 8*KeqAK_17)); vATP is "ATPase activity";
    KATPASE_17 = 33.7 per_minute; KeqAK_17 = 0.45 dimensionless; SUMAXP_17 = 4.1 mM;

  // Unit definitions:
  unit substance = 1e-3 mole; substance is "millimole";
  unit time = 60 second; time is "minute";
  unit mM_per_minute = 1e-3 mole / (litre * 60 second);
  unit mM = 1e-3 mole / litre;
  unit per_minute = 1 / (60 second);
end
