// SBML level 2 version 1

model Yildirim2003_Lac_operon()
  // Yildirim2003_Lac_Operon
  // The model reproduces the time profile of beta-galactosidase activity as shown in Fig 3 of the paper. The delay functions for transcription (M) and translation (B and P) have been implemented by introducing intermediates ( I1, I2 and I3) in the reaction scheme which then give their respective products (I1-> M, I2 ->B and I3 ->P) after an appropriate length of time. The steady state values, attained upon simulation of model equations, for Allolactose (A), mRNA (M), beta-galactosidase (B), Lactose (L), and Permease (P) match with those predicted by the paper. The model was successfully tested on Jarnac, MathSBML and COPASI
  // This model originates from BioModels Database: A Database of Annotated Published Models. It is copyright (c) 2005-2007 The BioModels Team.
  // For more information see the terms of use.

  // Compartments:
  compartment cell = 1;

  // Species:
  species M in cell = 0.000626; M is "mRNA";
  species B in cell = 0; B is "Betagalactosidase";
  species A in cell = 0.038; A is "allolactose";
  species L in cell = 0.372; L is "lactose_internal";
  species P in cell = 0.0149; P is "permease";
  species I1 in cell = 0; I1 is "PartialmRNA";
  species I2 in cell = 0; I2 is "PartialBetagalactosidase";
  species I3 in cell = 0; I3 is "PartialPermease";
  species $L_e in cell = 0.08; L_e is "External_Lactose";

  // Parameters:
  mu = 0.0226;
  gamma_M = 0.411;
  gamma_B = 0.000833;
  gamma_A = 0.52;
  gamma_0 = 7.25e-7;
  K = 7200;
  alpha_M = 0.000997;
  tau_B = 2;
  alpha_A = 17600;
  K_L1 = 1.81;
  alpha_B = 0.0166;
  K_A = 1.95;
  beta_A = 21500;
  tau_M = 0.1;
  K_L = 0.97;
  gamma_L = 0;
  gamma_P = 0.65;
  alpha_L = 2880;
  alpha_P = 10;
  tau_P = 0.83;
  beta_L1 = 2650;
  K_Le = 0.26;
  K_1 = 25200;

  // Reactions:
  r_m1: => M; cell*gamma_0; r_m1 is "Basal_mRNA_Synthesis";
  r_m2: M => ; cell*M*(gamma_M + mu); r_m2 is "mRNA_Degradation";
  r_m3_i1: I1 => M; cell*I1/tau_M; r_m3_i1 is "allolactose_controlled_mRNA_synthesis";
  r_i1: => I1; cell*alpha_M*((K_1*exp(mu*tau_M*(-2))*A^2 + 1)/(K + K_1*exp(-2*mu*tau_M)*A^2)); r_i1 is "allolactose_controlled_partial_mRNA_synthesis";  // modifiers: A
  r_b1: B => ; cell*B*(gamma_B + mu); r_b1 is "Beta_galactosidase_Degredation";
  r_b2_i2: I2 => B; cell*I2/tau_B; r_b2_i2 is "Beta_galactosidase_synthesis";
  r_i2: => I2; cell*alpha_B*M*exp(-(mu*tau_B)); r_i2 is "Partial_Beta_galactosidase_synthesis";  // modifiers: M
  r_a1: A => ; cell*A*(gamma_A + mu); r_a1 is "Basal_Allolactose_Degredation";
  r_a2: A => ; cell*beta_A*B*(A/(K_A + A)); r_a2 is "Betagalactosidase_mediated_Allolactose_Degredation";  // modifiers: B
  r_a3_l1: L => A; cell*alpha_A*B*(L/(K_L + L)); r_a3_l1 is "Beta_galactosidase_reaction";  // modifiers: B
  r_l2: L => ; cell*L*(gamma_L + mu); r_l2 is "lactose_degredation";
  r_l3: L => ; cell*beta_L1*P*(L/(K_L1 + L)); r_l3 is "Lactose_transport_out";  // modifiers: P
  r_l4: => L; cell*alpha_L*P*(L_e/(K_Le + L_e)); r_l4 is "Lactose_transport_in";  // modifiers: P, L_e
  r_p1: P => ; cell*P*(gamma_P + mu); r_p1 is "permease_degredation";
  r_p2_i3: I3 => P; cell*I3/(tau_B + tau_P); r_p2_i3 is "permease_synthesis";
  r_i3: => I3; cell*alpha_P*M*exp(-1*mu*(tau_B + tau_P)); r_i3 is "partial_permease_synthesis";  // modifiers: M

  // Unit definitions:
  unit time = 60 second; time is "minute";
  unit substance = 1e-3 mole; substance is "millimoles";
end
