// SBML level 2 version 1

model Fung2005_Metabolator()
  // Fung2005_Metabolic_Oscillator
  // A Synthetic Gene-Metabolic Oscillator
  // Reference: Fung et al; Nature (2005) 435:118-122
  // Name of kinetic law Reaction
  // Glycolytic flux, V_gly: nil -> AcCoA;
  // Flux to TCA cycle/ETOH, V_TCA: AcCoA -> TCA/EtOH;
  // HOAc ex/import,reversible, V_out: HOAc -> HOAc_E
  // V_Pta: AcCoA + Pi -> AcP + CoA
  // reversible, V_Ack: AcP + ADP -> OAc + ATP
  // V_Acs: OAC + ATP -> AcCoA +PPi
  // Acetic acid-base equillibrium, reversible, V_Ace: OAC + H -> HOAc
  // Expression of LacI, R_LacI: nil -> LacI
  // Expression of Acs, R_Acs: nil -> Acs
  // Expression of Pta, R_Pta: nil -> Pta
  // LacI degradation, R_dLacI: LacI -> nil
  // Acs degradation, R_dAcs: Acs -> nil
  // Pta degradation, R_dPta: Pta -> nil
  // For this model the differential equation for V_Ace was changed from:
  // C*(AcP*H-K_eq*OAC) with C = 100 in the supplemental material
  // to C*(OAc*H-K_eq*HOAc) with C = 100, as in Bulter et. al; PNAS(2004),101,2299-2304 , and a value for K_eq of 5*10^-4 after communication with the authors.
  // translated to SBML by:
  // Lukas Endler(luen at tbi.univie.ac.at), Christoph Flamm (xtof at tbi.univie.ac.at)
  // Biomodels Curation The model reproduces 3a of the paper for glycolytic flux Vgly = 0.5. The authors have agreed that the values on Y-axis are marked wrong and hence there is a discrepancy between model simulation results and the figure. Also, note that the values of concentration and time are in dimensionless units. The model was successfully tested on MathSBML and Jarnac.
  // This model originates from BioModels Database: A Database of Annotated Published Models. It is copyright (c) 2005-2007 The BioModels Team.
  // For more information see the terms of use.

  // Compartments:
  compartment compartment = 1; compartment is "Intracellular";

  // Species:
  species AcCoA in compartment = 0; AcCoA is "Acetyl-CoA";
  species AcP in compartment = 0; AcP is "Acetyl phosphate";
  species OAc in compartment = 0; OAc is "Acetate";
  species HOAc in compartment = 0; HOAc is "protonated acetate";
  species LacI in compartment = 0; LacI is "lac repressor";
  species Acs in compartment = 0; Acs is "Acetyl-CoA synthase";
  species Pta in compartment = 0; Pta is "Phosphate acetyl transferase";
  species $HOAc_E in compartment = 0; HOAc_E is "acetate export";

  // Parameters:
  S0 = 0.5;
  kTCA = 10;
  k1 = 80;
  KM1 = 0.06;
  k2 = 0.8;
  KM2 = 0.1;
  kAck_f = 1;
  kAck_r = 1;
  C = 100;
  H = 1e-7;
  Keq = 0.0005;
  k3 = 0.01;
  alpha0 = 0;
  alpha1 = 0.1;
  alpha2 = 2;
  alpha3 = 2;
  Kg1 = 10;
  Kg2 = 10;
  Kg3 = 0.001;
  n = 2;
  kd = 0.06;

  // Reactions:
  V_gly: => AcCoA; compartment*S0; V_gly is "Glycolytic flux";
  V_TCA: AcCoA => ; compartment*kTCA*AcCoA; V_TCA is "Flux to TCA cycle";
  V_out: HOAc -> $HOAc_E; compartment*k3*(HOAc - HOAc_E); V_out is "Intercellular transport of Acetate";
  V_Pta: AcCoA => AcP; compartment*k1*Pta*AcCoA/(KM1 + AcCoA); V_Pta is "Phosphate acetyl transferase flux";  // modifiers: Pta
  V_Ack: AcP -> OAc; compartment*(kAck_f*AcP - kAck_r*OAc); V_Ack is "Acetate kinase";
  V_Acs: OAc => AcCoA; compartment*k2*Acs*OAc/(KM2 + OAc); V_Acs is "Acetyl-CoA synthase flux";  // modifiers: Acs
  V_Ace: OAc -> HOAc; compartment*C*(OAc*H - Keq*HOAc); V_Ace is "Acid-base equilibrium";
  R_LacI: => LacI; compartment*(alpha1*(AcP/Kg1)^n/(1 + (AcP/Kg1)^n) + alpha0); R_LacI is "LacI synthesis";  // modifiers: AcP
  R_Acs: => Acs; compartment*(alpha2*(AcP/Kg2)^n/(1 + (AcP/Kg2)^n) + alpha0); R_Acs is "Acetyl-CoA synthase synthesis";  // modifiers: AcP
  R_Pta: => Pta; alpha3/(1 + (LacI/Kg3)^n) + alpha0; R_Pta is "Phosphate acetyl transferase synthase";  // modifiers: LacI
  R_dLacI: LacI => ; compartment*kd*LacI; R_dLacI is "LacI degradation";
  R_dAcs: Acs => ; compartment*kd*Acs; R_dAcs is "Acs degradation";
  R_dPta: Pta => ; compartment*kd*Pta; R_dPta is "Pta degradation";
end
