// SBML level 2 version 1

model Curien2003_MetThr_synthesis()
  // SBML level 2 code generated for the JWS Online project by Jacky Snoep using PySCeS
  // Run this model online at http://jjj.biochem.sun.ac.za
  // To cite JWS Online please refer to: Olivier, B.G. and Snoep, J.L. (2004) Web-based modelling using JWS Online, Bioinformatics, 20:2143-2144
  // Biomodels Curation The model simulates the flux for TS and CGS under conditions given in Table 2 and reproduces the dotted lines given in Table 3 of the paper. There is a typo in the equation for the apparent specificity constant for Phser, Kts (equation13). This was changed after communication with the authors to be: Kts = 5.9E-4+6.2E-2*pow(AdoMet,2.9)/(pow(32,2.9)+pow(AdoMet,2.9)). The model was successfully tested on Jarnac.
  // This model originates from BioModels Database: A Database of Annotated Published Models. It is copyright (c) 2005-2007 The BioModels Team.
  // For more information see the terms of use.

  // Compartments:
  compartment compartment = 1; compartment is "Cell";

  // Species:
  species Phser in compartment = 0; Phser is "Phosphohomoserine";
  species $Thr in compartment = 0; Thr is "Threonine";
  species $Cystathionine in compartment = 0;
  species $Hser in compartment = 0; Hser is "Homoserine";
  species $Phi in compartment = 10000; Phi is "Inorganic phosphate";
  species $Cys in compartment = 15; Cys is "Cysteine";

  // Reactions:
  Phosphohomoserine_synthesis: $Hser -> Phser; compartment*V0;
    V0 = 1 microM_per_second;
  vCys: Phser + $Cys -> $Cystathionine + $Phi; CGS*(kcat2/(1 + KmCYS/Cys))*Phser/(Phser + KmPHSER*(1 + Phi/Ki2)/(1 + KmCYS/Cys)); vCys is "Cystathionine gamma-synthase";
    CGS = 0.7 microM; kcat2 = 30 microM; KmCYS = 460 microM; KmPHSER = 2500 microM; Ki2 = 2000 microM;
  vThr: Phser -> $Thr + $Phi; TS*(5.9e-4 + 0.062*AdoMet^2.9/(32^2.9 + AdoMet^2.9))*Phser/(1 + Phi/Ki3); vThr is "Threonine Synthase";
    TS = 5 microM; AdoMet = 20 microM; Ki3 = 1000 microM;

  // Unit definitions:
  unit substance = 1e-6 mole; substance is "micromole";
  unit microM = 1e-6 mole / litre;
  unit sec_inverse = 1 / second;
  unit microM_per_second = 1e-6 mole / (litre * second);
end
