// SBML level 2 version 1

model Src_MitoticActivation()
  // Fuss2006_MitoticActivation
  // The model was curated with XPP. The figure 3 was successfully reproduced.
  // This model originates from BioModels Database: A Database of Annotated Published Models. It is copyright (c) 2005-2007 The BioModels Team.
  // For more information see the terms of use.

  // Compartments:
  compartment default = 1;

  // Species:
  species srci in default = 1;
  species srco in default = 0;
  species srca in default = 0;
  species srcc in default = 0;
  species Cbp_P_CSK in default = 0;
  species CSK_cytoplasm in default = 1;
  species PTP in default = 1;
  species PTP_pY789 in default = 0;
  species Cbp in default = 1;
  species Cbp_P in default = 0;

  // Parameters:
  k1 = 1;
  k2 = 0.8;
  k3 = 1;
  k4 = 10;
  kPTP = 1;
  kCbp = 1;
  p1 = 0.05;
  p2 = 0.15;
  p3 = 0.035;
  src_background = 0.0001;
  PTP_background = 0;
  kCSKon = 0.1;
  kCSKoff = 0.01;
  rho_srca = 1;
  rho_srco = 0;
  rho_srcc = 1;
  Kser = 1;
  acsk0 = 0;

  // Assignment rules:
  src_activity := rho_srco*srco + rho_srca*srca + src_background + rho_srcc*srcc;
  ptp_activity := PTP_background + Kser*PTP_pY789;

  // Reactions:
  v1: srci -> srco; (k2*ptp_activity*srci - k1*Cbp_P_CSK*srco)*default;  // modifiers: Cbp_P_CSK
  v2: srco -> srca; (k3*src_activity*srco - p1*srca)*default;
  v3: srca -> srcc; (k1*Cbp_P_CSK*srca - k2*ptp_activity*srcc)*default;  // modifiers: Cbp_P_CSK
  v4: srcc => srci; default*k4*p1*srcc;
  CSK_translocation: CSK_cytoplasm + Cbp_P -> Cbp_P_CSK; (Cbp_P*kCSKon*CSK_cytoplasm - kCSKoff*Cbp_P_CSK)*default;
  PTP_phosphorylation: PTP -> PTP_pY789; default*((kPTP*src_activity + p3)*PTP - p2*PTP_pY789);
  Cbp_phosphorylation: Cbp => Cbp_P; kCbp*src_activity*Cbp*default;
end
