// SBML level 2 version 1

model Bakker2001_Glycolysis()
  // .
  // .
  // .
  // SBML level 2 code generated for the JWS Online project by Jacky Snoep using PySCeS
  // Run this model online at http://jjj.biochem.sun.ac.za
  // To cite JWS Online please refer to: Olivier, B.G. and Snoep, J.L. (2004) Web-based modelling using JWS Online, Bioinformatics, 20:2143-2144
  // .
  // .
  // .
  // .
  // .
  // .
  // Biomodels Curation: The paper refers to the model equations present in Bakker et al's " Glycolysis in bloodstream from Trypanosoma brucei can be understood in terms of the kinetics of glycolytic enzymes" (Pubmed ID: 9013556), also, the authors claim that some of the modifications in these equations were made based on the experimental results from the paper "Contribution of glucose transport in the control of glycolytic flux in Trypanosoma brucei" (Pubmed ID: 10468568). The model reproduces the various flux values in Fig 3 for 100% TPI activity. It also matches with the values provided in Table 2 of the paper. The model was successfully tested on Jarnac.
  // This model originates from BioModels Database: A Database of Annotated Published Models. It is copyright (c) 2005-2007 The BioModels Team.
  // For more information see the terms of use.

  // Compartments:
  compartment glycosome in cytosol = 1;
  compartment cytosol in extracellular = 1;
  compartment extracellular = 1;

  // Species:
  species GlcI in glycosome = 0.0340009; GlcI is "Glucose";
  species Pg in glycosome = 7.63936; Pg is "Phosphates in Glycosome";
  species Glc6P in glycosome = 2.07199; Glc6P is "Glucose 6-phosphate";
  species Fru6P in glycosome = 0.511773; Fru6P is "Fructose 6-phosphate";
  species Fru16BP in glycosome = 16.5371; Fru16BP is "Fructose 1,6-bisphosphate";
  species DHAP in glycosome = 3.89921; DHAP is "Dihydroxyacetone phosphate";
  species GAP in glycosome = 0.0399329; GAP is "Glyceraldehyde 3-phosphate";
  species NAD in glycosome = 3.95514;
  species BPGA13 in glycosome = 0.0326745; BPGA13 is "1,3-bisphosphoglycerate";
  species NADH in glycosome = 0.0448639;
  species Pyr in glycosome = 4.77413; Pyr is "Pyruvate";
  species Nb in glycosome = 1.59603; Nb is "3-PGA 2-PGA PEP";
  species Pc in cytosol = 6.51839; Pc is "Phosphates cytosol";
  species $PyrE in extracellular = 0; PyrE is "Pyruvate external";
  species $Gly in glycosome = 0; Gly is "Glycerol";
  species $GlcE in extracellular = 5; GlcE is "Glucose external";
  species Gly3P in glycosome = 0; Gly3P is "Glycerol 3-phosphate";

  // Reactions:
  vGlcTr: $GlcE -> 0.175439 GlcI; Vm1*(GlcE - GlcI)/(K1Glc + GlcE + GlcI + afac*GlcE*GlcI/K1Glc); vGlcTr is "Glucose transport";
    Vm1 = 106.2 nanomole_per_min_per_mg; K1Glc = 2 mM; afac = 0.75 dimensionless;
  vHK: 4.087719 Pg + 0.175439 GlcI -> 4.087719 Glc6P; Vm2*GlcI*(-vHK_sumAg + (1 - 4*vHK_KeqAK)*Pg + (4*(1 - 4*vHK_KeqAK)*vHK_KeqAK*Pg^2 + (vHK_sumAg - (1 - 4*vHK_KeqAK)*Pg)^2)^0.5)/(2*K2ATPg*K2GlcI*(1 - 4*vHK_KeqAK)*(1 + Glc6P/K2Glc6P + GlcI/K2GlcI)*(1 + (-vHK_sumAg + (1 - 4*vHK_KeqAK)*Pg + (4*(1 - 4*vHK_KeqAK)*vHK_KeqAK*Pg^2 + (vHK_sumAg - (1 - 4*vHK_KeqAK)*Pg)^2)^0.5)/(2*K2ATPg*(1 - 4*vHK_KeqAK)) + (Pg - (-vHK_sumAg + (1 - 4*vHK_KeqAK)*Pg + (4*(1 - 4*vHK_KeqAK)*vHK_KeqAK*Pg^2 + (vHK_sumAg - (1 - 4*vHK_KeqAK)*Pg)^2)^0.5)/(1 - 4*vHK_KeqAK))/K2ADPg)); vHK is "Hexokinase";
    Vm2 = 625 nanomole_per_min_per_mg; vHK_sumAg = 6 mM; vHK_KeqAK = 0.442 dimensionless; K2ATPg = 0.116 mM; K2GlcI = 0.1 mM; K2Glc6P = 12 mM; K2ADPg = 0.126 mM;
  vPGI: 4.087719 Glc6P -> 4.087719 Fru6P; Vm3*(Glc6P/K3Glc6P - Fru6P/K3Fru6P)/(1 + Glc6P/K3Glc6P + Fru6P/K3Fru6P); vPGI is "Glucose-phosphate isomerase";
    Vm3 = 848; K3Glc6P = 0.4; K3Fru6P = 0.12;
  vPFK: 4.087719 Pg + 4.087719 Fru6P -> 4.087719 Fru16BP; K4i1Fru16BP*Vm4*Fru6P*(-vPFK_sumAg + (1 - 4*vPFK_KeqAK)*Pg + (4*(1 - 4*vPFK_KeqAK)*vPFK_KeqAK*Pg^2 + (vPFK_sumAg - (1 - 4*vPFK_KeqAK)*Pg)^2)^0.5)/(2*K4ATPg*K4Fru6P*(1 - 4*vPFK_KeqAK)*(K4i1Fru16BP + Fru16BP)*(1 + Fru16BP/K4i2Fru16BP + Fru6P/K4Fru6P)*(1 + (-vPFK_sumAg + (1 - 4*vPFK_KeqAK)*Pg + (4*(1 - 4*vPFK_KeqAK)*vPFK_KeqAK*Pg^2 + (vPFK_sumAg - (1 - 4*vPFK_KeqAK)*Pg)^2)^0.5)/(2*K4ATPg*(1 - 4*vPFK_KeqAK)))); vPFK is "Phosphofructokinase";
    K4i1Fru16BP = 15.8 mM; Vm4 = 780 nanomole_per_min_per_mg; vPFK_sumAg = 6 mM; vPFK_KeqAK = 0.442 dimensionless; K4ATPg = 0.026 mM; K4Fru6P = 0.82 mM; K4i2Fru16BP = 10.7 mM;
  vALD: 4.087719 Fru16BP -> 4.087719 GAP + 0.175439 DHAP; Vm5*(-(Vm5r*GAP*(vALD_Vt*DHAP - vALD_sumc5*vALD_Vc*(1 + vALD_Vc/vALD_Vg)*DHAP/(vALD_sumc4 + vALD_sumc5*vALD_Vc/vALD_Vg - BPGA13 - 2*Fru16BP - Fru6P - GAP - Glc6P - Pg))/(K5DHAP*K5GAP*vALD_Vg)) + 111.1111*Vm5f*Fru16BP/(1 + 0.7352941*(-vALD_sumAg + (1 - 4*vALD_KeqAK)*Pg + (4*(1 - 4*vALD_KeqAK)*vALD_KeqAK*Pg^2 + (vALD_sumAg - (1 - 4*vALD_KeqAK)*Pg)^2)^0.5)/(1 - 4*vALD_KeqAK) + 0.6622517*(Pg - (-vALD_sumAg + (1 - 4*vALD_KeqAK)*Pg + (4*(1 - 4*vALD_KeqAK)*vALD_KeqAK*Pg^2 + (vALD_sumAg - (1 - 4*vALD_KeqAK)*Pg)^2)^0.5)/(1 - 4*vALD_KeqAK)) + 0.2739726*(vALD_sumAg - Pg + (-vALD_sumAg + (1 - 4*vALD_KeqAK)*Pg + (4*(1 - 4*vALD_KeqAK)*vALD_KeqAK*Pg^2 + (vALD_sumAg - (1 - 4*vALD_KeqAK)*Pg)^2)^0.5)/(2*(1 - 4*vALD_KeqAK)))))/(1 + GAP/K5GAP + (vALD_Vt*DHAP - vALD_sumc5*vALD_Vc*(1 + vALD_Vc/vALD_Vg)*DHAP/(vALD_sumc4 + vALD_sumc5*vALD_Vc/vALD_Vg - BPGA13 - 2*Fru16BP - Fru6P - GAP - Glc6P - Pg))/(K5DHAP*vALD_Vg) + GAP*(vALD_Vt*DHAP - vALD_sumc5*vALD_Vc*(1 + vALD_Vc/vALD_Vg)*DHAP/(vALD_sumc4 + vALD_sumc5*vALD_Vc/vALD_Vg - BPGA13 - 2*Fru16BP - Fru6P - GAP - Glc6P - Pg))/(K5DHAP*K5GAP*vALD_Vg) + 111.1111*Fru16BP/(1 + 0.7352941*(-vALD_sumAg + (1 - 4*vALD_KeqAK)*Pg + (4*(1 - 4*vALD_KeqAK)*vALD_KeqAK*Pg^2 + (vALD_sumAg - (1 - 4*vALD_KeqAK)*Pg)^2)^0.5)/(1 - 4*vALD_KeqAK) + 0.6622517*(Pg - (-vALD_sumAg + (1 - 4*vALD_KeqAK)*Pg + (4*(1 - 4*vALD_KeqAK)*vALD_KeqAK*Pg^2 + (vALD_sumAg - (1 - 4*vALD_KeqAK)*Pg)^2)^0.5)/(1 - 4*vALD_KeqAK)) + 0.2739726*(vALD_sumAg - Pg + (-vALD_sumAg + (1 - 4*vALD_KeqAK)*Pg + (4*(1 - 4*vALD_KeqAK)*vALD_KeqAK*Pg^2 + (vALD_sumAg - (1 - 4*vALD_KeqAK)*Pg)^2)^0.5)/(2*(1 - 4*vALD_KeqAK)))) + 111.1111*Fru16BP*GAP/(K5GAPi*(1 + 0.7352941*(-vALD_sumAg + (1 - 4*vALD_KeqAK)*Pg + (4*(1 - 4*vALD_KeqAK)*vALD_KeqAK*Pg^2 + (vALD_sumAg - (1 - 4*vALD_KeqAK)*Pg)^2)^0.5)/(1 - 4*vALD_KeqAK) + 0.6622517*(Pg - (-vALD_sumAg + (1 - 4*vALD_KeqAK)*Pg + (4*(1 - 4*vALD_KeqAK)*vALD_KeqAK*Pg^2 + (vALD_sumAg - (1 - 4*vALD_KeqAK)*Pg)^2)^0.5)/(1 - 4*vALD_KeqAK)) + 0.2739726*(vALD_sumAg - Pg + (-vALD_sumAg + (1 - 4*vALD_KeqAK)*Pg + (4*(1 - 4*vALD_KeqAK)*vALD_KeqAK*Pg^2 + (vALD_sumAg - (1 - 4*vALD_KeqAK)*Pg)^2)^0.5)/(2*(1 - 4*vALD_KeqAK)))))); vALD is "Aldolase";  // modifiers: BPGA13, Fru6P, Glc6P, Pg
    Vm5 = 1; Vm5r = 219.555 nanomole_per_min_per_mg; vALD_Vt = 5.7 microlitre_per_mg; vALD_sumc5 = 5 mM; vALD_Vc = 5.4549 microlitre_per_mg; vALD_Vg = 0.2451 microlitre_per_mg; vALD_sumc4 = 45 mM; K5DHAP = 0.015 mM; K5GAP = 0.067 mM; Vm5f = 184.5 nanomole_per_min_per_mg; vALD_sumAg = 6 mM; vALD_KeqAK = 0.442 dimensionless; K5GAPi = 0.098 mM;
  vTPI: 0.175439 DHAP -> 4.087719 GAP; Vm6*(-5.7*GAP/K6GAP + (vTPI_Vt*DHAP - vTPI_sumc5*vTPI_Vc*(1 + vTPI_Vc/vTPI_Vg)*DHAP/(vTPI_sumc4 + vTPI_sumc5*vTPI_Vc/vTPI_Vg - BPGA13 - 2*Fru16BP - Fru6P - GAP - Glc6P - Pg))/(K6DHAPg*vTPI_Vg))/(1 + GAP/K6GAP + (vTPI_Vt*DHAP - vTPI_sumc5*vTPI_Vc*(1 + vTPI_Vc/vTPI_Vg)*DHAP/(vTPI_sumc4 + vTPI_sumc5*vTPI_Vc/vTPI_Vg - BPGA13 - 2*Fru16BP - Fru6P - GAP - Glc6P - Pg))/(K6DHAPg*vTPI_Vg)); vTPI is "Triosephosphate isomerase";  // modifiers: BPGA13, Fru16BP, Fru6P, Glc6P, Pg
    Vm6 = 842 nanomole_per_min_per_mg; K6GAP = 0.25; vTPI_Vt = 5.7 microlitre_per_mg; vTPI_sumc5 = 5 mM; vTPI_Vc = 5.4549 mM; vTPI_Vg = 0.2451 mM; vTPI_sumc4 = 45 mM; K6DHAPg = 1.2 mM;
  vGAPdh: 4.087719 GAP + 4.087719 NAD -> 4.087719 NADH + 4.087719 BPGA13; Vm7*(Vm7f*(GAP*(NAD/K7GAP/K7NAD) - Vm7r/Vm7f*(BPGA13*NADH/K7BPGA13/K7NADH))/((1 + GAP/K7GAP + BPGA13/K7BPGA13)*(1 + NAD/K7NAD + NADH/K7NADH))); vGAPdh is "Glyceraldehyde 3-phosphate dehydrogenase";
    Vm7 = 1; Vm7f = 1470 nanomole_per_min_per_mg; K7GAP = 0.15 mM; K7NAD = 0.45 mM; Vm7r = 984.9 nanomole_per_min_per_mg; K7BPGA13 = 0.1 mM; K7NADH = 0.02 mM;
  vGDH: 0.175439 DHAP + 4.087719 NADH -> 4.087719 NAD + 0.175439 Gly3P; Vm8*Vm8f*(NADH*(vGDH_Vt*DHAP - vGDH_sumc5*vGDH_Vc*(1 + vGDH_Vc/vGDH_Vg)*DHAP/(vGDH_sumc4 + vGDH_sumc5*vGDH_Vc/vGDH_Vg - BPGA13 - 2*Fru16BP - Fru6P - GAP - Glc6P - Pg))/(K8DHAPg*K8NADH*vGDH_Vg) - Vm8r*NAD*(vGDH_sumc4 - BPGA13 - 2*Fru16BP - Fru6P - GAP - Glc6P - (vGDH_Vt*DHAP - vGDH_sumc5*vGDH_Vc*(1 + vGDH_Vc/vGDH_Vg)*DHAP/(vGDH_sumc4 + vGDH_sumc5*vGDH_Vc/vGDH_Vg - BPGA13 - 2*Fru16BP - Fru6P - GAP - Glc6P - Pg))/vGDH_Vg - Pg)/(K8Gly3Pg*K8NAD*Vm8f))/((1 + NAD/K8NAD + NADH/K8NADH)*(1 + (vGDH_Vt*DHAP - vGDH_sumc5*vGDH_Vc*(1 + vGDH_Vc/vGDH_Vg)*DHAP/(vGDH_sumc4 + vGDH_sumc5*vGDH_Vc/vGDH_Vg - BPGA13 - 2*Fru16BP - Fru6P - GAP - Glc6P - Pg))/(K8DHAPg*vGDH_Vg) + (vGDH_sumc4 - BPGA13 - 2*Fru16BP - Fru6P - GAP - Glc6P - (vGDH_Vt*DHAP - vGDH_sumc5*vGDH_Vc*(1 + vGDH_Vc/vGDH_Vg)*DHAP/(vGDH_sumc4 + vGDH_sumc5*vGDH_Vc/vGDH_Vg - BPGA13 - 2*Fru16BP - Fru6P - GAP - Glc6P - Pg))/vGDH_Vg - Pg)/K8Gly3Pg)); vGDH is "Glycerol 3-phosphate dehydrogenase";  // modifiers: BPGA13, Fru16BP, Fru6P, GAP, Glc6P, Pg
    Vm8 = 1; Vm8f = 533 nanomole_per_min_per_mg; vGDH_Vt = 5.7 microlitre_per_mg; vGDH_sumc5 = 5 mM; vGDH_Vc = 5.4549 microlitre_per_mg; vGDH_Vg = 0.2451 microlitre_per_mg; vGDH_sumc4 = 45 mM; K8DHAPg = 0.1 mM; K8NADH = 0.01 mM; Vm8r = 149.24; K8Gly3Pg = 2 mM; K8NAD = 0.4 mM;
  vGPO: 0.175439 Gly3P -> 0.175439 DHAP; Vm9*(vGPO_sumc5 - vGPO_sumc5*(1 + vGPO_Vc/vGPO_Vg)*DHAP/(vGPO_sumc4 + vGPO_sumc5*vGPO_Vc/vGPO_Vg - BPGA13 - 2*Fru16BP - Fru6P - GAP - Glc6P - Pg))/(K9Gly3Pc*(1 + (vGPO_sumc5 - vGPO_sumc5*(1 + vGPO_Vc/vGPO_Vg)*DHAP/(vGPO_sumc4 + vGPO_sumc5*vGPO_Vc/vGPO_Vg - BPGA13 - 2*Fru16BP - Fru6P - GAP - Glc6P - Pg))/K9Gly3Pc)); vGPO is "Glycerol 3-phosphate oxidase";  // modifiers: BPGA13, Fru16BP, Fru6P, GAP, Glc6P, Pg
    Vm9 = 368 nanomole_per_min_per_mg; vGPO_sumc5 = 5 mM; vGPO_Vc = 5.4549 microlitre_per_mg; vGPO_Vg = 0.2451 microlitre_per_mg; vGPO_sumc4 = 45 mM; K9Gly3Pc = 1.7 mM;
  vPyrTr: 0.183306 Pyr -> $PyrE; Vm10*Pyr/K10Pyr/(1 + Pyr/K10Pyr); vPyrTr is "Pyruvate transport";
    Vm10 = 200 nanomole_per_min_per_mg; K10Pyr = 1.96 mM;
  vPGK: 4.087719 BPGA13 -> 0.175439 Nb + 4.087719 Pg; Vm11*Vm11f*(-((1 + vPGK_Vc/vPGK_Vg)*Vm11r*Nb*(-vPGK_sumAg + (1 - 4*vPGK_KeqAK)*Pg + (4*(1 - 4*vPGK_KeqAK)*vPGK_KeqAK*Pg^2 + (vPGK_sumAg - (1 - 4*vPGK_KeqAK)*Pg)^2)^0.5))/(2*K11ATPg*K11PGA3*(1 - 4*vPGK_KeqAK)*(1 + (1 + vPGK_KeqPGM + vPGK_KeqENO*vPGK_KeqPGM)*vPGK_Vc/vPGK_Vg)*Vm11f) + BPGA13*(Pg - (-vPGK_sumAg + (1 - 4*vPGK_KeqAK)*Pg + (4*(1 - 4*vPGK_KeqAK)*vPGK_KeqAK*Pg^2 + (vPGK_sumAg - (1 - 4*vPGK_KeqAK)*Pg)^2)^0.5)/(1 - 4*vPGK_KeqAK))/(K11ADPg*K11BPGA13))/((1 + BPGA13/K11BPGA13 + (1 + vPGK_Vc/vPGK_Vg)*Nb/(K11PGA3*(1 + (1 + vPGK_KeqPGM + vPGK_KeqENO*vPGK_KeqPGM)*vPGK_Vc/vPGK_Vg)))*(1 + (-vPGK_sumAg + (1 - 4*vPGK_KeqAK)*Pg + (4*(1 - 4*vPGK_KeqAK)*vPGK_KeqAK*Pg^2 + (vPGK_sumAg - (1 - 4*vPGK_KeqAK)*Pg)^2)^0.5)/(2*K11ATPg*(1 - 4*vPGK_KeqAK)) + (Pg - (-vPGK_sumAg + (1 - 4*vPGK_KeqAK)*Pg + (4*(1 - 4*vPGK_KeqAK)*vPGK_KeqAK*Pg^2 + (vPGK_sumAg - (1 - 4*vPGK_KeqAK)*Pg)^2)^0.5)/(1 - 4*vPGK_KeqAK))/K11ADPg)); vPGK is "Phosphoglycerate kinase";
    Vm11 = 1; Vm11f = 640 nanomole_per_min_per_mg; vPGK_Vc = 5.4549 microlitre_per_mg; vPGK_Vg = 0.2451 microlitre_per_mg; Vm11r = 18.56 nanomole_per_min_per_mg; vPGK_sumAg = 6 mM; vPGK_KeqAK = 0.442 dimensionless; K11ATPg = 0.29 mM; K11PGA3 = 1.62 mM; vPGK_KeqPGM = 0.187 dimensionless; vPGK_KeqENO = 6.7 dimensionless; K11ADPg = 0.1 dimensionless; K11BPGA13 = 0.05 dimensionless;
  vPK: 0.175439 Nb -> 0.183306 Pc + 0.183306 Pyr; 2.941176^n12*Vm12*(Pc - (-vPK_sumAc + (1 - 4*vPK_KeqAK)*Pc + (4*(1 - 4*vPK_KeqAK)*vPK_KeqAK*Pc^2 + (vPK_sumAc - (1 - 4*vPK_KeqAK)*Pc)^2)^0.5)/(1 - 4*vPK_KeqAK))*(vPK_KeqENO*vPK_KeqPGM*(1 + vPK_Vc/vPK_Vg)*Nb/((1 + (1 + vPK_KeqPGM + vPK_KeqENO*vPK_KeqPGM)*vPK_Vc/vPK_Vg)*(1 + 0.877193*(-vPK_sumAc + (1 - 4*vPK_KeqAK)*Pc + (4*(1 - 4*vPK_KeqAK)*vPK_KeqAK*Pc^2 + (vPK_sumAc - (1 - 4*vPK_KeqAK)*Pc)^2)^0.5)/(1 - 4*vPK_KeqAK) + 1.5625*(Pc - (-vPK_sumAc + (1 - 4*vPK_KeqAK)*Pc + (4*(1 - 4*vPK_KeqAK)*vPK_KeqAK*Pc^2 + (vPK_sumAc - (1 - 4*vPK_KeqAK)*Pc)^2)^0.5)/(1 - 4*vPK_KeqAK)))))^n12/(K12ADP*(1 + (Pc - (-vPK_sumAc + (1 - 4*vPK_KeqAK)*Pc + (4*(1 - 4*vPK_KeqAK)*vPK_KeqAK*Pc^2 + (vPK_sumAc - (1 - 4*vPK_KeqAK)*Pc)^2)^0.5)/(1 - 4*vPK_KeqAK))/K12ADP)*(1 + 2.941176^n12*(vPK_KeqENO*vPK_KeqPGM*(1 + vPK_Vc/vPK_Vg)*Nb/((1 + (1 + vPK_KeqPGM + vPK_KeqENO*vPK_KeqPGM)*vPK_Vc/vPK_Vg)*(1 + 0.877193*(-vPK_sumAc + (1 - 4*vPK_KeqAK)*Pc + (4*(1 - 4*vPK_KeqAK)*vPK_KeqAK*Pc^2 + (vPK_sumAc - (1 - 4*vPK_KeqAK)*Pc)^2)^0.5)/(1 - 4*vPK_KeqAK) + 1.5625*(Pc - (-vPK_sumAc + (1 - 4*vPK_KeqAK)*Pc + (4*(1 - 4*vPK_KeqAK)*vPK_KeqAK*Pc^2 + (vPK_sumAc - (1 - 4*vPK_KeqAK)*Pc)^2)^0.5)/(1 - 4*vPK_KeqAK)))))^n12)); vPK is "Pyruvate kinase";
    n12 = 2.5 dimensionless; Vm12 = 2600 nanomole_per_min_per_mg; vPK_sumAc = 3.9 mM; vPK_KeqAK = 0.442 dimensionless; vPK_KeqENO = 6.7 dimensionless; vPK_KeqPGM = 0.187 dimensionless; vPK_Vc = 5.4549 microlitre_per_mg; vPK_Vg = 0.2451 microlitre_per_mg; K12ADP = 0.114 mM;
  vATPase: 0.183306 Pc -> ; K13*(-vATPase_sumAc + (1 - 4*vATPase_KeqAK)*Pc + (4*(1 - 4*vATPase_KeqAK)*vATPase_KeqAK*Pc^2 + (vATPase_sumAc - (1 - 4*vATPase_KeqAK)*Pc)^2)^0.5)/(2*(1 - 4*vATPase_KeqAK)*(Pc - (-vATPase_sumAc + (1 - 4*vATPase_KeqAK)*Pc + (4*(1 - 4*vATPase_KeqAK)*vATPase_KeqAK*Pc^2 + (vATPase_sumAc - (1 - 4*vATPase_KeqAK)*Pc)^2)^0.5)/(1 - 4*vATPase_KeqAK)));
    K13 = 50 nanomole_per_min_per_mg; vATPase_sumAc = 3.9 mM; vATPase_KeqAK = 0.442 dimensionless;
  vGlyK: 0.175439 Gly3P -> 4.087719 Pg + $Gly; Vm14*(-(Gly*Vm14r*(-vGlyK_sumAg + (1 - 4*vGlyK_KeqAK)*Pg + (4*(1 - 4*vGlyK_KeqAK)*vGlyK_KeqAK*Pg^2 + (vGlyK_sumAg - (1 - 4*vGlyK_KeqAK)*Pg)^2)^0.5))/(2*K14ATPg*K14Gly*(1 - 4*vGlyK_KeqAK)) + Vm14f*(vGlyK_sumc4 - BPGA13 - 2*Fru16BP - Fru6P - GAP - Glc6P - (vGlyK_Vt*DHAP - vGlyK_sumc5*vGlyK_Vc*(1 + vGlyK_Vc/vGlyK_Vg)*DHAP/(vGlyK_sumc4 + vGlyK_sumc5*vGlyK_Vc/vGlyK_Vg - BPGA13 - 2*Fru16BP - Fru6P - GAP - Glc6P - Pg))/vGlyK_Vg - Pg)*(Pg - (-vGlyK_sumAg + (1 - 4*vGlyK_KeqAK)*Pg + (4*(1 - 4*vGlyK_KeqAK)*vGlyK_KeqAK*Pg^2 + (vGlyK_sumAg - (1 - 4*vGlyK_KeqAK)*Pg)^2)^0.5)/(1 - 4*vGlyK_KeqAK))/(K14ADPg*K14Gly3Pg))/((1 + Gly/K14Gly + (vGlyK_sumc4 - BPGA13 - 2*Fru16BP - Fru6P - GAP - Glc6P - (vGlyK_Vt*DHAP - vGlyK_sumc5*vGlyK_Vc*(1 + vGlyK_Vc/vGlyK_Vg)*DHAP/(vGlyK_sumc4 + vGlyK_sumc5*vGlyK_Vc/vGlyK_Vg - BPGA13 - 2*Fru16BP - Fru6P - GAP - Glc6P - Pg))/vGlyK_Vg - Pg)/K14Gly3Pg)*(1 + (-vGlyK_sumAg + (1 - 4*vGlyK_KeqAK)*Pg + (4*(1 - 4*vGlyK_KeqAK)*vGlyK_KeqAK*Pg^2 + (vGlyK_sumAg - (1 - 4*vGlyK_KeqAK)*Pg)^2)^0.5)/(2*K14ATPg*(1 - 4*vGlyK_KeqAK)) + (Pg - (-vGlyK_sumAg + (1 - 4*vGlyK_KeqAK)*Pg + (4*(1 - 4*vGlyK_KeqAK)*vGlyK_KeqAK*Pg^2 + (vGlyK_sumAg - (1 - 4*vGlyK_KeqAK)*Pg)^2)^0.5)/(1 - 4*vGlyK_KeqAK))/K14ADPg)); vGlyK is "Glycerol kinase";  // modifiers: BPGA13, Fru16BP, Fru6P, GAP, Glc6P, DHAP
    Vm14 = 1; Vm14r = 33400 nanomole_per_min_per_mg; vGlyK_sumAg = 6 mM; vGlyK_KeqAK = 0.442 dimensionless; K14ATPg = 0.19 mM; K14Gly = 0.12 mM; Vm14f = 200 nanomole_per_min_per_mg; vGlyK_sumc4 = 45 mM; vGlyK_Vt = 5.7 microlitre_per_mg; vGlyK_sumc5 = 5 mM; vGlyK_Vc = 5.4549 microlitre_per_mg; vGlyK_Vg = 0.2451 microlitre_per_mg; K14ADPg = 0.12 mM; K14Gly3Pg = 5.1 mM;

  // Unit definitions:
  unit substance = 1e-3 mole; substance is "millimole";
  unit microlitre_per_mg = 1e-6 litre / (1e-3 gram);
  unit nanomole_per_min_per_mg = 1e-9 mole / (60 second * 1e-3 gram);
  unit time = 60 second; time is "minute";
  unit mM = 1e-3 mole / litre;
end
