// SBML level 2 version 1

model Model_1()
  // Yi2003_GproteinCycle
  // The paper describes both wild-type and mutant cells of G protein cycle by using different values of G protein deactivation. We chosed the wild-type, k=0.11 s-1.
  // The unit of the concentration for the proteins are numbers of molecules per cell.
  // Figure5(A) was reproduced with COPASI 4.0 (Build 18) and SBML_odeSolver. Figure5(B) was reproduced with COPASI 4.0 (Build 18).
  // This model originates from BioModels Database: A Database of Annotated Published Models. It is copyright (c) 2005-2007 The BioModels Team.
  // For more information see the terms of use.

  // Compartments:
  compartment cell = 1;

  // Species:
  species L in cell = 6.02e17; L is "Ligand";
  species R in cell = 10000; R is "Receptor";
  species G in cell = 7000; G is "Inactive heterotrimeric G-protein";
  species Gbg in cell = 3000; Gbg is "Free levels of G-beta-gamma";
  species Gd in cell = 3000; Gd is "G-alpha-GDP";
  species Ga in cell = 0; Ga is "G-alpha-GTP";
  species RL in cell = 0; RL is "Receptor-Ligand";

  // Reactions:
  Ligand_Receptor_Association: L + R -> RL; cell*(Ligand_Receptor_Association_k1*L*R - k2*RL); Ligand_Receptor_Association is "Ligand-Receptor Association";
    Ligand_Receptor_Association_k1 = 3.32e-18; k2 = 0.01;
  Receptor_Synthesis: => R; cell*v;
    v = 4;
  Receptor_Degradation: R => ; cell*Receptor_Degradation_k1*R;
    Receptor_Degradation_k1 = 0.0004;
  reaction_3: Gd + Gbg => G; cell*reaction_3_k1*Gd*Gbg; reaction_3 is "Heterotrimeric G-Protein Formation";
    reaction_3_k1 = 1;
  G_protein_Activation: G => Ga + Gbg; cell*G_protein_Activation_k1*RL*G; G_protein_Activation is "G-protein Activation";  // modifiers: RL
    G_protein_Activation_k1 = 1e-5;
  Receptor_Ligand_Degradation: RL => ; cell*Receptor_Ligand_Degradation_k1*RL; Receptor_Ligand_Degradation is "Receptor-Ligand Degradation";
    Receptor_Ligand_Degradation_k1 = 0.004;
  G_protein_Inactivation: Ga => Gd; cell*G_protein_Inactivation_k1*Ga; G_protein_Inactivation is "G-protein Inactivation";
    G_protein_Inactivation_k1 = 0.11;

  // Unit definitions:
  unit substance = item;
end
