// SBML level 2 version 1

model Cronwright2002_Glycerol_Synthesis()
  // .
  // .
  // .
  // SBML level 2 code generated for the JWS Online project by Jacky Snoep using PySCeS
  // Run this model online at http://jjj.biochem.sun.ac.za
  // To cite JWS Online please refer to: Olivier, B.G. and Snoep, J.L. (2004) Web-based modelling using JWS Online, Bioinformatics, 20:2143-2144
  // .
  // .
  // .
  // .
  // .
  // .
  // Biomodels Curation The model reproduces the flux value of "Gpp p" (rate of Glycerol synthesis) as depicted in Fig 3 of the paper. The model reproduces the flux for early exponential phase , however it can be used to reproduce the values for other phases by plugging in appropriate values for maximal rates as given in Table 1 and metabolite concentrations as given in Table 2 of the paper. The model was succesfully reproduced using Jarnac.
  // This model originates from BioModels Database: A Database of Annotated Published Models. It is copyright (c) 2005-2007 The BioModels Team.
  // For more information see the terms of use.

  // Compartments:
  compartment compartment = 1; compartment is "Cytoplasm";

  // Species:
  species G3P in compartment = 0; G3P is "Glycerol 3-phosphate";
  species $Gly in compartment = 15.1; Gly is "Glycerol";
  species $DHAP in compartment = 0.59;

  // Reactions:
  Gpd_p: $DHAP -> G3P; compartment*Vf1/(K1nadh*K1dhap)*(NADH*DHAP - NAD*G3P/Keq1)/((1 + F16BP/K1f16bp + ATP/K1atp + ADP/K1adp)*(1 + NADH/K1nadh + NAD/K1nad)*(1 + DHAP/K1dhap + G3P/K1g3p)); Gpd_p is "Glycerol 3-phosphate dehydrogenase";
    Vf1 = 47 mM_per_minute; K1nadh = 0.023 mM; K1dhap = 0.54 mM; NADH = 1.87 mM; NAD = 1.45 mM; Keq1 = 10000 dimensionless; F16BP = 6.01 mM; K1f16bp = 4.8 mM; ATP = 2.37 mM; K1atp = 0.73 mM; ADP = 2.17 mM; K1adp = 2 mM; K1nad = 0.93 mM; K1g3p = 1.2 mM;
  Gpp_p: G3P -> $Gly; compartment*V2*G3P/K2g3p/((1 + G3P/K2g3p)*(1 + Phi/K2phi)); Gpp_p is "Glycerol 3-phosphatase";
    V2 = 53 mM_per_minute; K2g3p = 3.5 mM; Phi = 1 mM; K2phi = 1 mM;

  // Unit definitions:
  unit substance = 1e-3 mole; substance is "millimole";
  unit time = 60 second; time is "minute";
  unit mM_per_minute = 1e-3 mole / (litre * 60 second);
  unit mM = 1e-3 mole / litre;
end
