// SBML level 2 version 1

model Model_1()
  // Blum2000_LHsecretion_1
  // A mathematical model quantifying GnRH-induced LH secretion from gonadotropes by Blum et al (2000)
  // This paper includs three stages, and the model does not include the third stage.Also a event is included which is remove hormone at time=5 min.Figure1 and Figure 2 are reproduced by SBML odeSolver.We choose the concentration of GnRH is 1.0nM.
  // This model originates from BioModels Database: A Database of Annotated Published Models. It is copyright (c) 2005-2007 The BioModels Team.
  // For more information see the terms of use.

  // Compartments:
  compartment cell = 1;

  // Species:
  species H in cell = 1;
  species HR in cell = 0;
  species R in cell = 0.01;
  species HRRH in cell = 0;
  species E in cell = 0;
  species GQ in cell = 0.1;
  species IP3 in cell = 0;
  species CHO in cell;

  // Parameters:
  alpha = 2 substance;
  beta = 4 unitDefinition_3;

  // Assignment rules:
  CHO := 0.001*alpha*IP3*(0.3 + 0.3*beta*time*exp(1 - beta*time))/(1 + 0.001*alpha*IP3);

  // Reactions:
  H_binding_to_R: H + R -> HR; cell*(H_binding_to_R_k1*H*R - H_binding_to_R_k2*HR);
    H_binding_to_R_k1 = 2.5; H_binding_to_R_k2 = 5;
  HR_forming_HRRH: 2 HR -> HRRH; cell*(HR_forming_HRRH_k1*HR^2 - HR_forming_HRRH_k2*HRRH);
    HR_forming_HRRH_k1 = 2500; HR_forming_HRRH_k2 = 5;
  reaction_2: HRRH + GQ -> E; cell*(reaction_2_k1*HRRH*GQ - reaction_2_k2*E); reaction_2 is "G protein react with dimer producing E";
    reaction_2_k1 = 4000; reaction_2_k2 = 200;
  reaction_3: IP3 => ; cell*reaction_3_k1*IP3; reaction_3 is "IP3 converted into inactive metabolites";
    reaction_3_k1 = 10;
  Production_of_IP3: => IP3; cell*k*E;  // modifiers: E
    k = 20000000;

  // Events:
  RemovalH: at (time > 5): H = 0; RemovalH is "removal of hormone";

  // Unit definitions:
  unit time = 60 second;
  unit substance = 1e-9 mole;
  unit unitDefinition_3 = 1 / (60 second); unitDefinition_3 is "unit for beta";
end
