// SBML level 2 version 1

function function_4(P, V3, R, k3)
  P*V3*(1 - R)/(k3 + (1 - R));
end

function function_3(V2, R, Q, K2)
  V2*R*Q/(K2 + Q);
end

function function_2(V1, Q, K1)
  V1*(1 - Q)/(K1 + (1 - Q));
end

function function_1(V, substrate, Km)
  V*substrate/(Km + substrate);
end

function function_0(a, Q)
  a*Q;
end

model Model_0()
  // Goldbeter2006_weightCycling
  // This model is according to the paper of A model for the dynamics of human weight cycling by A. Goldbeter 2006.The figure3 (A) and (B) have been reproduced by Copasi 4.0.19(development) and SBMLodeSolver.The writer of the paper did not specify any units for the metabolites, so the creator of the model did not define the units as well.Both Q and R are normalized to vary between 0 and 1.
  // This model originates from BioModels Database: A Database of Annotated Published Models. It is copyright (c) 2005-2007 The BioModels Team.
  // For more information see the terms of use.

  // Compartments:
  compartment body = 1;

  // Species:
  // body weight
  species P in body = 0.43;
  // dietary intake
  species Q in body = 0.8;
  // degree of resolution measuring cognitive restraint
  species R in body = 0.55;

  // Reactions:
  Increase_of_P: => P; body*function_0(a, Q);  // modifiers: Q
    a = 0.1;
  Decrease_of_P: P => ; body*function_1(Decrease_of_P_V, P, Decrease_of_P_Km);
    Decrease_of_P_V = 0.1; Decrease_of_P_Km = 0.2;
  Increase_of_Q: => Q; body*function_2(V1, Q, K1);
    V1 = 1; K1 = 0.01;
  Decrease_of_Q: Q => ; body*function_3(V2, R, Q, K2);  // modifiers: R
    V2 = 1.5; K2 = 0.01;
  Increase_of_R: => R; body*function_4(P, V3, R, k3);  // modifiers: P
    V3 = 6; k3 = 0.01;
  Decrease_of_R: R => ; body*function_1(Decrease_of_R_V, R, Decrease_of_R_Km);
    Decrease_of_R_V = 2.5; Decrease_of_R_Km = 0.01;
end
