// SBML level 2 version 1

model Model_1()
  // Thomsen1989_AdenylateCyclase
  // This model reproduces figure 5 and figure 4(B)of the paper, with Kinh represented by [G-GTP]. We arbitrarily chosed to set the initial concentration of D to 31 micorMolar based on legend of figure 4. [R] was not given anywhere in the paper and was chosen to calibrate the sigmoid response to an increased [GTP]. THe figure 5 in the model was successfully simulated on COPASI 4.0 ,the figure 4(B) was sucessfully simulated on both COPASI and SBML_odeSolver.
  // There are two curves for Kinh in the absence and presence of NaCl in the figure obtained from simulations of the model using parameters of set C and set D.Here in the model the initial value given is from set D.The parameters in set C :k7=0.5, k10=1.0,k5=0.1,the others are the same with set D.
  // This model originates from BioModels Database: A Database of Annotated Published Models. It is copyright (c) 2005-2007 The BioModels Team.
  // For more information see the terms of use.

  // Compartments:
  compartment cell = 1;

  // Species:
  species D in cell = 3.1e-5;
  species DR in cell = 0;
  species DRG_GDP in cell = 0;
  species G_GDP in cell = 1e-6;
  species DRG in cell = 0;
  species GDP in cell = 0;
  species DRG_GTP in cell = 0;
  species GTP in cell = 1e-5;
  species G_GTP in cell = 0;
  species R in cell = 1e-10;

  // Reactions:
  Forming_DR: D + R -> DR; cell*(k1*D*R - k7*DR);
    k1 = 5000000; k7 = 10;
  Reaction_2: DR + G_GDP -> DRG_GDP; cell*(k2*DR*G_GDP - k8*DRG_GDP); Reaction_2 is "DR Binding with G_GDP produce DRG_GDP";
    k2 = 100000000; k8 = 0.1;
  GDP_Releasing: DRG_GDP -> GDP + DRG; cell*(k3*DRG_GDP - k9*GDP*DRG);
    k3 = 5; k9 = 100000;
  GTP_binding_with_DRG: DRG + GTP -> DRG_GTP; cell*(k4*DRG*GTP - k10*DRG_GTP);
    k4 = 5000000; k10 = 55;
  G_protein_activation: DRG_GTP => G_GTP + DR; cell*k5*DRG_GTP;
    k5 = 1;
  Hydrolysis_of_GTP_to_GDP: G_GTP => G_GDP; cell*k6*G_GTP;
    k6 = 2;
end
