// SBML level 2 version 1

model Suh2004_KCNQ_regulation()
  // Suh2004_KCNQ_Regulation
  // The model reproduces FIG 11A and FIG 11B of the paper. However, please note that FIG 11B is a plot of normalized amounts versus time. The "stochiometry" field has been used to convert fluxes from membrane species to volume species. The value of 0.0009967 is a product of (Surface to Volume_M*(1/Avagadro's number)*1E21. 0.6 is the surface to volume ratio of the plasma membrane, 1E21 is required for a unit surface to volume ratio and the Avagadro's number is present in the denominator to convert molecules to moles. The model was successfully tested using MathSBML
  // This model originates from BioModels Database: A Database of Annotated Published Models. It is copyright (c) 2005-2007 The BioModels Team.
  // For more information see the terms of use.

  // Compartments:
  compartment EX = 1 litre; EX is "Extracellular";
  compartment M in EX = 1 um2; M is "Membrane";  // 2-D
  compartment Cytoplasm in M = 1 litre;

  // Species:
  species GTPgS_C in Cytoplasm = 0;  // substance in micromole
  species KCNQsites_M in M = 6.7;  // substance in molecules
  species PIP2_M in M = 5000;  // substance in molecules
  species GGDPbS_M in M = 0;  // substance in molecules
  species $Mg2_C in Cytoplasm = 2100;  // substance in micromole
  species ATP_C in Cytoplasm = 3000;  // substance in micromole
  species oxoM_EX in EX = 0;  // substance in micromole
  species GDPbS_C in Cytoplasm = 0;  // substance in micromole
  species GGTPMg_M in M = 0.1;  // substance in molecules
  species GDP_C in Cytoplasm = 0;  // substance in micromole
  species GTP_C in Cytoplasm;  // substance in micromole
  species GGDPAlF4Mg_M in M = 0; GGDPAlF4Mg_M is "GGDPAIF4Mg_M";  // substance in molecules
  species ip3_C in Cytoplasm = 0.48; ip3_C is "IP3_C";  // substance in micromole
  species AlF4_C in Cytoplasm = 0; AlF4_C is "AIF4_C";  // substance in micromole
  species G_M in M = 0.065;  // substance in molecules
  species GGTP_M in M = 0.048;  // substance in molecules
  species GGDPAlF4_M in M = 0; GGDPAlF4_M is "GGDPAIF4_M";  // substance in molecules
  species GGTPgS_M in M = 0;  // substance in molecules
  species PI_M in M = 200000;  // substance in molecules
  species PIP_M in M = 1150;  // substance in molecules
  species PIP2xKCNQ_M in M = 33.3;  // substance in molecules
  species GGTPgSMg_M in M = 0;  // substance in molecules
  species GGDP_M in M = 200;  // substance in molecules

  // Parameters:
  MgSat20 has dimensionless;
  ATPSat300 has dimensionless;
  MgSat10 has dimensionless;
  OxoSat has dimensionless;
  Gactive has dimensionless;
  ATPSat1000 has dimensionless;
  KMgGTPase = 10 microMolar;
  Koxom = 8 microMolar;
  I_KCNQ has dimensionless;
  nHill = 1.8 dimensionless;
  fGactive has dimensionless;

  // Assignment rules:
  MgSat20 := 1*(1/(1 + 20*(1/Mg2_C)));
  ATPSat1000 := 1*(1/(1 + 1000*(1/(0.5 + ATP_C))));
  MgSat10 := 0.2 + 0.8*1*(1/(1 + KMgGTPase*(1/Mg2_C)));
  OxoSat := 1*(1/(1 + Koxom*(1/(1e-5 + oxoM_EX))));
  fGactive := (GGTPMg_M + GGTPgSMg_M + GGDPAlF4Mg_M)/200;
  Gactive := GGTPMg_M + GGTPgSMg_M + GGDPAlF4Mg_M;
  ATPSat300 := 1*(1/(1 + 300*(1/(0.5 + ATP_C))));
  I_KCNQ := 1.33*(0.025*PIP2xKCNQ_M)^nHill;
  GTP_C := 100 + (-(50*exp(-(0.008333333*(290 + time)))));

  // Reactions:
  PIP5kinase: 0.0009967 ATP_C + PIP_M -> PIP2_M; (0.2 + 0.8*MgSat20)*kPIP5Kinase*PIP_M*ATPSat300;
    kPIP5Kinase = 0.06 s_1;
  IP3Phosphatase: ip3_C -> ; ip3_C*kIP3ase;
    kIP3ase = 0.3 s_1;
  PIP2binding: KCNQsites_M + PIP2_M -> PIP2xKCNQ_M; kPIP2on*KCNQsites_M*PIP2_M + (-(kPIP2off*PIP2xKCNQ_M));
    kPIP2on = 0.00025 um2_molecules_1_s_1; kPIP2off = 0.25 s_1;
  MgonGGTPgS: GGTPgS_M -> GGTPgSMg_M; kMg2onGTPgS*GGTPgS_M*Mg2_C;  // modifiers: Mg2_C
    kMg2onGTPgS = 0.002 uM_1_s_1;
  GGTPase: GGTPMg_M -> GGDP_M; kGGTPase*MgSat10*GGTPMg_M;
    kGGTPase = 1.8 s_1;
  GTPon: G_M -> GGTP_M; kGTPon*G_M*GTP_C + (-(kGTPoff*GGTP_M));  // modifiers: GTP_C
    kGTPon = 0.45 uM_1_s_1; kGTPoff = 0.08 s_1;
  GTPgSon: 0.0009967 GTPgS_C + G_M -> GGTPgS_M; kGTPgSon*G_M*GTPgS_C + (-(kGTPgSoff*GGTPgS_M));
    kGTPgSon = 0.006 uM_1_s_1; kGTPgSoff = 0.005 s_1;
  GDPbSon: G_M + 0.0009967 GDPbS_C -> GGDPbS_M; kGDPbSon*G_M*GDPbS_C + (-(kGGDPbSoff*(1 + 20*OxoSat)*GGDPbS_M));
    kGDPbSon = 0.28 uM_1_s_1; kGGDPbSoff = 0.1 s_1;
  MgGTPon: GGTP_M -> GGTPMg_M; kMg2onGTP*GGTP_M*Mg2_C;  // modifiers: Mg2_C
    kMg2onGTP = 0.003 uM_1_s_1;
  GDPdissoc: GGDP_M -> 0.0009967 GDP_C + G_M; kGDPoff*GGDP_M*(OxoSat + TonicAct) + (-(kGDPon*GDP_C*G_M));  // modifiers: oxoM_EX
    kGDPoff = 0.5 s_1; TonicAct = 0.002 dimensionless; kGDPon = 0.003 uM_1_s_1;
  PIP2_5Pase: PIP2_M -> PIP_M; MgSat20*kPIP2Pase*PIP2_M;
    kPIP2Pase = 0.005 s_1;
  PLC: PIP2_M -> 0.0009967 ip3_C; kPLC*(fGactive + PLCspont)*PIP2_M;
    kPLC = 4.8 s_1; PLCspont = 0.00075 dimensionless;
  AlF4on: 0.0009967 AlF4_C + GGDP_M -> GGDPAlF4_M; kAlF4on*AlF4_C*GGDP_M + (-(kAlF4off*GGDPAlF4_M)); AlF4on is "AIF4on";
    kAlF4on = 7e-6 uM_1_s_1; kAlF4off = 0.005 s_1;
  PI4Kinase: 0.0009967 ATP_C + PI_M -> PIP_M; (0.2 + 0.8*MgSat20)*kPI4Kinase*PI_M*ATPSat1000;
    kPI4Kinase = 0.0001 s_1;
  MgonGDPAlF4: GGDPAlF4_M -> GGDPAlF4Mg_M; kMgonAlF4*GGDPAlF4_M*Mg2_C; MgonGDPAlF4 is "MgonGDPAIF4";  // modifiers: Mg2_C
    kMgonAlF4 = 0.002 uM_1_s_1;

  // Events:
  event_0000001: at (time >= 3): oxoM_EX = 10;
  event_0000002: at (time >= 8): oxoM_EX = 0;

  // Unit definitions:
  unit micromole = 1e-6 mole;
  unit molecules = item;
  unit um2 = (1e-6 metre)^2;
  unit molecules_um_2_s_1 = item / ((1e-6 metre)^2 * second);
  unit uM_s_1 = 1e-6 mole / (litre * second);
  unit s_1 = 1 / second;
  unit um2_molecules_1_s_1 = (1e-6 metre)^2 / (item * second);
  unit uM_1_s_1 = litre / (1e-6 mole * second);
  unit uM_um_s_1 = 1e-6 metre * 1e-6 mole / (second * litre);
  unit microMolar = 1e-6 mole / litre;
end
