// SBML level 2 version 1

model Model_1()
  // Thomsen1988_AdenylateCyclase_Inhibition
  // This model was created according to the paper Inhibition of Adenylate Cyclase Is Mediated by the High Affinity Conformation of the alpha2-Adrenergic Receptor published in 1988.
  // The figure4 (steady state curve) in the paper has been simulated having the same plot with Copasi 4.0.19 (development) and roadRunner(online).Because the initial concentration of R and D were not given in the paper ,so we gave it 1e-9 Mol/L and 1e-8 Mol/L respectively.
  // Pay attention that the simulations of steady state concentration of species in arbitrary units are shown for figure4 and figure6 in the paper.
  // This model originates from BioModels Database: A Database of Annotated Published Models. It is copyright (c) 2005-2007 The BioModels Team.
  // For more information see the terms of use.

  // Compartments:
  compartment cell = 1;

  // Species:
  species agonist in cell = 1e-8; agonist is "D";
  species DR in cell = 0;
  species DRG_GDP in cell = 0;
  species DRG in cell = 0;
  species GDP in cell = 0;
  species DRG_GTP in cell = 0;
  species GTP in cell = 1e-5;
  species Recptor in cell = 1e-9;
  species G_GDP in cell = 1e-9;
  species G_GTP in cell = 0;

  // Reactions:
  Forming: agonist + Recptor -> DR; cell*(k1*agonist*Recptor - k7*DR); Forming is "Forming DR";
    k1 = 5000000; k7 = 0.5;
  reaction_1: DR + G_GDP -> DRG_GDP; cell*(k2*DR*G_GDP - k8*DRG_GDP); reaction_1 is "DR binding with G_GDP produc DRG_GDP";
    k2 = 100000000; k8 = 0.1;
  GDP_releasing: DRG_GDP -> GDP + DRG; cell*(k3*DRG_GDP - k9*DRG*GDP);
    k3 = 0.1; k9 = 100000;
  GTP_binding_with_DRG: DRG + GTP -> DRG_GTP; cell*(k4*DRG*GTP - k10*DRG_GTP);
    k4 = 10000000; k10 = 0.1;
  reaction_4: DRG_GTP => G_GTP + DR; cell*k5*DRG_GTP; reaction_4 is "DRG_GTP dissociates(G protein activation)";
    k5 = 0.05;
  G_protein_inactivated: G_GTP => G_GDP; cell*k6*G_GTP;
    k6 = 0.1;
end
