// SBML level 2 version 1

model Hornberg2005_ERKcascade()
  // SBML level 2 code generated for the JWS Online project by Jacky Snoep using PySCeS
  // Run this model online at http://jjj.biochem.sun.ac.za
  // To cite JWS Online please refer to: Olivier, B.G. and Snoep, J.L. (2004) Web-based modelling using JWS Online, Bioinformatics, 20:2143-2144
  // Biomodels Curation The model reproduces the time series depicted in Fig 2 of the paper. Also, by varying the values of Vmax for the second kinase (k5) the time series of X3P as shown in Fig3 can be reproduced. The model was successfully tested on MathSBML and Jarnac.
  // This model originates from BioModels Database: A Database of Annotated Published Models. It is copyright (c) 2005-2007 The BioModels Team.
  // For more information see the terms of use.

  // Compartments:
  compartment compartment = 1; compartment is "Cytosol";

  // Species:
  substanceOnly species R in compartment = 0.5;
  substanceOnly species Rin in compartment = 0;
  substanceOnly species x1 in compartment = 1;
  substanceOnly species x1p in compartment = 0;
  substanceOnly species x2 in compartment = 1;
  substanceOnly species x2p in compartment = 0;
  substanceOnly species x3 in compartment = 1;
  substanceOnly species x3p in compartment = 0;

  // Reactions:
  Receptor_inactivation: R -> Rin; Vm1*R/(Km1 + R);
    Vm1 = 1; Km1 = 0.1;
  Receptor_activation: Rin -> R; Vm2*Rin/(Km2 + Rin);
    Vm2 = 0.01; Km2 = 0.1;
  Kinase_1_activation: x1 -> x1p; k3*R*x1/(Km3 + x1); Kinase_1_activation is "Kinase-1 activation";  // modifiers: R
    k3 = 1; Km3 = 0.1;
  Kinase_1_inactivation: x1p -> x1; Vm4*x1p/(Km4 + x1p); Kinase_1_inactivation is "Kinase-1 inactivation";
    Vm4 = 0.3; Km4 = 1;
  Kinase_2_activation: x2 -> x2p; k5*x1p*x2/(Km5 + x2); Kinase_2_activation is "Kinase-2 activation";  // modifiers: x1p
    k5 = 1; Km5 = 0.1;
  Kinase_2_inactivation: x2p -> x2; Vm6*x2p/(Km6 + x2p); Kinase_2_inactivation is "Kinase-2 inactivation";
    Vm6 = 0.3; Km6 = 1;
  Kinase_3_activation: x3 -> x3p; k7*x2p*x3/(Km7 + x3); Kinase_3_activation is "Kinase-3 activation";  // modifiers: x2p
    k7 = 1; Km7 = 0.1;
  Kinase_3_inactivation: x3p -> x3; Vm8*x3p/Km8/(1 + x3p/Km8 + Inh/Ki8); Kinase_3_inactivation is "Kinase-3 inactivation";
    Vm8 = 0.3; Km8 = 1; Inh = 0; Ki8 = 1;

  // Unit definitions:
  unit substance = item; substance is "dimensionless";
end
