// SBML level 2 version 1

model Maurya2005()
  // Maurya2005_GTPaseCycle_reducedOrder
  // This model is according to the paper Reduced-order modeling of biochemical networks: application to the GTPase-cycle signalling module by Maurya et al 2006.The figure 4c is reproduced by Copasi 4.0.19 (development) .It is three-dimensional logarithmic plots show the output of simulations of Z at various concentrations of R and GAP.
  // This model originates from BioModels Database: A Database of Annotated Published Models. It is copyright (c) 2005-2007 The BioModels Team.
  // For more information see the terms of use.

  // Compartments:
  compartment cell = 1;

  // Species:
  // GAP
  species A in cell = 0;
  // inactive G protein
  species G in cell = 1e-8;
  species GA in cell = 0;
  // GTP
  species T in cell = 0.000468;
  // Receptor
  species R in cell = 1e-5;
  // active G protein
  species G_T in cell = 0; G_T is "G*T";
  species GD in cell = 0;
  species Pi in cell = 0.0044;
  // GDP
  species D in cell = 0.000149;
  species RG in cell = 0;
  species RG_T in cell = 0; RG_T is "RG*T";
  species G_AT in cell = 0; G_AT is "G*AT";
  species GAD in cell = 0;
  species RGD in cell = 0;
  species RGA in cell = 0;
  species RG_AT in cell = 0; RG_AT is "RG*AT";
  species RGAD in cell = 0;

  // Parameters:
  // fractional activity of G proteins
  var Z;
  // GTP hydrolytic rate
  var v;

  // Assignment rules:
  Z := (G_T + RG_T + RG_AT + G_AT)/1e-8;
  v := (25*RG_AT + 25*G_AT + 0.013*RG_T + 0.013*G_T)/10e-9;

  // Reactions:
  G_protein_binding_GTP: G + T -> G_T; cell*(G_protein_binding_GTP_k1*G*T - G_protein_binding_GTP_k2*G_T);
    G_protein_binding_GTP_k1 = 529000; G_protein_binding_GTP_k2 = 8.38e-6;
  G_T_hydrolysis: G_T -> GD + Pi; cell*(G_T_hydrolysis_k1*G_T - G_T_hydrolysis_k2*GD*Pi); G_T_hydrolysis is "G*T hydrolysis";
    G_T_hydrolysis_k1 = 0.013; G_T_hydrolysis_k2 = 9.03e-7;
  GD_dissociation: GD -> G + D; cell*(GD_dissociation_k1*GD - GD_dissociation_k2*G*D);
    GD_dissociation_k1 = 0.0001; GD_dissociation_k2 = 62.3;
  RG_binding_GTP: RG + T -> RG_T; cell*(RG_binding_GTP_k1*RG*T - RG_binding_GTP_k2*RG_T);
    RG_binding_GTP_k1 = 853000; RG_binding_GTP_k2 = 0.00468;
  G_T_binding_Receptor: G_T + R -> RG_T; cell*(G_T_binding_Receptor_k1*G_T*R - G_T_binding_Receptor_k2*RG_T); G_T_binding_Receptor is "G*T binding Receptor";
    G_T_binding_Receptor_k1 = 132000000; G_T_binding_Receptor_k2 = 1.28;
  G_T_binding_GAP: G_T + A -> G_AT; cell*(G_T_binding_GAP_k1*G_T*A - G_T_binding_GAP_k2*G_AT); G_T_binding_GAP is "G*T binding GAP";
    G_T_binding_GAP_k1 = 386000; G_T_binding_GAP_k2 = 0.0408;
  GD_binding_GAP: GD + A -> GAD; cell*(GD_binding_GAP_k1*GD*A - GD_binding_GAP_k2*GAD);
    GD_binding_GAP_k1 = 64100; GD_binding_GAP_k2 = 0.95;
  GD_binding_Receptor: GD + R -> RGD; cell*(GD_binding_Receptor_k1*GD*R - GD_binding_Receptor_k2*RGD);
    GD_binding_Receptor_k1 = 94700000; GD_binding_Receptor_k2 = 0.00227;
  RG_T_hydrolysis: RG_T -> RGD + Pi; cell*(RG_T_hydrolysis_k1*RG_T - RG_T_hydrolysis_k2*RGD*Pi); RG_T_hydrolysis is "RG*T hydrolysis";
    RG_T_hydrolysis_k1 = 0.013; RG_T_hydrolysis_k2 = 2.22e-9;
  RGD_dissociation: RGD -> RG + D; cell*(RGD_dissociation_k1*RGD - RGD_dissociation_k2*RG*D);
    RGD_dissociation_k1 = 2; RGD_dissociation_k2 = 1470000;
  G_AT_hydrolysis: G_AT -> GAD + Pi; cell*(G_AT_hydrolysis_k1*G_AT - G_AT_hydrolysis_k2*GAD*Pi); G_AT_hydrolysis is "G*AT hydrolysis";
    G_AT_hydrolysis_k1 = 25; G_AT_hydrolysis_k2 = 0.244;
  GAD_dissociation: GAD -> GA + D; cell*(GAD_dissociation_k1*GAD - GAD_dissociation_k2*GA*D);
    GAD_dissociation_k1 = 0.0001; GAD_dissociation_k2 = 3.83;
  GA_binding_Receptor: GA + R -> RGA; cell*(GA_binding_Receptor_k1*GA*R - GA_binding_Receptor_k2*RGA);
    GA_binding_Receptor_k1 = 3960000000; GA_binding_Receptor_k2 = 5.43e-5;
  RGA_binding_GTP: RGA + T -> RG_AT; cell*(RGA_binding_GTP_k1*RGA*T - RGA_binding_GTP_k2*RG_AT);
    RGA_binding_GTP_k1 = 1620000; RGA_binding_GTP_k2 = 0.00875;
  RG_T_binding_GAP: RG_T + A -> RG_AT; cell*(RG_T_binding_GAP_k1*RG_T*A - RG_T_binding_GAP_k2*RG_AT); RG_T_binding_GAP is "RG*T binding GAP";
    RG_T_binding_GAP_k1 = 6300000; RG_T_binding_GAP_k2 = 0.478;
  RG_AT_hydrolysis: RG_AT -> RGAD + Pi; cell*(RG_AT_hydrolysis_k1*RG_AT - RG_AT_hydrolysis_k2*RGAD*Pi); RG_AT_hydrolysis is "RG*AT hydrolysis";
    RG_AT_hydrolysis_k1 = 25; RG_AT_hydrolysis_k2 = 0.00297;
  RGAD_dissociation: RGAD -> RGA + D; cell*(RGAD_dissociation_k1*RGAD - RGAD_dissociation_k2*RGA*D);
    RGAD_dissociation_k1 = 2.75; RGAD_dissociation_k2 = 2940;
end
