// SBML level 2 version 1

model YeastWTmodel2()
  // Proctor2006_telomere
  // This model originates from BioModels Database: A Database of Annotated Published Models. It is copyright (c) 2005-2007 The BioModels Team.
  // For more information see the terms of use.

  // Compartments:
  compartment cellMembrane = 1;
  compartment nucleus in cellMembrane = 1;

  // Species:
  substanceOnly species Ctelo in nucleus = 64;
  substanceOnly species Utelo in nucleus = 0;
  substanceOnly species Cdc13 in nucleus = 300;
  substanceOnly species Rad17Utelo in nucleus = 0;
  substanceOnly species Rad17 in nucleus = 70;
  substanceOnly species Rad24 in nucleus = 70;
  substanceOnly species RPA in nucleus = 4000;
  substanceOnly species Mec1 in nucleus = 4000;
  substanceOnly species ssDNA in nucleus = 0;
  substanceOnly species RPAssDNA in nucleus = 0;
  substanceOnly species RPAssDNA1 in nucleus = 0;
  substanceOnly species RPAssDNA2 in nucleus = 0;
  substanceOnly species Mec1RPAssDNA in nucleus = 0;
  substanceOnly species ExoXI in nucleus = 70;
  substanceOnly species ExoXA in nucleus = 0;
  substanceOnly species Exo1I in nucleus = 670;
  substanceOnly species Exo1A in nucleus = 0;
  substanceOnly species Rad9I in nucleus = 20;
  substanceOnly species Rad9A in nucleus = 0;
  substanceOnly species Rad53I in nucleus = 6900;
  substanceOnly species Rad53A in nucleus = 0;
  substanceOnly species Chk1I in nucleus = 60;
  substanceOnly species Chk1A in nucleus = 0;
  substanceOnly species Dun1I in nucleus = 3000;
  substanceOnly species Dun1A in nucleus = 0;
  substanceOnly species ATP in nucleus = 10000;
  substanceOnly species ADP in nucleus = 1000;
  substanceOnly species Rad9Kin in nucleus = 0;
  substanceOnly species recovery in nucleus = 0;
  substanceOnly species G1 in nucleus = 1;
  substanceOnly species S in nucleus = 0;
  substanceOnly species G2 in nucleus = 0;
  substanceOnly species M in nucleus = 0;
  substanceOnly species G1cyclin in nucleus = 0;
  substanceOnly species Scyclin in nucleus = 0;
  substanceOnly species G2cyclin in nucleus = 0;
  substanceOnly species Mcyclin in nucleus = 0;
  substanceOnly species G1CdkI in nucleus = 1;
  substanceOnly species G1CdkA in nucleus = 0;
  substanceOnly species SCdkI in nucleus = 1;
  substanceOnly species SCdkA in nucleus = 0;
  substanceOnly species G2CdkI in nucleus = 1;
  substanceOnly species G2CdkA in nucleus = 0;
  substanceOnly species MCdkI in nucleus = 1;
  substanceOnly species MCdkA in nucleus = 0;
  substanceOnly species G1Soff in nucleus = 1;
  substanceOnly species G1Son in nucleus = 0;
  substanceOnly species SG2off in nucleus = 1;
  substanceOnly species SG2on in nucleus = 0;
  substanceOnly species G2Moff in nucleus = 1;
  substanceOnly species G2Mon in nucleus = 0;
  substanceOnly species MG1off in nucleus = 1;
  substanceOnly species MG1on in nucleus = 0;
  substanceOnly species $sink in nucleus = 0;
  substanceOnly species budscar in cellMembrane = 0;

  // Parameters:
  kalive = 1;

  // Reactions:
  Capping: Cdc13 + Utelo => Ctelo; k1*Cdc13*Utelo*kalive;
    k1 = 0.0005;
  Uncapping: Ctelo => Cdc13 + Utelo; k2*Ctelo*kalive;
    k2 = 0.000385;
  Rad17binding: Utelo + Rad17 + Rad24 + ATP => Rad17Utelo + Rad24 + ADP; k3*Utelo*Rad17*Rad24*ATP*kalive/(5000 + ATP);
    k3 = 1.5e-8;
  ExoXactivation: ExoXI + Rad17Utelo => ExoXA + Rad17Utelo; k4*ExoXI*Rad17Utelo*kalive;
    k4 = 0.01;
  ExoXactivity: ExoXA + Rad17Utelo => ExoXA + Rad17Utelo + ssDNA; k5*ExoXA*Rad17Utelo*kalive;
    k5 = 0.0003;
  Exo1activation: Exo1I => Exo1A; k6a*Exo1I*kalive; Exo1activation is "Rad24independentExo1Activation";
    k6a = 5e-5;
  Exo1Rad24dependentActivation: Exo1I + Rad24 => Exo1A + Rad24; k6b*Exo1I*Rad24*kalive; Exo1Rad24dependentActivation is "Rad24dependentExo1Activation";
    k6b = 0.0005;
  Exo1Rad17independentActivity: Utelo + Exo1A => Utelo + Exo1A + ssDNA; k7a*Utelo*Exo1A*kalive; Exo1Rad17independentActivity is "Rad17independentExo1Activity";
    k7a = 3e-5;
  Exo1Rad17dependentActivity: Rad17Utelo + Exo1A => Rad17Utelo + Exo1A + ssDNA; k7b*Rad17Utelo*Exo1A*kalive; Exo1Rad17dependentActivity is "Rad17dependentExo1Activity";
    k7b = 3e-5;
  RPAbinding1: ssDNA + RPA => RPAssDNA1; k8a*RPA*ssDNA*kalive; RPAbinding1 is "RPAbinding-stage1";
    k8a = 0.001;
  RPAbinding2: ssDNA + RPAssDNA1 => RPAssDNA2; k8b*RPAssDNA1*ssDNA*kalive; RPAbinding2 is "RPAbinding-stage2";
    k8b = 100;
  RPAbinding: ssDNA + RPAssDNA2 => RPAssDNA; k8c*RPAssDNA2*ssDNA*kalive; RPAbinding is "RPAbinding-completed";
    k8c = 100;
  Mec1binding: RPAssDNA + Mec1 => Mec1RPAssDNA; k8d*RPAssDNA*Mec1*kalive;
    k8d = 0.004;
  Rad9activation: Rad9Kin + Rad9I => Rad9Kin + Rad9A; k9*Rad9Kin*Rad9I*kalive;
    k9 = 100;
  ExoXinhibition: ExoXA + Rad9A => ExoXI + Rad9A; ExoXA*k10a*Rad9A*kalive;
    k10a = 0.05;
  ExoXinhibition2: ExoXA + Rad9I => ExoXI + Rad9I; ExoXA*k10b*Rad9I*kalive;
    k10b = 0.05;
  Rad53activation: Rad53I + Rad9A => Rad53A + Rad9A; k11*Rad53I*Rad9A*kalive;
    k11 = 1e-5;
  Chk1Activation: Chk1I + Rad9A => Chk1A + Rad9A; Chk1I*k12*Rad9A*kalive;
    k12 = 0.00017;
  Exo1inhibition: Exo1A + Rad53A => Exo1I + Rad53A; Exo1A*k13*Rad53A*kalive;
    k13 = 1;
  Dun1activation: Dun1I + Rad53A => Dun1A + Rad53A; Dun1I*k14*Rad53A*kalive;
    k14 = 3.3e-6;
  Chk1cellArrest: Chk1A + G2Mon => Chk1A + G2Moff; Chk1A*G2Mon*k15*kalive;
    k15 = 0.2;
  Dun1cellArrest: Dun1A + G2Mon => Dun1A + G2Moff; Dun1A*G2Mon*k16*kalive;
    k16 = 0.1;
  SDNArepair1: Mec1RPAssDNA + S => Mec1 + RPA + S + 3 ssDNA; k17a*Mec1RPAssDNA*S*kalive;
    k17a = 0.05;
  G2DNArepair1: G2 + G2Moff + Mec1RPAssDNA => G2 + G2Moff + Mec1 + RPA + 3 ssDNA; G2*G2Moff*k17b*Mec1RPAssDNA*kalive;
    k17b = 0.05;
  SDNArepair2: S + ssDNA => S; k18a*S*ssDNA*kalive;
    k18a = 0.001;
  G2DNArepair2: G2 + G2Moff + ssDNA => G2 + G2Moff; G2*G2Moff*k18b*ssDNA*kalive;
    k18b = 1e-5;
  Recovery: Cdc13 + Rad17Utelo + recovery => Ctelo + Rad17 + recovery; Cdc13*k19*Rad17Utelo*recovery*kalive;
    k19 = 0.001;
  G1cyclinSynthesis: G1 => G1cyclin + G1; G1*G1cyclinSynthesis_kc1*kalive;
    G1cyclinSynthesis_kc1 = 0.16;
  ScyclinSynthesis: S => Scyclin + S; ScyclinSynthesis_kc1*S*kalive;
    ScyclinSynthesis_kc1 = 0.16;
  G2cyclinSynthesis: G2 => G2cyclin + G2; G2*G2cyclinSynthesis_kc1*kalive;
    G2cyclinSynthesis_kc1 = 0.16;
  McyclinSynthesis: M => Mcyclin + M; McyclinSynthesis_kc1*M*kalive;
    McyclinSynthesis_kc1 = 0.16;
  G1toSGenesOn: G1Soff + G1 + G1CdkA => G1Son + G1 + G1CdkA; G1*G1CdkA*G1Soff*G1toSGenesOn_kc2*kalive;
    G1toSGenesOn_kc2 = 0.01;
  StoG2GenesOn: SG2off + S + SCdkA => SG2on + S + SCdkA; StoG2GenesOn_kc2*S*SCdkA*SG2off*kalive;
    StoG2GenesOn_kc2 = 0.01;
  G2toMGenesOn: G2Moff + G2 + G2CdkA => G2Mon + G2 + G2CdkA; G2*G2CdkA*G2Moff*G2toMGenesOn_kc2*kalive;
    G2toMGenesOn_kc2 = 0.01;
  MtoG1GenesOn: MG1off + M + MCdkA => MG1on + M + MCdkA; MtoG1GenesOn_kc2*M*MCdkA*MG1off*kalive;
    MtoG1GenesOn_kc2 = 0.01;
  G1cyclinDegradation: G1cyclin => $sink; G1cyclin*G1cyclinDegradation_kc3*kalive;
    G1cyclinDegradation_kc3 = 0.0012;
  ScyclinDegradation: Scyclin => $sink; ScyclinDegradation_kc3*Scyclin*kalive;
    ScyclinDegradation_kc3 = 0.0012;
  G2cyclinDegradation: G2cyclin => $sink; G2cyclin*G2cyclinDegradation_kc3*kalive;
    G2cyclinDegradation_kc3 = 0.0012;
  McyclinDegradation: Mcyclin => $sink; McyclinDegradation_kc3*Mcyclin*kalive;
    McyclinDegradation_kc3 = 0.0012;
  G1toSProgession: G1 + G1CdkA + G1Son => G1CdkI + G1Soff + S; G1*G1CdkA*G1Son*G1toSProgession_kc4*kalive;
    G1toSProgession_kc4 = 0.01;
  StoG2Progession: S + SCdkA + SG2on => G2 + SCdkI + SG2off; StoG2Progession_kc4*S*SCdkA*SG2on*kalive;
    StoG2Progession_kc4 = 0.01;
  G2toMProgession: G2 + G2CdkA + G2Mon => G2CdkI + G2Moff + M; G2*G2CdkA*G2Mon*G2toMProgession_kc4*kalive;
    G2toMProgession_kc4 = 0.01;
  MtoG1Progession: M + MCdkA + MG1on => budscar + G1 + MCdkI + MG1off; MtoG1Progession_kc4*M*MCdkA*MG1on*kalive;
    MtoG1Progession_kc4 = 0.01;

  // Events:
  Rad9KinaseActivation: at (Mec1RPAssDNA >= 800): Rad9Kin = 1;
  ssDNAremoval: at (Mec1RPAssDNA + RPAssDNA + ssDNA <= 1): recovery = 1, Mec1RPAssDNA = 0, RPAssDNA = 0, ssDNA = 0;
  G2MRecoveryCompleted: at ((G2 == 1) && (Rad17Utelo == 0)): G2Mon = 1, G2Moff = 0, recovery = 0, Rad9A = 0, Rad9I = 20, Chk1A = 0, Chk1I = 60, Dun1A = 0, Dun1I = 3000, Exo1A = 0, Exo1I = 670, ExoXA = 0, ExoXI = 70, Rad53I = 6900, Rad53A = 0;
  SphaseRecoveryCompleted: at (Rad17Utelo == 0): recovery = 0;
  G1CdkActivation: at (G1cyclin > 100): G1CdkA = 1, G1CdkI = 0;
  SCdkActivation: at (Scyclin > 100): SCdkA = 1, SCdkI = 0;
  G2CdkActivation: at (G2cyclin > 100): G2CdkA = 1, G2CdkI = 0;
  MCdkActivation: at (Mcyclin > 100): MCdkA = 1, MCdkI = 0;
  CellDeath: at (Mec1RPAssDNA + RPAssDNA + ssDNA >= 2000): kalive = 0;

  // Unit definitions:
  unit substance = item;
end
