// SBML level 2 version 1

function function_1(V, substrate, Km)
  V*substrate/(Km + substrate);
end
function_1 is "degradation (Michaelis_Menten_Equation)";

model Locke2006_CircClock_LL()
  // The model describes the three loop arabidopsis clock mode. It provides initial conditions, parameter values and reactions for the production rates of the following species: LHY mRNA (cLm), cytoplasmic LHY (cLc), nuclear LHY (cLn), TOC1 mRNA (cTm), cytoplasmic TOC1 (cTc), nuclear TOC1 (cTn), X mRNA (cXm), cytoplasmic X (cXc), nuclear X (cXn), Y mRNA (cYm), cytoplasmic Y (cYc), nuclear Y (cYn), nuclear P (cPn), APRR7/9 mRNA, cytoplasmic APRR7/9, and nuclear APRR7/9.
  // The paper describe both the light constant(LL) and day night cycle(LD).But this model only contains the LL cycle. Some values of the parameters will be changed from wide type (WT) in order to simulate the mutation ones.These variables are listed in the notes of each parameters.
  // Figure 1C in the paper has been reproduced by both CopasiUI 4.0.1.9(development) and odeSolverl.
  // This model originates from BioModels Database: A Database of Annotated Published Models. It is copyright (c) 2005-2007 The BioModels Team.
  // For more information see the terms of use.

  // Compartments:
  compartment compartment = 1; compartment is "cell";

  // Species:
  species cLm in compartment = 0.4625; cLm is "LHY mRNA";
  species cLc in compartment = 0.0132; cLc is "LHY protein in cytoplasm";
  species cLn in compartment = 0.0699; cLn is "LHY protein in nucleus";
  species cTm in compartment = 0.4303; cTm is "TOC1 mRNA";
  species cTc in compartment = 10.2965; cTc is "TOC1 protein in cytoplasm";
  species cTn in compartment = 0.5402; cTn is "TOC1 protein in nucleus";
  species cXm in compartment = 0.0957; cXm is "X mRNA";
  species cXc in compartment = 1.5413; cXc is "X protein in cytoplasm";
  species cXn in compartment = 0.4585; cXn is "X protein in nucleus";
  species cYm in compartment = 0.0303; cYm is "Y mRNA";
  species cYc in compartment = 0.0041; cYc is "Y protein in the cytoplasm";
  species cYn in compartment = 0.0122; cYn is "Y protein in nucleus";
  species cPn in compartment = 0.8476; cPn is "light sensitive protein P";
  species cAm in compartment = 14.6921; cAm is "PPR7/9 mRNA";
  species cAc in compartment = 0.7027; cAc is "PPR7/9 protein in cytoplasm";
  species cAn in compartment = 0.8648; cAn is "PPR7/9 protein in nucleus";

  // Parameters:
  q1 = 4.1954;
  n0 = 0.05;
  g0 = 1;
  alpha = 4;
  n1 = 7.8142;
  a = 1.2479;
  g1 = 3.1383;
  m1 = 1.999;
  k1 = 2.392;
  // In lhy;cca1 mutation plan p1'=0.001*p1=0.8295e-3
  p1 = 0.8295;
  r1 = 16.8363;
  r2 = 0.1687;
  m2 = 20.44;
  k2 = 1.5644;
  m3 = 3.6888;
  k3 = 1.2765;
  n2 = 3.0087;
  b = 1.0258;
  g2 = 0.0368;
  g3 = 0.2658;
  c = 1.0258;
  m4 = 3.8231;
  k4 = 2.5734;
  // In toc1 mutation plant p2'=0.001*p2=4.324e-3
  p2 = 4.324;
  r3 = 0.3166;
  r4 = 2.1509;
  m5 = 0.0013;
  m6 = 3.1741;
  k5 = 2.7454;
  m7 = 0.0492;
  m8 = 4.0424;
  k6 = 0.4033;
  n3 = 0.2431;
  d = 1.4422;
  g4 = 0.5388;
  m9 = 10.1132;
  k7 = 6.5585;
  p3 = 2.147;
  r5 = 1.0352;
  r6 = 3.3017;
  m10 = 0.2179;
  k8 = 0.6632;
  m11 = 3.3442;
  k9 = 17.1111;
  q2 = 2.4017;
  n4 = 0.0857;
  n5 = 0.1649;
  g5 = 1.178;
  g6 = 0.0645;
  e = 3.6064;
  f = 1.0237;
  m12 = 4.297;
  k10 = 1.7303;
  // In gi mutation plant p4'=30%*p4=0.3*0.2485=0.07455
  p4 = 0.2485;
  r7 = 2.2123;
  r8 = 0.2002;
  m13 = 0.1347;
  k11 = 1.8258;
  m14 = 0.6114;
  k12 = 1.8066;
  p5 = 0.5;
  k13 = 1.2;
  m15 = 1.2;
  q3 = 1;
  q4 = 2.4514;
  g = 1.0258;
  n6 = 8.0706;
  g7 = 0.0004;
  m16 = 12.2398;
  k14 = 10.3617;
  // In ppr7;prr9 mutation plant p6'=0.001*p6=0.2907e-3.
  p6 = 0.2907;
  r9 = 0.2528;
  r10 = 0.2212;
  m17 = 4.4505;
  k15 = 0.0703;
  m18 = 0.0156;
  k16 = 0.6104;
  // light=1 when light is present,0 otherwise.
  light = 1;

  // Reactions:
  cLm_transcription: => cLm; compartment*g0^alpha/(g0^alpha + cAn^alpha)*(light*(q1*cPn + n0) + n1*cXn^a/(g1^a + cXn^a));  // modifiers: cAn, cXn, cPn
  cLm_degradation: cLm => ; compartment*function_1(m1, cLm, k1);
  cLc_translation: => cLc; compartment*p1*cLm;  // modifiers: cLm
  LHY_protein_translocation: cLc -> cLn; compartment*(r1*cLc - r2*cLn);
  cLc_degradation: cLc => ; compartment*function_1(m2, cLc, k2);
  cLn_degradation: cLn => ; compartment*function_1(m3, cLn, k3);
  cTm_transcription: => cTm; compartment*n2*cYn^b/(g2^b + cYn^b)*(g3^c/(g3^c + cLn^c));  // modifiers: cYn, cLn
  cTm_degradation: cTm => ; compartment*function_1(m4, cTm, k4);
  Y_protein_translocation: cYc -> cYn; compartment*(r7*cYc - r8*cYn);
  cYn_degradation: cYn => ; compartment*function_1(m14, cYn, k12);
  cYc_translation: => cYc; compartment*p4*cYm;  // modifiers: cYm
  cYc_degradation: cYc => ; compartment*function_1(m13, cYc, k11);
  X_protein_translocation: cXc -> cXn; compartment*(r5*cXc - r6*cXn);
  cXc_degradation: cXc => ; compartment*function_1(m10, cXc, k8);
  cXc_translation: => cXc; compartment*p3*cXm;  // modifiers: cXm
  cXn_degradation: cXn => ; compartment*function_1(m11, cXn, k9);
  cAc_translation: => cAc; compartment*p6*cAm;  // modifiers: cAm
  PPR7_9_protein_translocation: cAc -> cAn; compartment*(r9*cAc - r10*cAn); PPR7_9_protein_translocation is "PPR7/9 protein translocation";
  cAc_degradation: cAc => ; compartment*function_1(m17, cAc, k15);
  cAn_degradation: cAn => ; compartment*function_1(m18, cAn, k16);
  reaction_21: => cPn; (1 - light)*p5*compartment; reaction_21 is "light dependent production of protein P";
  reaction_22: cPn => ; q3*light*cPn*compartment; reaction_22 is "light activation protein P degradation";
  cPn_degradation: cPn => ; compartment*m15*cPn/(k13 + cPn);
  reaction_25: => cAm; light*q4*cPn*compartment; reaction_25 is "light activation of cAm transcription";  // modifiers: cPn
  reaction_26: => cAm; compartment*n6*cLn^g/(g7^g + cLn^g); reaction_26 is "light independent cAm transcription";  // modifiers: cLn
  cAm_degradation: cAm => ; compartment*m16*cAm/(k14 + cAm);
  cXm_transcription: => cXm; compartment*n3*cTn^d/(g4^d + cTn^d);  // modifiers: cTn
  cXm_degradation: cXm => ; compartment*m9*cXm/(k7 + cXm);
  cTc_translation: => cTc; p2*compartment*cTm;  // modifiers: cTm
  TOC1_protein_translocation: cTc -> cTn; compartment*(-r4*cTn + r3*cTc);
  reaction_32: cTc => ; compartment*(1 - light)*m5*cTc/(k5 + cTc); reaction_32 is "light activation degradation of cTc";
  reaction_33: cTc => ; m6*compartment*cTc/(k5 + cTc); reaction_33 is "light independent degradation of cTc";
  reaction_34: cTn => ; compartment*(1 - light)*m7*cTn/(k6 + cTn); reaction_34 is "light activation degradation of cTn";
  reaction_38: cTn => ; m8*compartment*cTn/(k6 + cTn); reaction_38 is "light independent degradation cTn";
  cYm_transcription: => cYm; compartment*(light*q2*cPn + (light*n4 + n5)*g5^e/(g5^e + cTn^e))*(g6^f/(g6^f + cLn^f));  // modifiers: cTn, cLn, cPn
  cYm_degradation: cYm => ; compartment*m12*cYm/(k10 + cYm);

  // Unit definitions:
  unit time = 3600 second;
  unit substance = 1e-9 mole; substance is "nM";
end
