// SBML level 2 version 1

model Fuentes2005_ZymogenActivation()
  // .
  // .
  // .
  // SBML level 2 code generated for the JWS Online project by Jacky Snoep using PySCeS
  // Run this model online at http://jjj.biochem.sun.ac.za
  // To cite JWS Online please refer to: Olivier, B.G. and Snoep, J.L. (2004) Web-based modelling using JWS Online, Bioinformatics, 20:2143-2144
  // .
  // .
  // .
  // .
  // .
  // .
  // The model reproduces Fig 1A of the paper. The model was successfully tested on MathSBML.
  // This model originates from BioModels Database: A Database of Annotated Published Models. It is copyright (c) 2005-2007 The BioModels Team.
  // For more information see the terms of use.

  // Compartments:
  compartment compartment = 1;

  // Species:
  species z in compartment = 2.4e-5; z is "Zymogen";
  species e in compartment = 0; e is "Enzyme";
  species w in compartment = 0; w is "Peptide";
  species ez in compartment = 0; ez is "Enzyme-Substrate complex";

  // Reactions:
  Intramolecular_autoactivation: z -> w + e; compartment*k1*z;
    k1 = 0.004 sec_inv;
  v2: z + e -> ez; compartment*(k21*e*z - k22*ez); v2 is "Intermolecular autoactivation-Complex formation";
    k21 = 1000 M_inv_sec_inv; k22 = 0.00021 sec_inv;
  v3: ez -> w + 2 e; compartment*k3*ez; v3 is "Intermolecular autoactivation-Enzyme release";
    k3 = 0.00054 sec_inv;

  // Unit definitions:
  unit M_inv_sec_inv = litre / (mole * second);
  unit sec_inv = 1 / second;
end
