// SBML level 2 version 1

model Zeilinger2006_PRR7_PRR9light_Y()
  // Zeilinger2006_PRR7-PRR9light-Y
  // The model reproduces the time profile of cYm and cTm under light-dark cycles as depicted in Fig 4 and Fig 5 respectively. 12 hour light-dark cycles are accomplished using a simple algorithm in the event section. The model was successfully tested using MathSBML.
  // This model originates from BioModels Database: A Database of Annotated Published Models. It is copyright (c) 2005-2007 The BioModels Team.
  // For more information see the terms of use.

  // Compartments:
  compartment cytoplasm = 1;
  compartment nucleus in cytoplasm = 1;

  // Species:
  species cLc in cytoplasm = 0.0731;
  species cLm in nucleus = 0.1114;
  species cLn in nucleus = 0.2366;
  species cP7c in cytoplasm = 0.0266;
  species cP7m in nucleus = 0.0204;
  species cP7n in nucleus = 1.5103;
  species cP9c in cytoplasm = 0.734;
  species cP9m in nucleus = 0.002;
  species cP9n in nucleus = 1.1162;
  species cPn in nucleus = 0;
  species cTc in cytoplasm = 5.2235;
  species cTm in nucleus = 3.6732;
  species cTn in nucleus = 4.5333;
  species cXc in cytoplasm = 2.4188;
  species cXm in nucleus = 0.652;
  species cXn in nucleus = 14.7289;
  species cYc in cytoplasm = 49.2611;
  species cYm in nucleus = 0.2992;
  species cYn in nucleus = 17.4355;

  // Parameters:
  q1 = 7.9798 Hr_inv;
  n1 = 2.3023 nM_per_hour;
  g1 = 16.3389 nM;
  m1 = 8.0568 nM_per_hour;
  k1 = 22.3951 nM;
  p1 = 1.2294 Hr_inv;
  r1 = 31.5166 Hr_inv;
  r2 = 9.1138 Hr_inv;
  m2 = 10.4609 nM_per_hour;
  k2 = 32.7881 nM;
  m3 = 12.7853 nM_per_hour;
  k3 = 29.0823 nM;
  n2 = 7.5433 nM_per_hour;
  g2 = 16.7487 nM;
  g3 = 11.5922 nM;
  m4 = 8.5185 nM_per_hour;
  k4 = 4.0551 nM;
  p2 = 1.0494 Hr_inv;
  p3 = 8.583 Hr_inv;
  r5 = 27.818 Hr_inv;
  r6 = 4.2863 Hr_inv;
  m10 = 9.2511 nM_per_hour;
  k8 = 13.4324 nM;
  m11 = 7.9066 nM_per_hour;
  k9 = 14.605 nM;
  q2 = 2.5505 Hr_inv;
  n4 = 1.5293 nM_per_hour;
  n5 = 2.6296 nM_per_hour;
  g5 = 0.5061 nM;
  g6 = 7.8469 nM;
  m12 = 8.4753 nM_per_hour;
  k10 = 16.1162 nM;
  r3 = 29.4222 Hr_inv;
  r4 = 33.6178 Hr_inv;
  m5 = 9.3024 nM_per_hour;
  m6 = 10.899 nM_per_hour;
  k5 = 16.9133 nM;
  m7 = 0.7527 nM_per_hour;
  m8 = 13.7459 nM_per_hour;
  k6 = 43.7049 nM;
  n3 = 0.6703 nM_per_hour;
  g4 = 11.3625 nM;
  m9 = 2.6345 nM_per_hour;
  k7 = 8.6873 nM;
  p4 = 14.6828 Hr_inv;
  r7 = 9.1917 Hr_inv;
  r8 = 25.8963 Hr_inv;
  m13 = 6.8544 nM_per_hour;
  k11 = 48.5862 nM;
  m14 = 3.2581 nM_per_hour;
  k12 = 23.2876 nM;
  p5 = 0.5 Hr_inv;
  k13 = 1.2 nM;
  q3 = 1 Hr_inv;
  m15 = 1.2 nM_per_hour;
  g7 = 0.4444 nM;
  g8 = 11.0459 nM;
  n6 = 11.3117 nM_per_hour;
  g9 = 14.5219 nM;
  m16 = 9.531 nM_per_hour;
  k14 = 50.9418 nM;
  p6 = 6.7738 Hr_inv;
  r9 = 31.0318 Hr_inv;
  r10 = 0.4557 Hr_inv;
  m17 = 5.4062 nM_per_hour;
  k15 = 49.4094 nM;
  m18 = 8.671 nM_per_hour;
  k16 = 42.4837 nM;
  n7 = 0.0833 nM_per_hour;
  g10 = 5.6855 nM;
  m19 = 6.1155 nM_per_hour;
  k17 = 18.6089 nM;
  p7 = 10.4532 Hr_inv;
  r11 = 34.6266 Hr_inv;
  r12 = 22.838 Hr_inv;
  m20 = 3.4152 nM_per_hour;
  k18 = 16.2407 nM;
  m21 = 0.028 nM_per_hour;
  k19 = 26.5795 nM;
  q4 = 7.4548 Hr_inv;
  n8 = 2.0738 nM;
  ld = 1 dimensionless;
  lmax = 1 dimensionless;
  a = 2.2802 dimensionless;
  b = 3.1075 dimensionless;
  c = 1.6808 dimensionless;
  d = 1.0164 dimensionless;
  e = 1.4943 dimensionless;
  f = 1.9491 dimensionless;
  h = 2.2116 dimensionless;
  i = 1.1065 dimensionless;
  j = 2.5579 dimensionless;
  k = 3.3953 dimensionless;
  Day_in_hours = 24 time;

  // Reactions:
  Light_dependent_cLm_synthesis: => cLm; nucleus*ld*q1*cPn;  // modifiers: cPn
  Light_independent_cLm_synthesis: => cLm; nucleus*(n1*cXn^a/(g1^a + cXn^a))*(g7^h/(g7^h + cP7n^h))*(g8^i/(g8^i + cP9n^i));  // modifiers: cXn, cP7n, cP9n
  cLm_degradation: cLm => ; nucleus*m1*cLm/(k1 + cLm);
  cLc_synthesis: => cLc; cytoplasm*p1*cLm;  // modifiers: cLm
  cLc_transport_into_nucleus: cLc => cLn; cytoplasm*r1*cLc;
  cLn_transport_into_cytoplasm: cLn => cLc; nucleus*r2*cLn;
  cLc_degradation: cLc => ; cytoplasm*m2*cLc/(k2 + cLc);
  cLn_degradation: cLn => ; nucleus*m3*cLn/(k3 + cLn);
  cTm_transcription: => cTm; nucleus*(n2*cYn^b/(g2^b + cYn^b))*(g3^c/(g3^c + cLn^c));  // modifiers: cYn, cLn
  cTm_degradation: cTm => ; nucleus*m4*cTm/(k4 + cTm);
  cTc_synthesis: => cTc; cytoplasm*p2*cTm;  // modifiers: cTm
  cTc_transport_into_nucleus: cTc => cTn; cytoplasm*r3*cTc;
  cTn_transport_into_cytoplasm: cTn => cTc; nucleus*r4*cTn;
  cTc_degradation: cTc => ; cytoplasm*((lmax - ld)*m5 + m6)*(cTc/(k5 + cTc));
  cTn_degradation: cTn => ; nucleus*((lmax - ld)*m7 + m8)*(cTn/(k6 + cTn));
  cXm_transcription: => cXm; nucleus*(n3*cTn^d/(g4^d + cTn^d));  // modifiers: cTn
  cXm_degradation: cXm => ; nucleus*(m9*cXm/(k7 + cXm));
  cXc_transcription: => cXc; cytoplasm*p3*cXm;  // modifiers: cXm
  cXc_transport_into_nucleus: cXc => cXn; cytoplasm*r5*cXc;
  cXn_transport_into_cytoplasm: cXn => cXc; nucleus*r6*cXn;
  cXc_degradation: cXc => ; cytoplasm*m10*cXc/(k8 + cXc);
  cXn_degradation: cXn => ; nucleus*m11*cXn/(k9 + cXn);
  cYm_transcription: => cYm; nucleus*(ld*q2*cPn + (ld*n4 + n5)*g5^e/(g5^e + cTn^e))*(g6^f/(g6^f + cLn^f));  // modifiers: cTn, cLn, cPn
  cYm_degradation: cYm => ; nucleus*m12*cYm/(k10 + cYm);
  cYc_transcription: => cYc; cytoplasm*p4*cYm;  // modifiers: cYm
  cYc_transport_to_nucleus: cYc => cYn; cytoplasm*r7*cYc;
  cYn_transport_to_cytoplasm: cYn => cYc; nucleus*r8*cYn;
  cYc_degradation: cYc => ; cytoplasm*m13*cYc/(k11 + cYc);
  cYn_degradation: cYn => ; nucleus*m14*cYn/(k12 + cYn);
  cPn_synthesis: => cPn; nucleus*(lmax - ld)*p5;
  R31a: cPn => ; nucleus*m15*cPn/(k13 + cPn); R31a is "cPn degradation";
  R31b: cPn => ; nucleus*q3*ld*cPn; R31b is "Light dependent cPn degradation";
  cP7m_transcription: => cP7m; nucleus*n6*cLn^j/(g9^j + cLn^j);  // modifiers: cLn
  cP7m_degradation: cP7m => ; nucleus*m16*cP7m/(k14 + cP7m);
  cP7c_synthesis: => cP7c; cytoplasm*p6*cP7m;  // modifiers: cP7m
  cP7c_transport_to_nucleus: cP7c => cP7n; cytoplasm*r9*cP7c;
  cP7n_transport_to_cytoplasm: cP7n => cP7c; nucleus*r10*cP7n;
  cP7c_degradation: cP7c => ; cytoplasm*m17*cP7c/(k15 + cP7c);
  cP7n_degradation: cP7n => ; nucleus*m18*cP7n/(k16 + cP7n);
  cP9m_transcription: => cP9m; (ld*q4*cPn + n7*ld + n8)*cLn^k/(g10^k + cLn^k);  // modifiers: cPn, cLn
  cP79m_degradation: cP9m => ; nucleus*m19*cP9m/(k17 + cP9m);
  cP9c_synthesis: => cP9c; cytoplasm*p7*cP9m;  // modifiers: cP9m
  cP9c_transport_to_nucleus: cP9c => cP9n; cytoplasm*r11*cP9c;
  cP9n_transport_to_cytoplasm: cP9n => cP9c; nucleus*r12*cP9n;
  cP9c_degradation: cP9c => ; cytoplasm*m20*cP9c/(k18 + cP9c);
  cP9n_degradation: cP9n => ; nucleus*m21*cP9n/(k19 + cP9n);

  // Events:
  event_0000001: at (Day_in_hours - time <= 0): Day_in_hours = Day_in_hours + 24, ld = 1;
  event_0000002: at ((Day_in_hours - time <= 12) && (Day_in_hours - time > 0)): ld = 0;

  // Unit definitions:
  unit substance = 1e-9 mole; substance is "nanomoles";
  unit time = 3600 second; time is "hour";
  unit Hr_inv = 1 / (3600 second); Hr_inv is "Hour_inv";
  unit nM = 1e-9 mole / litre;
  unit nM_per_hour = 1e-9 mole / (litre * 3600 second);
end
