// SBML level 2 version 1

model Goldbeter1990_Ca_Oscillations()
  // The model reproduces the time profile of cytosolic and intracellular calcium as depicted in the upper panel of Fig 2 in the paper. The model was successfully tested on MathSBML and Jarnac.
  // This model originates from BioModels Database: A Database of Annotated Published Models. It is copyright (c) 2005-2007 The BioModels Team.
  // For more information see the terms of use.

  // Compartments:
  compartment cytosol = 1;
  compartment store = 1;

  // Species:
  species Z in cytosol = 0.15;
  species Y in store = 1.6;

  // Parameters:
  v0 = 1 uM_per_sec;
  v1 = 7.3 uM_per_sec;
  beta = 0.301 dimensionless;
  Vm2 = 65 uM_per_sec;
  n = 2 dimensionless;
  K2 = 1 uM;
  Vm3 = 500 uM_per_sec;
  m = 2 dimensionless;
  Kr = 2 uM;
  Ka = 0.9 uM;
  kf = 1 sec_inv;
  k = 10 sec_inv;
  p = 4 dimensionless;

  // Reactions:
  Ca_influx: => Z; cytosol*v0;
  InsP3_dependent_Ca_influx: => Z; cytosol*v1*beta;
  ATP_driven_Ca_pumping_into_store: Z => Y; cytosol*(Vm2*Z^n/(K2^n + Z^n));
  ATP_driven_pumping_into_cytosol: Y => Z; store*(Vm3*Y^m*Z^p/((Kr^m + Y^m)*(Ka^p + Z^p)));
  Rf: Y => Z; store*kf*Y; Rf is "Ca leak";
  R_eff: Z => ; cytosol*k*Z; R_eff is "Ca efflux";

  // Unit definitions:
  unit substance = 1e-6 mole; substance is "micromole";
  unit uM_per_sec = 1e-6 mole / (litre * second);
  unit sec_inv = 1 / second;
  unit uM = 1e-6 mole / litre;
end
