// SBML level 2 version 1

model Model_1()
  // Laub1998_SpontaneousOscillations
  // This is model according to the paper "A Molecular Network That Produces Spontaneous Oscillations in Excitalbe Cells of Dictyostelium. Figure 3 has been reproduced by Copasi 4.0.20(development) ". However four of the parameters have been changed , see details in notes.
  // This model originates from BioModels Database: A Database of Annotated Published Models. It is copyright (c) 2005-2007 The BioModels Team.
  // For more information see the terms of use.

  // Compartments:
  compartment Extracellular = 1;
  compartment Intracellular in Extracellular = 1;

  // Species:
  species Ex_cAMP in Extracellular = 0;
  species In_cAMP in Intracellular = 1;
  species PKA in Intracellular = 1;
  species REGA in Intracellular = 2.5;
  species ACA in Intracellular = 1.4;
  species CAR1 in Intracellular = 1.5;
  species ERK2 in Intracellular = 1.6;

  // Parameters:
  parameter_0 = 1.4; parameter_0 is "k1";
  parameter_1 = 0.9; parameter_1 is "k2";
  parameter_2 = 2.5; parameter_2 is "k3";
  parameter_3 = 1.5; parameter_3 is "k4";
  parameter_4 = 0.6; parameter_4 is "k5";
  parameter_5 = 0.8; parameter_5 is "k6";
  parameter_6 = 2; parameter_6 is "k7";
  parameter_7 = 1.3; parameter_7 is "k8";
  // The value of the k9 is different from the paper. In the paper k9=0.7.
  parameter_8 = 0.29; parameter_8 is "k9";
  parameter_9 = 1; parameter_9 is "k10";
  // The value for this parameters is different from paper (k11=0.3).
  parameter_10 = 0.6; parameter_10 is "k11";
  parameter_11 = 3.1; parameter_11 is "k12";
  // In the paper, k13=1.8. This is the most different parameter value between model and paper.
  parameter_12 = 33; parameter_12 is "k13";
  // In paper this value k14=1.5
  parameter_13 = 4.5; parameter_13 is "k14";

  // Reactions:
  reaction_0: => ACA; Intracellular*parameter_0*ERK2; reaction_0 is "k1";  // modifiers: ERK2
  reaction_1: ACA => ; Intracellular*parameter_1*ACA; reaction_1 is "k2";
  reaction_2: => PKA; Intracellular*parameter_2*In_cAMP; reaction_2 is "k3";  // modifiers: In_cAMP
  reaction_3: PKA => ; Intracellular*parameter_3*PKA; reaction_3 is "k4";
  reaction_4: => ERK2; Intracellular*parameter_4*CAR1; reaction_4 is "k5";  // modifiers: CAR1
  reaction_5: ERK2 => ; Intracellular*parameter_5*ERK2*PKA; reaction_5 is "k6";  // modifiers: PKA
  reaction_6: => REGA; Intracellular*parameter_6; reaction_6 is "k7";
  reaction_7: REGA => ; Intracellular*parameter_7*REGA*ERK2; reaction_7 is "k8";  // modifiers: ERK2
  reaction_8: => In_cAMP; Intracellular*parameter_8*ACA; reaction_8 is "k9";  // modifiers: ACA
  reaction_9: In_cAMP => ; Intracellular*parameter_9*In_cAMP*REGA; reaction_9 is "k10";  // modifiers: REGA
  reaction_10: => Ex_cAMP; Extracellular*parameter_10*ACA; reaction_10 is "k11";  // modifiers: ACA
  reaction_11: Ex_cAMP => ; Extracellular*parameter_11*Ex_cAMP; reaction_11 is "k12";
  reaction_12: => CAR1; Intracellular*parameter_12*Ex_cAMP; reaction_12 is "k13";  // modifiers: Ex_cAMP
  reaction_13: CAR1 => ; Intracellular*parameter_13*CAR1*PKA; reaction_13 is "k14";  // modifiers: PKA

  // Unit definitions:
  unit time = 60 second; time is "min";
  unit substance = 1e-6 mole; substance is "micro_Mole";
end
