// SBML level 2 version 1

model Vilar2006_TGFbeta()
  // The model reproduces Fig 5A of the paper. The ligand concentration is increased from 3E-5 to 0.01 at time t=2500 to ensure that the system reaches steady state. Hence, the time t=0 of the paper corresponds to t=2500 in the model. The peak value of the active ligand receptor complex is off by a value of 1.25, the authors have stated that this discrepancy is due to the fact that the figure in the paper corresponds to a slightly different parameter set. The model was successfully tested on MathSBML.
  // This model originates from BioModels Database: A Database of Annotated Published Models. It is copyright (c) 2005-2007 The BioModels Team.
  // For more information see the terms of use.

  // Compartments:
  compartment PM = 1; PM is "Plasma membrane";
  compartment Endosome in PM = 1;

  // Species:
  substanceOnly species RI in PM = 20; RI is "Receptor 1";
  substanceOnly species RII in PM = 20; RII is "Receptor 2";
  substanceOnly species lRIRII in PM = 0; lRIRII is "ligand receptor complex-plasma membrane";
  substanceOnly species lRIRII_endo in Endosome = 40; lRIRII_endo is "ligand receptor complex-endosome";
  substanceOnly species RI_endo in Endosome = 0; RI_endo is "Receptor 1-endosome";
  substanceOnly species RII_endo in Endosome = 0; RII_endo is "Receptor 2 endosome";

  // Parameters:
  ka = 1;
  ligand = 3e-5;
  kcd = 0.0277777778;
  klid = 0.25;
  ki = 0.3333333;
  pRI = 8;
  kr = 0.03333333;
  alpha = 1;
  pRII = 4;

  // Reactions:
  v1: RII + RI => lRIRII; ka*ligand*RI*RII; v1 is "Ligand receptor complex formation";
  v2: lRIRII => ; kcd*lRIRII; v2 is "Ligand receptor complex constitutive degradation";
  v3: lRIRII => ; klid*lRIRII; v3 is "Ligand independent complex degradation";
  v4: lRIRII => lRIRII_endo; ki*lRIRII; v4 is "Ligand receptor complex internalization";
  RI_synthesis: => RI; pRI;
  RI_constitutive_degradation: RI => ; kcd*RI;
  RI_internalization: RI => RI_endo; ki*RI;
  RI_recycling: RI_endo => RI; kr*RI_endo;
  v9: lRIRII_endo => RI + RII; kr*lRIRII_endo; v9 is "Ligand Receptor complex recycling";
  RII_synthesis: => RII; pRII;
  RII_constitutive_degradation: RII => ; kcd*RII;
  RII_internalization: RII => RII_endo; ki*RII;
  RII_recycling: RII_endo => RII; kr*RII_endo;

  // Events:
  event_0000001: at (time >= 2500): ligand = 0.01;

  // Unit definitions:
  unit substance = item;
  unit time = 3600 second; time is "minutes";
  unit min_inv = 1 / (3600 second);
end
