// SBML level 2 version 1

model Legewie2006_apoptosis_WT()
  // The model reproduces active Caspase-3 time profile corresponding to the total Apaf-1 value of 20 nM as depicted in Fig 2-A . The model was successfully tested on MathSBML.
  // This model originates from BioModels Database: A Database of Annotated Published Models. It is copyright (c) 2005-2007 The BioModels Team.
  // For more information see the terms of use.

  // Compartments:
  compartment cytosol = 1; cytosol is "Cytosol";

  // Species:
  species A in cytosol = 20; A is "APAF-1";
  species Caspase_9 in cytosol = 20;
  species C9X in cytosol = 0; C9X is "Caspase 9-XIAP complex";
  species X in cytosol = 40; X is "XIAP";
  species AC9X in cytosol = 0; AC9X is "APAF-1-Caspase 9-XIAP complex";
  species AC9 in cytosol = 0; AC9 is "APAF-1-Caspase 9 complex";
  species Caspase_3 in cytosol = 200;
  species C3_star in cytosol = 0; C3_star is "Caspase 3 cleaved";
  species C3_starX in cytosol = 0; C3_starX is "Caspase 3 cleaved - XIAP complex";
  species C9_starX in cytosol = 0; C9_starX is "Caspase 9 cleaved-XIAP complex";
  species C9_star in cytosol = 0; C9_star is "Caspase 9 cleaved";
  species AC9_star in cytosol = 0; AC9_star is "APAF-1-Caspase 9 cleaved complex";
  species AC9_starX in cytosol = 0; AC9_starX is "Apaf-1-Caspase 9 cleaved -XIAP complex";

  // Parameters:
  k1 = 0.002 per_nM_per_sec;
  kb1 = 0.1 sec_inverse;
  k2 = 5e-6 per_nM_per_sec;
  k3 = 0.00035 per_nM_per_sec;
  k4 = 0.0002 per_nM_per_sec;
  k5 = 0.0002 per_nM_per_sec;
  k6 = 5e-5 per_nM_per_sec;
  k7 = 0.0035 per_nM_per_sec;
  k8 = 0.002 per_nM_per_sec;
  k8b = 0.1 sec_inverse;
  k9 = 0.001 per_nM_per_sec;
  k9b = 0.001 sec_inverse;
  k10 = 0.001 per_nM_per_sec;
  k10b = 0.001 sec_inverse;
  k11 = 0.001 per_nM_per_sec;
  k11b = 0.001 sec_inverse;
  k12 = 0.001 per_nM_per_sec;
  k12b = 0.001 sec_inverse;
  k13 = 0.002 per_nM_per_sec;
  k13b = 0.1 sec_inverse;
  k14 = 0.002 per_nM_per_sec;
  k14b = 0.1 sec_inverse;
  k15 = 0.003 per_nM_per_sec;
  k15b = 0.001 sec_inverse;
  k16 = 0.001 sec_inverse;
  k16prod = 0.02 nM_per_sec;
  k17 = 0.001 sec_inverse;
  k17prod = 0.02 nM_per_sec;
  k18 = 0.001 sec_inverse;
  k18prod = 0.04 nM_per_sec;
  k19 = 0.001 sec_inverse;
  k20 = 0.001 sec_inverse;
  k21 = 0.001 sec_inverse;
  k22 = 0.001 sec_inverse;
  k22prod = 0.2 nM_per_sec;
  k23 = 0.001 sec_inverse;
  k24 = 0.001 sec_inverse;
  k25 = 0.001 sec_inverse;
  k26 = 0.001 sec_inverse;
  k27 = 0.001 sec_inverse;
  k28 = 0.001 sec_inverse;

  // Reactions:
  Caspase_9_Apaf_1_binding: A + Caspase_9 -> AC9; cytosol*(k1*A*Caspase_9 - kb1*AC9); Caspase_9_Apaf_1_binding is "Caspase 9 / Apaf-1 binding";
  Caspase_3_cleavage_by_Caspase_9: Caspase_3 + Caspase_9 => C3_star + Caspase_9; cytosol*k2*Caspase_3*Caspase_9;
  v3: Caspase_3 + AC9 => C3_star + AC9; cytosol*k3*Caspase_3*AC9; v3 is "Caspase 3 cleavage by Caspase 9-Apaf-1";
  Caspase_9_Xiap_binding: Caspase_9 + X -> C9X; cytosol*(k9*Caspase_9*X - k9b*C9X);
  Caspase_9_Apaf_1_Xiap_binding: AC9 + X -> AC9X; cytosol*(k10*AC9*X - k10b*AC9X); Caspase_9_Apaf_1_Xiap_binding is "Caspase 9-Apaf-1 Xiap binding";
  Caspase_9_Xiap_Apaf_1_binding: C9X + A -> AC9X; cytosol*(k13*C9X*A - k13b*AC9X); Caspase_9_Xiap_Apaf_1_binding is "Caspase 9-Xiap Apaf-1 binding";
  cleaved_Caspase_3_Xiap_binding: C3_star + X -> C3_starX; cytosol*(k15*C3_star*X - k15b*C3_starX); cleaved_Caspase_3_Xiap_binding is "cleaved Caspase 3-Xiap binding";
  v4: Caspase_9 + C3_star => C9_star + C3_star; cytosol*k4*Caspase_9*C3_star; v4 is "Caspase 9 cleavage by cleaved caspase 3";
  v5: AC9 + C3_star => AC9_star + C3_star; cytosol*k5*AC9*C3_star; v5 is "Caspase 9 cleavage by cleaved caspase 3 when Apaf-1 is bound";
  cleaved_Caspase_9_Apaf_1_binding: C9_star + A -> AC9_star; cytosol*(k8*C9_star*A - k8b*AC9_star); cleaved_Caspase_9_Apaf_1_binding is "cleaved Caspase 9 Apaf-1 binding";
  cleaved_Caspase_9_XIAP_binding: C9_star + X -> C9_starX; cytosol*(k11*C9_star*X - k11b*C9_starX);
  v12: AC9_star + X -> AC9_starX; cytosol*(k12*AC9_star*X - k12b*AC9_starX); v12 is "cleaved Caspase 9-Apaf-1 XIAP binding";
  v14: C9_starX + A -> AC9_starX; cytosol*(k14*C9_starX*A - k14b*AC9_starX); v14 is "cleaved Caspase 9-Xiap Apaf-1 binding";
  v6: Caspase_3 + C9_star => C3_star + C9_star; cytosol*k6*Caspase_3*C9_star; v6 is "Caspase 3 cleavage by cleaved Caspase 9";
  v7: Caspase_3 + AC9_star => C3_star + AC9_star; cytosol*k7*Caspase_3*AC9_star; v7 is "Caspase 3 cleavage by cleaved Caspase 9 - Apaf-1";
  Apaf_1_turnover: => A; cytosol*(k16prod - k16*A); Apaf_1_turnover is "Apaf-1 turnover";
  Caspase_9_turnover: => Caspase_9; cytosol*(k17prod - k17*Caspase_9);
  Xiap_turnover: => X; cytosol*(k18prod - k18*X);
  Caspase_9_Xiap_degradation: C9X => ; cytosol*k19*C9X; Caspase_9_Xiap_degradation is "Caspase 9-Xiap degradation";
  v20: AC9X => ; cytosol*k20*AC9X; v20 is "Apaf-1-Caspase 9-Xiap degradation";
  Apaf_1_Caspase_9_degradation: AC9 => ; cytosol*k21*AC9; Apaf_1_Caspase_9_degradation is "Apaf-1-Caspase 9 degradation";
  Caspase_3_turnover: => Caspase_3; cytosol*(k22prod - k22*Caspase_3);
  Caspase_3_cleaved_degradation: C3_star => ; cytosol*k23*C3_star;
  v24: C3_starX => ; cytosol*k24*C3_starX; v24 is "Caspase 3 cleaved-Xiap degradation";
  v25: C9_starX => ; cytosol*k25*C9_starX; v25 is "Caspase 9 cleaved-Xiap degradation";
  Caspase_9_cleaved_degradation: C9_star => ; cytosol*k26*C9_star;
  v27: AC9_star => ; cytosol*k27*AC9_star; v27 is "Apaf-1 Caspase 9 cleaved degradation";
  v28: AC9_starX => ; cytosol*k28*AC9_starX; v28 is "Apaf-1 Caspase 9 cleaved-Xiap degradation";

  // Unit definitions:
  unit substance = 1e-9 mole; substance is "nanomole";
  unit nM_per_sec = 1e-9 mole / (litre * second);
  unit per_nM_per_sec = litre / (1e-9 mole * second);
  unit nM = 1e-9 mole / litre;
  unit sec_inverse = 1 / second;
end
