// SBML level 2 version 1

model Proctor2007_ubiquitine()
  // Model of the Ubiquitin-Proteasome System
  // Description of the Model
  // This is a stochastic model of the ubiquitin-proteasome system for a generic pool of native proteins (NatP) which have a half-life of about 10 hours under normal conditions. It is assumed that these proteins are only degraded after they have lost their native structure due to a damage event. This is represented in the model by the misfolding reaction which depends on the level of reactive oxygen species (ROS) in the cell. Misfolded proteins (MisP) are first bound by an E3 ubiquitin ligase. Ubiquitin (Ub) is activated by E1 (ubiquitin-activating enzyme) and then passed to E2 (ubiquitin-conjugating enzyme). The E2 enzyme then passes the ubiquitin molecule to the E3/MisP complex with the net effect that the misfolded protein is monoubiquitinated and both E2 and E3 are released. Further ubiquitin molecules are added in a step-wise manner. When the chain of ubiquitin molecules is of length 4 or more, the polyubiquitinated misfolded protein may bind to the proteasome. The model also includes de-ubiquitinating enzymes (DUB) which cleave ubiquitin molecules from the chain in a step-wise manner. They work on chains attached to misfolded proteins both unbound and bound to the proteasomes. Misfolded proteins bound to the proteasome may be degraded releasing ubiquitin. Misfolded proteins including ubiquitinated proteins may also aggregate. Aggregates (AggP) may be sequestered (Seq_AggP) which takes them out of harm's way or they may bind to the proteasome (AggP_Proteasome). Proteasomes bound by aggregates are no longer available for protein degradation.
  // Figure 2 and Figure 3 has been simulated using Gillespie2.
  // This model originates from BioModels Database: A Database of Annotated Published Models. It is copyright (c) 2005-2007 The BioModels Team.
  // For more information see the terms of use.

  // Compartments:
  compartment cytosol = 1;

  // Species:
  substanceOnly species NatP in cytosol = 500;
  substanceOnly species MisP in cytosol = 0;
  substanceOnly species Ub in cytosol = 500;
  substanceOnly species E1 in cytosol = 100;
  substanceOnly species E2 in cytosol = 100;
  substanceOnly species E3 in cytosol = 100;
  substanceOnly species DUB in cytosol = 200;
  substanceOnly species Proteasome in cytosol = 100;
  substanceOnly species ROS in cytosol = 10;
  substanceOnly species E1_Ub in cytosol = 0;
  substanceOnly species E2_Ub in cytosol = 0;
  substanceOnly species E3_MisP in cytosol = 0;
  substanceOnly species MisP_Ub in cytosol = 0;
  substanceOnly species MisP_Ub2 in cytosol = 0;
  substanceOnly species MisP_Ub3 in cytosol = 0;
  substanceOnly species MisP_Ub4 in cytosol = 0;
  substanceOnly species MisP_Ub5 in cytosol = 0;
  substanceOnly species MisP_Ub6 in cytosol = 0;
  substanceOnly species MisP_Ub7 in cytosol = 0;
  substanceOnly species MisP_Ub8 in cytosol = 0;
  substanceOnly species MisP_Ub4_Proteasome in cytosol = 0;
  substanceOnly species MisP_Ub5_Proteasome in cytosol = 0;
  substanceOnly species MisP_Ub6_Proteasome in cytosol = 0;
  substanceOnly species MisP_Ub7_Proteasome in cytosol = 0;
  substanceOnly species MisP_Ub8_Proteasome in cytosol = 0;
  substanceOnly species $ATP in cytosol = 10000;
  substanceOnly species $ADP in cytosol = 1000;
  substanceOnly species $AMP in cytosol = 1000;
  substanceOnly species $Source in cytosol = 1;
  substanceOnly species degUb4 in cytosol = 0;
  substanceOnly species degUb5 in cytosol = 0;
  substanceOnly species degUb6 in cytosol = 0;
  substanceOnly species degUb7 in cytosol = 0;
  substanceOnly species degUb8 in cytosol = 0;
  substanceOnly species totMisP in cytosol = 0;
  substanceOnly species refNatP in cytosol = 0;
  substanceOnly species AggP in cytosol = 0;
  substanceOnly species SeqAggP in cytosol = 0;
  substanceOnly species AggP_Proteasome in cytosol = 0;

  // Parameters:
  k1 = 0.01;
  k2 = 2e-6;
  k3 = 4e-6;
  k61 = 1.7e-5;
  k61r = 0.0002;
  k62 = 0.0002;
  k63 = 0.001;
  k64 = 0.001;
  k65 = 0.01;
  k66 = 1e-5;
  k67 = 1e-5;
  k68 = 1e-5;
  // This is the inhibiting proteasome activity situlation, k69=0. All the other parameters as in Tables2 and 3. If in the model is in the normal conditions, k69=1e-3.
  k69 = 0;
  k71 = 1e-8;
  k72 = 1e-8;
  k73 = 0.001;
  k74 = 1e-5;

  // Reactions:
  ProteinSynthesis: $Source => NatP; k1*Source;
  Misfolding: NatP + ROS => MisP + ROS + totMisP; k2*NatP*ROS;
  Refolding: MisP => NatP + refNatP; k3*MisP;
  MisPE3Binding: MisP + E3 => E3_MisP; k61*MisP*E3;
  MisPE3Release: E3_MisP => MisP + E3; k61r*E3_MisP;
  E1UbBinding: E1 + Ub + $ATP => E1_Ub + $AMP; k62*E1*Ub*ATP/(5000 + ATP);
  E2UbBinding: E2 + E1_Ub => E2_Ub + E1; k63*E2*E1_Ub;
  Monoubiquitination: E2_Ub + E3_MisP => MisP_Ub + E2 + E3; k64*E2_Ub*E3_MisP;
  Polyubiquitination1: MisP_Ub + E2_Ub => MisP_Ub2 + E2; k65*MisP_Ub*E2_Ub;
  Polyubiquitination2: MisP_Ub2 + E2_Ub => MisP_Ub3 + E2; k65*MisP_Ub2*E2_Ub;
  Polyubiquitination3: MisP_Ub3 + E2_Ub => MisP_Ub4 + E2; k65*MisP_Ub3*E2_Ub;
  Polyubiquitination4: MisP_Ub4 + E2_Ub => MisP_Ub5 + E2; k65*MisP_Ub4*E2_Ub;
  Polyubiquitination5: MisP_Ub5 + E2_Ub => MisP_Ub6 + E2; k65*MisP_Ub5*E2_Ub;
  Polyubiquitination6: MisP_Ub6 + E2_Ub => MisP_Ub7 + E2; k65*MisP_Ub6*E2_Ub;
  Polyubiquitination7: MisP_Ub7 + E2_Ub => MisP_Ub8 + E2; k65*MisP_Ub7*E2_Ub;
  Deubiqutination1: MisP_Ub8 + DUB => MisP_Ub7 + DUB + Ub; k66*MisP_Ub8*DUB;
  Deubiqutination2: MisP_Ub7 + DUB => MisP_Ub6 + DUB + Ub; k66*MisP_Ub7*DUB;
  Deubiqutination3: MisP_Ub6 + DUB => MisP_Ub5 + DUB + Ub; k66*MisP_Ub6*DUB;
  Deubiqutination4: MisP_Ub5 + DUB => MisP_Ub4 + DUB + Ub; k66*MisP_Ub5*DUB;
  Deubiqutination5: MisP_Ub4 + DUB => MisP_Ub3 + DUB + Ub; k66*MisP_Ub4*DUB;
  Deubiqutination6: MisP_Ub3 + DUB => MisP_Ub2 + DUB + Ub; k66*MisP_Ub3*DUB;
  Deubiqutination7: MisP_Ub2 + DUB => MisP_Ub + DUB + Ub; k66*MisP_Ub2*DUB;
  Deubiqutination8: MisP_Ub + DUB => MisP + DUB + Ub; k66*MisP_Ub*DUB;
  ProteasomeBinding1: MisP_Ub4 + Proteasome => MisP_Ub4_Proteasome; k67*MisP_Ub4*Proteasome;
  ProteasomeBinding2: MisP_Ub5 + Proteasome => MisP_Ub5_Proteasome; k67*MisP_Ub5*Proteasome;
  ProteasomeBinding3: MisP_Ub6 + Proteasome => MisP_Ub6_Proteasome; k67*MisP_Ub6*Proteasome;
  ProteasomeBinding4: MisP_Ub7 + Proteasome => MisP_Ub7_Proteasome; k67*MisP_Ub7*Proteasome;
  ProteasomeBinding5: MisP_Ub8 + Proteasome => MisP_Ub8_Proteasome; k67*MisP_Ub8*Proteasome;
  DeubiquitinationBoundMisP5: MisP_Ub8_Proteasome + DUB => MisP_Ub7_Proteasome + Ub + DUB; k68*MisP_Ub8_Proteasome*DUB;
  DeubiquitinationBoundMisP4: MisP_Ub7_Proteasome + DUB => MisP_Ub6_Proteasome + Ub + DUB; k68*MisP_Ub7_Proteasome*DUB;
  DeubiquitinationBoundMisP3: MisP_Ub6_Proteasome + DUB => MisP_Ub5_Proteasome + Ub + DUB; k68*MisP_Ub6_Proteasome*DUB;
  DeubiquitinationBoundMisP2: MisP_Ub5_Proteasome + DUB => MisP_Ub4_Proteasome + Ub + DUB; k68*MisP_Ub5_Proteasome*DUB;
  DeubiquitinationBoundMisP1: MisP_Ub4_Proteasome + DUB => MisP_Ub3 + Proteasome + Ub + DUB; k68*MisP_Ub4_Proteasome*DUB;
  ProteasomeActivity1: MisP_Ub4_Proteasome + $ATP => 4 Ub + Proteasome + $ADP + degUb4; k69*MisP_Ub4_Proteasome*ATP/(5000 + ATP);
  ProteasomeActivity2: MisP_Ub5_Proteasome + $ATP => 5 Ub + Proteasome + $ADP + degUb5; k69*MisP_Ub5_Proteasome*ATP/(5000 + ATP);
  ProteasomeActivity3: MisP_Ub6_Proteasome + $ATP => 6 Ub + Proteasome + $ADP + degUb6; k69*MisP_Ub6_Proteasome*ATP/(5000 + ATP);
  ProteasomeActivity4: MisP_Ub7_Proteasome + $ATP => 7 Ub + Proteasome + $ADP + degUb7; k69*MisP_Ub7_Proteasome*ATP/(5000 + ATP);
  ProteasomeActivity5: MisP_Ub8_Proteasome + $ATP => 8 Ub + Proteasome + $ADP + degUb8; k69*MisP_Ub8_Proteasome*ATP/(5000 + ATP);
  Aggregation1: 2 MisP => AggP; k71*MisP*(MisP - 1)*0.5;
  Aggregation2: MisP + AggP => 2 AggP; k71*MisP*AggP;
  Aggregation3: 2 MisP_Ub => AggP; k72*MisP_Ub*(MisP_Ub - 1)*0.5;
  Aggregation4: 2 MisP_Ub2 => AggP; k72*MisP_Ub2*(MisP_Ub2 - 1)*0.5;
  Aggregation5: 2 MisP_Ub3 => AggP; k72*MisP_Ub3*(MisP_Ub3 - 1)*0.5;
  Aggregation6: 2 MisP_Ub4 => AggP; k72*MisP_Ub4*(MisP_Ub4 - 1)*0.5;
  Aggregation7: 2 MisP_Ub5 => AggP; k72*MisP_Ub5*(MisP_Ub5 - 1)*0.5;
  Aggregation8: 2 MisP_Ub6 => AggP; k72*MisP_Ub6*(MisP_Ub6 - 1)*0.5;
  Aggregation9: 2 MisP_Ub7 => AggP; k72*MisP_Ub7*(MisP_Ub7 - 1)*0.5;
  Aggregation10: 2 MisP_Ub8 => AggP; k72*MisP_Ub8*(MisP_Ub8 - 1)*0.5;
  Aggregation11: MisP_Ub + MisP => AggP; k72*MisP_Ub*MisP;
  Aggregation12: MisP_Ub2 + MisP => AggP; k72*MisP_Ub2*MisP;
  Aggregation13: MisP_Ub3 + MisP => AggP; k72*MisP_Ub3*MisP;
  Aggregation14: MisP_Ub4 + MisP => AggP; k72*MisP_Ub4*MisP;
  Aggregation15: MisP_Ub5 + MisP => AggP; k72*MisP_Ub5*MisP;
  Aggregation16: MisP_Ub6 + MisP => AggP; k72*MisP_Ub6*MisP;
  Aggregation17: MisP_Ub7 + MisP => AggP; k72*MisP_Ub7*MisP;
  Aggregation18: MisP_Ub8 + MisP => AggP; k72*MisP_Ub8*MisP;
  Aggregation19: MisP_Ub + AggP => 2 AggP; k72*MisP_Ub*AggP;
  Aggregation20: MisP_Ub2 + AggP => 2 AggP; k72*MisP_Ub2*AggP;
  Aggregation21: MisP_Ub3 + AggP => 2 AggP; k72*MisP_Ub3*AggP;
  Aggregation22: MisP_Ub4 + AggP => 2 AggP; k72*MisP_Ub4*AggP;
  Aggregation23: MisP_Ub5 + AggP => 2 AggP; k72*MisP_Ub5*AggP;
  Aggregation24: MisP_Ub6 + AggP => 2 AggP; k72*MisP_Ub6*AggP;
  Aggregation25: MisP_Ub7 + AggP => 2 AggP; k72*MisP_Ub7*AggP;
  Aggregation26: MisP_Ub8 + AggP => 2 AggP; k72*MisP_Ub8*AggP;
  Aggregation27: MisP_Ub + MisP_Ub2 => AggP; k72*MisP_Ub*MisP_Ub2;
  Aggregation28: MisP_Ub + MisP_Ub3 => AggP; k72*MisP_Ub*MisP_Ub3;
  Aggregation29: MisP_Ub + MisP_Ub4 => AggP; k72*MisP_Ub*MisP_Ub4;
  Aggregation30: MisP_Ub + MisP_Ub5 => AggP; k72*MisP_Ub*MisP_Ub5;
  Aggregation31: MisP_Ub + MisP_Ub6 => AggP; k72*MisP_Ub*MisP_Ub6;
  Aggregation32: MisP_Ub + MisP_Ub7 => AggP; k72*MisP_Ub*MisP_Ub7;
  Aggregation33: MisP_Ub + MisP_Ub8 => AggP; k72*MisP_Ub*MisP_Ub8;
  Aggregation34: MisP_Ub2 + MisP_Ub3 => AggP; k72*MisP_Ub2*MisP_Ub3;
  Aggregation35: MisP_Ub2 + MisP_Ub4 => AggP; k72*MisP_Ub2*MisP_Ub4;
  Aggregation36: MisP_Ub2 + MisP_Ub5 => AggP; k72*MisP_Ub2*MisP_Ub5;
  Aggregation37: MisP_Ub2 + MisP_Ub6 => AggP; k72*MisP_Ub2*MisP_Ub6;
  Aggregation38: MisP_Ub2 + MisP_Ub7 => AggP; k72*MisP_Ub2*MisP_Ub7;
  Aggregation39: MisP_Ub2 + MisP_Ub8 => AggP; k72*MisP_Ub2*MisP_Ub8;
  Aggregation40: MisP_Ub3 + MisP_Ub4 => AggP; k72*MisP_Ub3*MisP_Ub4;
  Aggregation41: MisP_Ub3 + MisP_Ub5 => AggP; k72*MisP_Ub3*MisP_Ub5;
  Aggregation42: MisP_Ub3 + MisP_Ub6 => AggP; k72*MisP_Ub3*MisP_Ub6;
  Aggregation43: MisP_Ub3 + MisP_Ub7 => AggP; k72*MisP_Ub3*MisP_Ub7;
  Aggregation44: MisP_Ub3 + MisP_Ub8 => AggP; k72*MisP_Ub3*MisP_Ub8;
  Aggregation45: MisP_Ub4 + MisP_Ub5 => AggP; k72*MisP_Ub4*MisP_Ub5;
  Aggregation46: MisP_Ub4 + MisP_Ub6 => AggP; k72*MisP_Ub4*MisP_Ub6;
  Aggregation47: MisP_Ub4 + MisP_Ub7 => AggP; k72*MisP_Ub4*MisP_Ub7;
  Aggregation48: MisP_Ub4 + MisP_Ub8 => AggP; k72*MisP_Ub4*MisP_Ub8;
  Aggregation49: MisP_Ub5 + MisP_Ub6 => AggP; k72*MisP_Ub5*MisP_Ub6;
  Aggregation50: MisP_Ub5 + MisP_Ub7 => AggP; k72*MisP_Ub5*MisP_Ub7;
  Aggregation51: MisP_Ub5 + MisP_Ub8 => AggP; k72*MisP_Ub5*MisP_Ub8;
  Aggregation52: MisP_Ub6 + MisP_Ub7 => AggP; k72*MisP_Ub6*MisP_Ub7;
  Aggregation53: MisP_Ub6 + MisP_Ub8 => AggP; k72*MisP_Ub6*MisP_Ub8;
  Aggregation54: MisP_Ub7 + MisP_Ub8 => AggP; k72*MisP_Ub7*MisP_Ub8;
  SequesteringOfAggregates: AggP => SeqAggP; k73*AggP;
  ProteasomeInhibtion: AggP + Proteasome => AggP_Proteasome; k74*AggP*Proteasome;

  // Unit definitions:
  unit substance = item;
end
