// SBML level 2 version 1

model Yang2007_ArachidonicAcid()
  // This model is according to the paper Dynamic Simulation on the Arachidonic Acid Metabolic Network. Figure 2A has been reproduced by SBML ode solver on line. In the original model, all the reactions are presented as ODE directly. So curator rewrite each reaction according to the semantics of the paper. In this paper, the authors used quict complex kinetics law to describe the catalysis in the network, curators did not necessarily know all the complete meanings of the paper.
  // This model originates from BioModels Database: A Database of Annotated Published Models. It is copyright (c) 2005-2007 The BioModels Team.
  // For more information see the terms of use.

  // Compartments:
  compartment cell = 1;

  // Species:
  species AA in cell = 0.001;
  species _5_HPETE in cell = 0.001; _5_HPETE is "5-HPETE";
  species _5_HETE in cell = 0.001; _5_HETE is "5-HETE";
  species LTA4 in cell = 0.001;
  species LTB4 in cell = 0.001;
  species w_LTB4 in cell = 0.001; w_LTB4 is "w-LTB4";
  species PLA2 in cell = 1.5;
  species _15_LOX in cell = 1.5; _15_LOX is "15-LOX";
  species _12_LOX in cell = 0.5; _12_LOX is "12-LOX";
  species COX_2 in cell = 0.2; COX_2 is "COX-2";
  species PGES in cell = 0.5;
  species _15_HPETE in cell = 0.001; _15_HPETE is "15-HPETE";
  species TXAS in cell = 0.5;
  species _5_LOX in cell = 5; _5_LOX is "5-LOX";
  species LTA4H in cell = 0.76;
  species CYP4F3 in cell = 0.07;
  species PHGPx in cell = 0.8;
  species exo_AA in cell = 0; exo_AA is "exo-AA";
  species _15_HETE in cell = 0.001; _15_HETE is "15-HETE";
  species _12_HPETE in cell = 0.001; _12_HPETE is "12-HPETE";
  species _12_HETE in cell = 0.001; _12_HETE is "12-HETE";
  species PGH2 in cell = 0.001;
  species PGE2 in cell = 0.001;
  species TXA2 in cell = 0.001;
  species TXB2 in cell = 0.001;

  // Parameters:
  lin = 12;
  // upper case K
  K15 = 3600; K15 is "Kcat(PLA2)";
  // lower case k
  k15 = 2600; k15 is "Km(PLA2)";
  K16 = 1000; K16 is "Kcat(15-LOX)";
  k16 = 70; k16 is "Km(15-LOX)";
  K17 = 1000; K17 is "Kcat(12-LOX)";
  k17 = 50; k17 is "Km(12-LOX)";
  K18 = 1000; K18 is "Kcat(COX-2)";
  k18 = 50; k18 is "Km(COX-2)";
  K19 = 3000; K19 is "Kcat(PGES)";
  k19 = 160; k19 is "Km(PGES)";
  K20 = 1599; K20 is "Kcat(TXAS)";
  k20 = 4; k20 is "Km(TXAS)";
  K21 = 5000; K21 is "Kcat(5-LOX)";
  k21 = 5; k21 is "Km(5-LOX)";
  K22 = 125; K22 is "Kcat(LTA4H)";
  k22 = 20; k22 is "Km(LTA4H)";
  K23 = 150; K23 is "Kcat(CYP4F3)";
  k23 = 3.9; k23 is "Km(CYP4F3)";
  K24 = 500; K24 is "Kcat(PHGPx)";
  k24 = 70; k24 is "Km(PHGPx)";
  kd2 = 0.05;
  kd3 = 0.01;
  kd8 = 0.1;
  kd9 = 0.001;
  kd11 = 0.001;
  kd12 = 0.07;
  kd13 = 0.01;
  kd16 = 0.01;
  ki1 = 0.3;
  ki2 = 30;
  ki3 = 30;
  ki4 = 0.6;
  ki5 = 0.1;
  ki6 = 0.01;
  ki7 = 30;
  ki8 = 4;
  ki9 = 0.175;
  ki10 = 0.01;
  ki11 = 15;
  ki12 = 6.3;
  ki14 = 0.2;
  ki15 = 0.86;
  ki16 = 10;
  ki17 = 10;
  ki18 = 10;
  KI19 = 500;
  KI20 = 200;
  KI21 = 500;
  KI22 = 500;
  KI23 = 0.053;
  KI24 = 2.3e-5;
  a24 = 0.15;
  ks = 500;

  // Reactions:
  AA_production: => AA; cell*K15*PLA2*lin*(1 + _12_HPETE/KI19 + _15_HPETE/KI20 + LTB4/KI21 + _5_HETE/KI22)/(lin + k15*(1 + AA/ks));  // modifiers: _5_HETE, LTB4, PLA2, _15_HPETE, _12_HPETE
  _15_HPETE_production: AA -> _15_HPETE; cell*K16*_15_LOX*AA/(AA + k16*(1 + _15_HPETE/ks)); _15_HPETE_production is "15-HPETE production";  // modifiers: _15_LOX
  _15_HETE_production: _15_HPETE -> _15_HETE; cell*K24*PHGPx*_15_HPETE/(_15_HPETE + k24*(1 + _15_HETE/ks)); _15_HETE_production is "15-HETE production";  // modifiers: PHGPx
  _12_HPETE_production: AA -> _12_HPETE; cell*K17*_12_LOX*AA/(AA + k17*(1 + _12_HPETE/ki18 + _15_HETE/ki16 + _12_HPETE/ks)); _12_HPETE_production is "12-HPETE production";  // modifiers: _12_LOX, _15_HETE
  _12_HETE_production: _12_HPETE -> _12_HETE; cell*K24*PHGPx*_12_HPETE/(_12_HPETE + k24*(1 + _12_HETE/ks)); _12_HETE_production is "12-HETE production";  // modifiers: PHGPx
  PGH2_production: AA -> PGH2; cell*K18*COX_2*AA/(AA + k18*(1 + PGE2/ki3 + PGH2/ks));  // modifiers: COX_2, PGE2
  PGE2_production: PGH2 -> PGE2; cell*K19*PGES*PGH2/(PGH2 + k19*(1 + AA/ki1 + _15_HETE/ki2 + PGE2/ks));  // modifiers: AA, PGES, _15_HETE
  TXA2_production: PGH2 -> TXA2; cell*K20*TXAS*PGH2/(PGH2 + k20*(1 + TXA2/ks));  // modifiers: TXAS
  TXB2_production: => TXB2; kd8*TXA2*cell;  // modifiers: TXA2
  _5_HPETE_production: AA -> _5_HPETE; cell*K21*_5_LOX*AA/(AA + k21*(1 + _12_HETE/ki7 + _15_HETE/ki8 + PGE2/ki11 + _5_HETE/ki12 + _5_HPETE/ks)); _5_HPETE_production is "5-HPETE production";  // modifiers: _5_HETE, _15_HETE, _12_HETE, PGE2, _5_LOX
  _5_HETE_production: _5_HPETE -> _5_HETE; cell*K24*PHGPx*_5_HPETE/(_5_HPETE + k24*(1 + _5_HETE/ks)); _5_HETE_production is "5-HETE production";  // modifiers: PHGPx
  LTA4_production: _5_HPETE -> LTA4; cell*K21*_5_LOX*_5_HPETE/(_5_HPETE + k21*(1 + _12_HETE/ki7 + _15_HETE/ki8 + PGE2/ki11 + _5_HETE/ki12 + LTA4/ks));  // modifiers: _5_HETE, _5_LOX, _15_HETE, _12_HETE, PGE2
  LTB4_production: LTA4 -> LTB4; cell*K22*LTA4H*LTA4/(LTA4 + k22*(1 + LTB4/ks));  // modifiers: LTA4H
  _20_OH_LTB4_production: LTB4 -> w_LTB4; cell*K23*CYP4F3*LTB4/(LTB4 + k23*(1 + _12_HETE/ki14 + _5_HETE/ki15 + w_LTB4/ks)); _20_OH_LTB4_production is "20-OH-LTB4 production";  // modifiers: _5_HETE, CYP4F3, _12_HETE
  _15_LOX_upregulation: => _15_LOX; cell*a24*PGE2*PGE2/(PGE2*PGE2 + KI24*KI24); _15_LOX_upregulation is "15-LOX upregulation";  // modifiers: PGE2
  _12_LOX_inhibition: _12_LOX => ; cell*ki17*_15_HPETE*_12_LOX; _12_LOX_inhibition is "12-LOX inhibition";  // modifiers: _15_HPETE
  TXAS_inhibition: TXAS => ; ki4*_15_HPETE*TXAS*cell;  // modifiers: _15_HPETE
  _5_LOX_upregulation: => _5_LOX; cell*KI23*LTB4*_5_LOX; _5_LOX_upregulation is "5-LOX upregulation";  // modifiers: LTB4
  LTA4H_inhibition: LTA4H => ; cell*K22*LTA4H*LTA4/((LTA4 + k22)*129);  // modifiers: LTA4
  TXB2_decay: TXB2 => ; kd9*TXB2*cell;
  TXAS_inhibition_by_PGH2: TXAS => ; cell*ki5*PGH2*TXAS;  // modifiers: PGH2
  TAX2_decay: TXA2 => ; cell*kd8*TXA2;
  LTB4_decay: LTB4 => ; cell*kd13*LTB4;
  LTA4_decay: LTA4 => ; cell*LTA4*kd12;
  _15_HETE_decay: _15_HETE => ; kd3*_15_HETE*cell; _15_HETE_decay is "15-HETE decay";
  _15_HPETE_decay: _15_HPETE => ; kd2*cell*_15_HPETE; _15_HPETE_decay is "15-HPETE decay";
  _15_LOX_decay: _15_LOX => ; cell*kd16*_15_LOX; _15_LOX_decay is "15-LOX decay";
  _5_HETE_decay: _5_HETE => ; kd11*_5_HETE*cell; _5_HETE_decay is "5-HETE decay";
  _5_LOX_inhibition_by_x12: _5_LOX => ; cell*ki9*LTA4*_5_LOX; _5_LOX_inhibition_by_x12 is "5-LOX inhibition by x12";  // modifiers: LTA4
  _5_LOX_inhibition_by_x10: _5_LOX => ; cell*ki10*_5_HPETE*_5_LOX; _5_LOX_inhibition_by_x10 is "5-LOX inhibition by x10";  // modifiers: _5_HPETE
  _5_LOX_inhibition_by_x2: _5_LOX => ; cell*ki6*_5_LOX*_15_HPETE; _5_LOX_inhibition_by_x2 is "5-LOX inhibition by x2";  // modifiers: _15_HPETE
  AA_decay: AA => ; 0.1*AA*cell;

  // Unit definitions:
  unit substance = 1e-6 mole; substance is "micromole";
  unit time = 60 second; time is "minute";
end
