// SBML level 2 version 1

model Novak1993_M_phase_control()
  // The model reproduces the time profile of active MPF at cyclin concentration of 100nM as depicted in Fig 4A of the paper. Please note that active MPF and cyclin concentrations in the paper are given relative to total cdc2 concentration (100nM). Active MPF (dimer_p) is the cyclin-cdc2 complex that is phosphorylated at Thr161. The model was successfully tested on MathSBML and Jarnac.
  // This model originates from BioModels Database: A Database of Annotated Published Models. It is copyright (c) 2005-2007 The BioModels Team.
  // For more information see the terms of use.

  // Compartments:
  compartment cytoplasm = 1;

  // Species:
  species cyclin in cytoplasm = 100;
  species dimer in cytoplasm = 0; dimer is "cyclin-cdc2 dimer";
  species dimer_p in cytoplasm = 0; dimer_p is "Thr161 phosphorylated dimer(active MPF)";
  species p_dimer in cytoplasm = 0; p_dimer is "Tyr15 phosphorylated dimer";
  species p_dimer_p in cytoplasm = 0; p_dimer_p is "Thr161-Tyr15 phosphorylated dimer";
  species cdc25_p in cytoplasm = 0; cdc25_p is "phosphorylated cdc25";
  species wee1_p in cytoplasm = 0; wee1_p is "phosphorylated wee1";
  species IE_p in cytoplasm = 0; IE_p is "phosphorylated intermediary enzyme";
  species UbE_star in cytoplasm = 0; UbE_star is "ubiquitin conjugating enzyme";
  species cdc2 in cytoplasm;
  species cdc25 in cytoplasm;
  species wee1 in cytoplasm;
  species IE in cytoplasm; IE is "intermediary enzyme";
  species UbE in cytoplasm; UbE is "ubiquitin conjugating enzyme";

  // Parameters:
  total_cdc2 = 100 nM;
  total_cdc25 = 1 nM;
  total_wee1 = 1 nM;
  total_IE = 1 nM;
  total_UbE = 1 nM;
  k25 has min_inv;
  V25_prime = 0.1 nM_inv_min_inv;
  V25_double_prime = 2 nM_inv_min_inv;
  kwee has min_inv;
  Vwee_prime = 0.1 nM_inv_min_inv;
  Vwee_double_prime = 1 nM_inv_min_inv;
  k2 has min_inv;
  V2_prime = 0 nM_inv_min_inv;
  V2_double_prime = 0 nM_inv_min_inv;
  k1AA = 0 nM_per_min;
  k3 = 0.01 nM_inv_min_inv;
  kinh = 0.025 min_inv;
  kcak = 0.25 min_inv;
  ka = 0.01 min_inv;
  K_a = 0.1 nM;
  kbPPase = 0.125 nM_per_min;
  K_b = 0.1 nM;
  ke = 0.0133 min_inv;
  K_e = 0.3 nM;
  kfPPase = 0.1 nM_per_min;
  K_f = 0.3 nM;
  kg = 0.0065 min_inv;
  K_g = 0.01 nM;
  khPPAse = 0.087 nM_per_min;
  K_h = 0.01 nM;
  kc = 0.1 min_inv;
  K_c = 0.01 nM;
  kd_anti_IE = 0.095 nM_per_min;
  K_d = 0.01 nM;

  // Assignment rules:
  cdc2 := total_cdc2 - (dimer + p_dimer + p_dimer_p + dimer_p);
  cdc25 := total_cdc25 - cdc25_p;
  wee1 := total_wee1 - wee1_p;
  IE := total_IE - IE_p;
  UbE := total_UbE - UbE_star;
  k25 := V25_prime*(total_cdc25 - cdc25_p) + V25_double_prime*cdc25_p;
  kwee := Vwee_prime*wee1_p + Vwee_double_prime*(total_wee1 - wee1_p);
  k2 := V2_prime*(total_UbE - UbE_star) + V2_double_prime*UbE_star;

  // Reactions:
  cyclin_synthesis: => cyclin; k1AA;
  R2: cyclin => ; k2*cyclin; R2 is "cyclin degradation";
  cyclin_cdc2_dimer_formation: cyclin => dimer; k3*cyclin*cdc2; cyclin_cdc2_dimer_formation is "cyclin-cdc2 dimer formation";  // modifiers: cdc2
  R4: dimer_p => dimer; kinh*dimer_p; R4 is "Thr161 dephosphorylation";
  R5: dimer => p_dimer; kwee*dimer; R5 is "Tyr15 phosphorylation";
  R6: dimer => dimer_p; kcak*dimer; R6 is "Thr161 phosphorylation";
  R7: dimer => ; k2*dimer; R7 is "cyclin degradation";
  R8: p_dimer => dimer; k25*p_dimer; R8 is "Tyr15 dephosphorylation";
  R9: p_dimer => p_dimer_p; kcak*p_dimer; R9 is "Thr161 phosphorylation";
  R10: p_dimer => ; k2*p_dimer; R10 is "cyclin degradation";
  R11: p_dimer_p => p_dimer; kinh*p_dimer_p; R11 is "Thr161 dephosphorylation";
  R12: dimer_p => p_dimer_p; kwee*dimer_p; R12 is "Tyr15 phosphorylation";
  R13: p_dimer_p => dimer_p; k25*p_dimer_p; R13 is "Tyr15 dephosphorylation";
  R14: p_dimer_p => ; k2*p_dimer_p; R14 is "cyclin degradation";
  R15: dimer_p => ; k2*dimer_p; R15 is "cyclin degradation";
  cdc25_activation: => cdc25_p; ka*dimer_p*(total_cdc25 - cdc25_p)/(K_a + total_cdc25 - cdc25_p);  // modifiers: dimer_p
  cdc25_deactivation: cdc25_p => ; kbPPase*cdc25_p/(K_b + cdc25_p);
  wee1_deactivation: => wee1_p; ke*dimer_p*(total_wee1 - wee1_p)/(K_e + total_wee1 - wee1_p);  // modifiers: dimer_p
  wee1_activation: wee1_p => ; kfPPase*wee1_p/(K_f + wee1_p);
  intermediary_enzyme_activation: => IE_p; kg*dimer_p*(total_IE - IE_p)/(K_g + total_IE - IE_p);  // modifiers: dimer_p
  intermediary_enzyme_deactivation: IE_p => ; khPPAse*IE_p/(K_h + IE_p);
  R23: => UbE_star; kc*IE_p*(total_UbE - UbE_star)/(K_c + total_UbE - UbE_star); R23 is "ubiquitin conjugating enzyme activation";  // modifiers: IE_p
  R24: UbE_star => ; kd_anti_IE*UbE_star/(K_d + UbE_star); R24 is "ubiquitin conjugating enzyme deactivation";

  // Unit definitions:
  unit substance = 1e-9 mole; substance is "nano mole";
  unit nM = 1e-9 mole / litre;
  unit time = 60 second; time is "minutes";
  unit min_inv = 1 / (60 second);
  unit nM_inv_min_inv = litre / (1e-9 mole * 60 second);
  unit nM_per_min = 1e-9 mole / (litre * 60 second);
end
