// SBML level 2 version 1

model model_0000001()
  // Qu2003_CellCycle
  // This model is according to the paper Dynamics of the Cell Cycle : Checkpoints, Sizers, and Timers. Figure6B has been reproduced by both SBMLodeSolver online and MathSBML. We do not include the synthesis of cyclins is proportional to cell size (Equation 2 in Page3604 of the paper) in this model. The author of the paper keep all the variables and parameters dimensionless. But in the model, we choose to use default units of SBML.
  // This model originates from BioModels Database: A Database of Annotated Published Models. It is copyright (c) 2005-2007 The BioModels Team.
  // For more information see the terms of use.

  // Compartments:
  compartment cell = 1;

  // Species:
  species Inactive_Cyclin_CDK_complex in cell = 0.1; Inactive_Cyclin_CDK_complex is "Inactive Cyclin:CDK complex";
  species x in cell = 0.1; x is "Active Cyclin:CDK complex";
  species Total_CDK in cell = 200;
  species c in cell; c is "Free CDK";
  species z0 in cell = 0; z0 is "Unphosphorylated CDC25";
  species z1 in cell = 0; z1 is "One-site phosphorylated CDC25";
  species z2 in cell = 0; z2 is "Two-site phosphorylated CDC25";
  species w0 in cell = 0; w0 is "Unphosphorylated wee1";
  species w1 in cell = 0; w1 is "phosphorylated wee1";
  species u in cell = 0; u is "Active SKP2 or APC";
  species i in cell = 0; i is "Free CKI";
  species ix in cell = 0; ix is "Cyclin:CDK:CKI complex with CKI unphosphorylated";
  species ixp in cell = 0; ixp is "Cyclin:CDK:CKI complex with CKI phosphorylated";
  species y in cell = 0; y is "Free cyclin";
  species totalCyclin in cell;

  // Parameters:
  k1 = 300;
  k2 = 5;
  k3 = 30;
  k4 = 30;
  k5 = 0.1;
  k6 = 1;
  k7 = 10;
  k8 = 100;
  k9 = 1;
  k10 = 10;
  k11 = 1;
  k12 = 0;
  k13 = 1;
  k14 = 1;
  k15 = 1;
  k16 = 2;
  k2u = 50;
  k7u = 0;
  k16u = 25;
  a = 4;
  az = 10;
  aw = 10;
  ai = 10;
  bz = 0.1;
  bw = 0.1;
  bi = 0.1;
  cz = 1;
  cw = 1;
  ci = 1;
  Tau = 25;

  // Assignment rules:
  // Free CDK ( normalized with c0 )c=(c0-x-x1-ix-ixp)/c0.
  c := (Total_CDK - x - Inactive_Cyclin_CDK_complex - ix - ixp)/Total_CDK;
  // Total cyclin (x+x1+y)
  totalCyclin := x + Inactive_Cyclin_CDK_complex + y;

  // Reactions:
  Free_cyclin_synthesis: => y; k1*cell;
  Cyclin_binding_with_CDK: y -> Inactive_Cyclin_CDK_complex; cell*(k3*c*y - Inactive_Cyclin_CDK_complex*k4);  // modifiers: c
  Cyclin_degradation: y => ; cell*(k2 + k2u*u)*y;  // modifiers: u
  z0_phosphorylation: z0 -> z1; cell*((bz + cz*x)*z0 - z1*az);  // modifiers: x
  x_phosphorylation: x -> Inactive_Cyclin_CDK_complex; cell*((k6 + w0)*x - (k5 + z2)*Inactive_Cyclin_CDK_complex);  // modifiers: z2, w0
  z1_phosphorylation: z1 -> z2; cell*((bz + cz*x)*z1 - az*z2);  // modifiers: x
  unphosphorylated_wee1_synthesis: => w0; k10*cell;
  wee1_phosphorylation: w0 -> w1; cell*((bw + cw*x)*w0 - aw*w1);  // modifiers: x
  SKP2_synthesis: => u; cell*x^2/(a^2 + x^2)/Tau;  // modifiers: x
  CKI_synthesis: => i; k12*cell;
  reaction_0000011: i + x -> ix; (k14*x*i - k15*ix)*cell; reaction_0000011 is "CKI binding to Active Cyclin:CDK complex";
  ix_phosphorylation: ix -> ixp; cell*((bi + ci*x)*ix - ai*ixp);  // modifiers: x
  SKP2_degradation: u => ; cell*u/Tau;
  CKI_degradation: i => ; cell*k13*i;
  Cyclin_CDK_CKIp_degradation: ixp => x; cell*k16*k16u*ixp; Cyclin_CDK_CKIp_degradation is "Cyclin:CDK:CKIp degradation";
  reaction_0000017: w0 => ; cell*w0*k11; reaction_0000017 is "unphosphorylated wee1 degradation";
  phosphorylated_wee1_degradation: w1 => ; cell*k11*w1;
  reaction_0000019: z0 => ; cell*k9*z0; reaction_0000019 is "Unphosphorylated CDC25 degradation";
  reaction_0000020: z1 => ; cell*k9*z1; reaction_0000020 is "One site phosphorylated CDC25 degradaton";
  reaction_0000021: z2 -> ; cell*k9*z2; reaction_0000021 is "Two site phosphorylated CDC25 degradation";
  reaction_0000022: => z0; cell*k8; reaction_0000022 is "Unphosphorylation CDC25 synthesis";
  reaction_0000023: x => ; cell*(k7 + k7u*u)*x; reaction_0000023 is "Active cyclin:CDK complex degradation";  // modifiers: u
end
