// SBML level 2 version 1

model Clarke2006_Smad_signalling()
  // The model reproduces the temporal evolution of four variables depicted in Fig 2a. The solution is generated for median parameter values as given in Table 3. Result shown was generated by MathSBML.
  // This model originates from BioModels Database: A Database of Annotated Published Models. It is copyright (c) 2005-2007 The BioModels Team.
  // For more information see the terms of use.

  // Compartments:
  compartment cytoplasm = 1;
  compartment nucleus in cytoplasm = 1;

  // Species:
  substanceOnly species receptor in cytoplasm = 10000; receptor is "receptors";
  substanceOnly species R_smad_cyt in cytoplasm = 162000; R_smad_cyt is "R-Smad_cyt";
  substanceOnly species R_smad_P_cyt in cytoplasm = 0; R_smad_P_cyt is "R-Smad-P_cyt";
  substanceOnly species smad4_cyt in cytoplasm = 120000; smad4_cyt is "Smad4_cyt";
  substanceOnly species R_smad_P_smad4_cyt in cytoplasm = 0; R_smad_P_smad4_cyt is "R-Smad-P-Smad4_cyt";
  substanceOnly species R_smad_P_smad4_nuc in nucleus = 0; R_smad_P_smad4_nuc is "R-Smad-P-Smad4_nuc";
  substanceOnly species R_smad_nuc in nucleus = 18000; R_smad_nuc is "R-Smad_nuc";
  substanceOnly species R_smad_P_nuc in nucleus = 0; R_smad_P_nuc is "R-Smad-P_nuc";
  substanceOnly species smad4_nuc in nucleus = 30000; smad4_nuc is "Smad4_nuc";
  substanceOnly species Pi in nucleus = 0;

  // Parameters:
  var sum_smad4_cyt; sum_smad4_cyt is "sum_Smad4_cyt";
  var sum_smad4_nuc; sum_smad4_nuc is "sum_Smad4_nuc";

  // Assignment rules:
  sum_R_smad_nuc := R_smad_nuc + R_smad_P_nuc + R_smad_P_smad4_nuc;
  sum_smad4_nuc := smad4_nuc + R_smad_P_smad4_nuc;
  sum_R_smad_cyt := R_smad_cyt + R_smad_P_cyt + R_smad_P_smad4_cyt;
  sum_smad4_cyt := smad4_cyt + R_smad_P_smad4_cyt;

  // Reactions:
  Phosphorylation: R_smad_cyt => R_smad_P_cyt; KCAT*receptor*R_smad_cyt/(K1 + R_smad_cyt);  // modifiers: receptor
    KCAT = 3.51 min_inv; K1 = 289000 substance;
  R_Smad_translocation: R_smad_nuc -> R_smad_cyt; k5nc*R_smad_nuc - k5cn*R_smad_cyt; R_Smad_translocation is "R-Smad translocation";
    k5nc = 5.63 min_inv; k5cn = 0.563 min_inv;
  Smad4_translocation: smad4_nuc -> smad4_cyt; k4nc*smad4_nuc - k4cn*smad4_cyt;
    k4nc = 0.783 min_inv; k4cn = 0.00497 min_inv;
  Complex_formation: R_smad_P_cyt + smad4_cyt -> R_smad_P_smad4_cyt; k2a*R_smad_P_cyt*smad4_cyt - k2d*R_smad_P_smad4_cyt;
    k2a = 6.5e-5 substance; k2d = 0.0399 min_inv;
  Complex_translocation: R_smad_P_smad4_cyt => R_smad_P_smad4_nuc; k3*R_smad_P_smad4_cyt;
    k3 = 16.6 min_inv;
  Complex_in_nucleus: R_smad_P_smad4_nuc -> smad4_nuc + R_smad_P_nuc; k6d*R_smad_P_smad4_nuc - k6a*smad4_nuc*R_smad_P_nuc;
    k6d = 0.0492 min_inv; k6a = 0.000144 substance;
  Dephosphorylation: R_smad_P_nuc => R_smad_nuc + Pi; Vmax7*R_smad_P_nuc/(K7 + R_smad_P_nuc);
    Vmax7 = 17100 substance; K7 = 8950 substance;
  Receptor_degradation: receptor => ; 100*exp(-time/90);

  // Unit definitions:
  unit time = 60 second; time is "minutes";
  unit substance = item;
  unit min_inv = 1 / (60 second);
end
