// SBML level 2 version 1

model Dupont1992_Ca_dpt_protein_phospho()
  // Model reproduces Fig 4 of the paper. For fraction of phosphorylated protein, W_star, the model reproduces panel b in the same figure. Model successfully tested on MathSBML and Jarnac.
  // This model originates from BioModels Database: A Database of Annotated Published Models. It is copyright (c) 2005-2007 The BioModels Team.
  // For more information see the terms of use.

  // Compartments:
  compartment cytosol = 1;
  compartment store in cytosol = 1;

  // Species:
  species Z in cytosol = 0.15;
  species Y in store = 1.6;
  species Wt in cytosol = 1; Wt is "Total Protein";
  species W_star in cytosol; W_star is "Phosphorylated protein";

  // Parameters:
  v0 = 1;
  Vm2 = 65;
  n = 2;
  Kp = 1;
  Vm3 = 500;
  m = 2;
  Kr = 2;
  K_A = 0.9;
  kf = 1;
  k = 10;
  p = 4;
  vMK = 20;
  vp = 2.5;
  Ka = 2.5;
  q = 1;
  K1 = 0.01;
  K2 = 0.01;
  v1_beta = 2.7;

  // Assignment rules:
  vk := vMK*Z^q/(Ka^q + Z^q);

  // Reactions:
  Calcium_influx: => Z; cytosol*v0;
  InsP3_dependent_Ca_influx: => Z; cytosol*v1_beta;
  R2: Z => Y; cytosol*(Vm2*Z^n/(Kp^n + Z^n)); R2 is "ATP driven pumping of Ca into store";
  ATP_driven_pumping_into_cytosol: Y => Z; store*(Vm3*Y^m*Z^p/((Kr^m + Y^m)*(K_A^p + Z^p)));
  Rf: Y => Z; store*kf*Y; Rf is "Calcium leak";
  R_eff: Z => ; cytosol*k*Z; R_eff is "Ca efflux";
  Protein_Phosphorylation: -> W_star; cytosol*(vp/Wt)*(vk/vp*((1 - W_star)/(K1 + 1 - W_star)) - W_star/(K2 + W_star));  // modifiers: Wt

  // Unit definitions:
  unit substance = 1e-6 mole; substance is "micromole";
  unit time = 60 second; time is "minutes";
end
