// SBML level 2 version 1

model model_0000001()
  // Somogyi1990_CaOscillations
  // This model encoded according to the paper Hormone induced Calcium Oscillations in Liver Cells Can Be Explained by a Simple One Pool Model.The values of parameters a and alpha are varioused inorder to simulate results in different situations. For Figure 3A, a=3.5,alpha=1.2 ; Figure 3B, a=3,alpha=5 ; Figure 3C a= 0.95, alpha=1.5; Figure3D, a=1, alpha=5. Keep in mind that the value for the xy axies are arbitrary value. Figures3 in the paper are reproduced by COPASI 4.0.20(development) , and SBMLodeSolver online.
  // This model originates from BioModels Database: A Database of Annotated Published Models. It is copyright (c) 2005-2007 The BioModels Team.
  // For more information see the terms of use.

  // Compartments:
  compartment cytoplasm = 1;
  compartment ER = 1; ER is "endoplasmic reticulum";
  compartment extracellular = 1;

  // Species:
  species x in ER = 1; x is "Ca_ER";
  species y in cytoplasm = 1; y is "Ca_Cyt";

  // Parameters:
  k = 0.01;
  // Value of alpha is changed for different figures.
  alpha = 5;
  n = 4;
  // Value of a is changed for different figures.
  a = 3;
  k1 = 2;
  beta = 1;
  gamma = 1;

  // Assignment rules:
  fy := y^n/(a^n + y^n);

  // Reactions:
  Ca_flux_into_the_cell: => y; gamma*cytoplasm;
  reaction_0000002: x -> y; k*x*cytoplasm - k1*y*ER; reaction_0000002 is "Ca translocation between cytoplasm and ER";
  Ca_pumped_out_of_the_cell: y => ; beta*y*extracellular;
  InsP3_channel: x => y; alpha*fy*x*cytoplasm;
end
