// SBML level 2 version 1

model model_0000001()
  // Somogyi1990_CaOscillations_SingleCaSpike
  // Another model from Hormone induced Calcium Oscillations in Liver Cells Can Be Explained by a Simply One Pool Model. Anatomy of a single Ca2+ spike. Figure4A has been simulated by COPASI4.0.20(development). However, the simulated figure is slightly different from the paper, single spike of Ca2+ is around "6" time arbitrary units instead "9" time arbitrary units displayed in the paper.
  // This model originates from BioModels Database: A Database of Annotated Published Models. It is copyright (c) 2005-2007 The BioModels Team.
  // For more information see the terms of use.

  // Compartments:
  compartment Cytosol = 1;
  compartment ER = 1; ER is "Endoplasmic Reticulum";
  compartment Extracellular = 1;

  // Species:
  species x in ER = 1; x is "Ca_ER";
  species y in Cytosol = 1; y is "Ca_Cyt";

  // Parameters:
  k = 0.01;
  alpha = 10;
  n = 4;
  a = 1.4;
  k1 = 2;
  beta = 1;
  gamma = 1;

  // Assignment rules:
  // InsP3 induced calcium release channel.
  fy := y^n/(a^n + y^n);

  // Reactions:
  Ca_flux_into_the_cell: => y; gamma*Cytosol;
  reaction_0000002: x => y; Cytosol*k*(x - y); reaction_0000002 is "Ca translocation from ER to Cytosol";
  Ca_transport_from_Cytosol_to_ER: y => x; k1*y*ER;
  InsP3_channel: x => y; alpha*fy*(x - y)*Cytosol;
  Ca_pumped_ouside_the_cell: y => ; beta*y*Extracellular;
end
