// SBML level 2 version 1

model Model_0()
  // McClean2007_CrossTalk
  // This model encoded according to the paper Cross-talk and decision making in MAP kinase pathways.Supplementary Figure 2 has been reproduced by COPASI4.0.20 (development) using parameter scan method. You probably need to uncheck "always use initial conditions" in copasi when you simulate for the second run in order to get the figure. S1 scale from 0 to 12. Keep in mind that the y axis is the fractions of excited X3 and Y3, meaning that X3P and Y3P are normalized by total concentration X3T and Y3T.
  // The results from modeling the pathway in Supplementary Figure1a, including both activation and inhibition. According to the paper, the value of ka and kd should in the orange region (ka belongs [0,1], kd belongs [1,10]) so assigned ka=0, kd=1.
  // The author made the simplifying assumption that the interactions between the pathways are symmetric. Thus the k12xy=k12yx=ka, k33xy=k33yx=kd.
  // This model originates from BioModels Database: A Database of Annotated Published Models. It is copyright (c) 2005-2007 The BioModels Team.
  // For more information see the terms of use.

  // Compartments:
  compartment cell = 1;

  // Species:
  // The initial value for each species taken from the original submitted model, they are the concentration of the species when arrived to the steady states.
  species X1p in cell = 1.023667;
  species X2p in cell = 2.154231;
  species X3p in cell = 6.271793;
  species Y1p in cell = 3.203692;
  species Y2p in cell = 8.232192;
  species Y3p in cell = 9.312021;

  // Parameters:
  X1T = 10;
  X2T = 10;
  X3T = 10;
  Y1T = 10;
  Y2T = 10;
  Y3T = 10;
  kx = 1;
  // Use parameter scan value from 0 to 12.
  S1 = 8.5;
  Kmx = 1;
  k12x = 1;
  k23x = 1;
  kd = 1;
  ka = 0;
  Kmyx = 1;
  S2 = 5;
  ky = 1;
  Kmy = 1;
  k12y = 1;
  k23y = 1;
  Kmxy = 1;

  // Reactions:
  X1_activats_X2: X1p => X2p; cell*k12x*X1p*(X2T - X2p);
  S1_activates_X1: => X1p; cell*kx*S1/(1 + S1/Kmx)*(X1T - X1p);
  X2_activates_X3: X2p => X3p; cell*k23x*X2p*(X3T - X3p);
  S2_activates_Y1: => Y1p; cell*ky*S2/(1 + S2/Kmy)*(Y1T - Y1p);
  Y1p_activates_Y2p: Y1p => Y2p; cell*k12y*Y1p*(Y2T - Y2p);
  Y2p_activates_Y3p: Y2p => Y3p; cell*k23y*Y2p*(Y3T - Y3p);
  X1p_activates_Y2p: X1p => Y2p; cell*ka*X1p*(Y2T - Y2p);
  Y1p_activates_X2p: Y1p => X2p; cell*ka*Y1p*(X2T - X2p);
  X3p_inhibited_by_Y3p: X3p => ; cell*kd*Y3p*X3p/(1 + X3p/Kmyx);  // modifiers: Y3p
  Y3p_inhibited_by_X3p: Y3p => ; cell*kd*Y3p*X3p/(1 + Y3p/Kmxy);  // modifiers: X3p
end
