// SBML level 2 version 1

model model_0000001()
  // Dupont1991_CaOscillation
  // This model is according to the paper Signal-induced Ca2+ oscillations: Properties of a model based on Ca2+-induced Ca2+ release.Figure4B in the paper has been reproduced by RoadRunner and MathSBML. Damped Ca2+ oscillations elicited by a transient pulse of InsP3 applied intracellularly to a resting, non-oscillatory cell.
  // This model originates from BioModels Database: A Database of Annotated Published Models. It is copyright (c) 2005-2007 The BioModels Team.
  // For more information see the terms of use.

  // Compartments:
  compartment extracellular = 1;
  compartment Cytosol = 1;
  compartment intracellular_Ca_storepool = 1;

  // Species:
  species z in Cytosol = 0.1; z is "Ca in the cytosol";
  species y in intracellular_Ca_storepool = 1.4; y is "Ca in the InsP3-insensitive pool";

  // Parameters:
  v0 = 1;
  v1 = 7.3;
  VM2 = 65;
  VM3 = 500;
  KR = 2;
  KA = 0.9;
  K2 = 1;
  kf = 1;
  k = 10;
  n = 2;
  m = 2;
  p = 4;
  tstim = 4; tstim is "stimulation time";
  // when flag=0, beta=0, flag=1, beta=beta_f*exp[-0.2*(t-tp)]
  flag = 0;

  // Assignment rules:
  // According to the legend of Figure4B, beta decays from the initial value beta_f=96% according to the equation beta=beta_f*exp[-0.2*(t-tp)]. and tp=4s.
  beta := flag*0.96*exp(-0.2*(time - tstim));

  // Reactions:
  reaction_0000001: => z; v1*beta*Cytosol; reaction_0000001 is "InsP3 modulated release of Ca from the InsP3 sensitive store";
  reaction_0000002: => z; v0*Cytosol; reaction_0000002 is "Constant input of Ca from the extracellular medium";
  Leak_Ca_from_pool_to_cytosol: y => z; kf*y*Cytosol;
  reaction_0000004: z => y; intracellular_Ca_storepool*VM2*z^n/(K2^n + z^n); reaction_0000004 is "Pumping Ca into the InsP3-insensitive store";
  reaction_0000005: y => z; Cytosol*VM3*(y^m/(KR^m + y^m))*(z^p/(KA^p + z^p)); reaction_0000005 is "Release of Ca from the pool into the cytosol";
  reaction_0000006: z => ; k*z*extracellular; reaction_0000006 is "Transport of cytosolic ca into the extracellular medium";

  // Events:
  event_0000001: at (time > tstim): flag = 1;

  // Unit definitions:
  unit substance = 1e-6 mole; substance is "microM";
end
