// SBML level 2 version 1

model Chan2004_TCell_receptor_activation()
  // The model reproduces Fig 3a of the paper. Please note that the authors mention that they used a value of 2 for n, n being the power in the positive feedback function for kinase autocatalysis, however the model here has n=1.95 because this results in a simulation that is identical to Fig 3a. The model was successfully tested on MathSBML.
  // This model originates from BioModels Database: A Database of Annotated Published Models. It is copyright (c) 2005-2007 The BioModels Team.
  // For more information see the terms of use.

  // Compartments:
  compartment compartment = 1; compartment is "cell";

  // Species:
  substanceOnly species lck_inactive in compartment = 0; lck_inactive is "Inactive lck";
  substanceOnly species lck_active in compartment = 0; lck_active is "Active lck";
  substanceOnly species phosphatase_inactive in compartment = 0.6; phosphatase_inactive is "Inactive phosphatase";
  substanceOnly species phosphatase_active in compartment = 0.6; phosphatase_active is "Active phosphatase";
  substanceOnly species lck_total in compartment; lck_total is "Total kinase";

  // Parameters:
  n1 = 1 sec_inv;
  k1 = 0.01 sec_inv;
  m1 = 1 sec_inv;
  d0 = 0.15 sec_inv;
  d1 = 0.15 sec_inv;
  k2 = 0.01 sec_inv;
  m2 = 1 sec_inv;
  n2 = 0.02 sec_inv;
  d2 = 0 sec_inv;
  n = 1.95 dimensionless;
  r_l = 0 items_per_time;

  // Assignment rules:
  lck_total := lck_inactive + lck_active;

  // Reactions:
  v1: => lck_inactive; r_l; v1 is "Kinase recruitment to T-cell receptor";
  Kinase_inactivation: lck_active => lck_inactive; n1*lck_active*phosphatase_active;  // modifiers: phosphatase_active
  Basal_kinase_activation: lck_inactive => lck_active; k1*lck_inactive;
  Catalytic_kinase_activation: lck_inactive => lck_active; m1*lck_active^n*lck_inactive;
  Inactive_kinase_diffusion: lck_inactive => ; d0*lck_inactive;
  Active_kinase_diffusion: lck_active => ; d1*lck_active;
  Basal_phosphatase_activation: phosphatase_inactive => phosphatase_active; k2*phosphatase_inactive;
  Catalyzed_phosphatase_activation: phosphatase_inactive => phosphatase_active; m2*lck_active*phosphatase_inactive;  // modifiers: lck_active
  Phosphatase_inactivation: phosphatase_active => phosphatase_inactive; n2*phosphatase_active;
  Active_phosphatase_diffusion: phosphatase_active => ; d2*phosphatase_active;

  // Events:
  Setting_r_l_to_1: at (time >= 10): r_l = 1; Setting_r_l_to_1 is "Setting r(l) to 1";
  Resetting_r_l_to_0: at (time >= 24): r_l = 0; Resetting_r_l_to_0 is "Resetting r(l) to 0";

  // Unit definitions:
  unit substance = item;
  unit items_per_time = item / second;
  unit sec_inv = 1 / second;
end
