// SBML level 2 version 1

model Fisher2006_Ca_Oscillation_dpdnt_NFAT_dynamics()
  // The model reproduces the calcium oscillation dependent activation-deactivation kinetics of nuclear factor of activated T cells (NFAT) as depicted in Fig 4a of the paper. A simple algorithm in the events section takes care of the calcium oscillation. The model was successfully tested on MathSBML.
  // This model originates from BioModels Database: A Database of Annotated Published Models. It is copyright (c) 2005-2007 The BioModels Team.
  // For more information see the terms of use.

  // Compartments:
  compartment cytosol = 2.69e-13;
  compartment nucleus in cytosol = 1.13e-13;

  // Species:
  species $Ca_Nuc in nucleus = 1; Ca_Nuc is "Calcium in Nucleus";
  species $Ca_Cyt in cytosol = 1; Ca_Cyt is "Calcium in Cytosol";
  species NFAT_Nuc in nucleus = 0.0005219; NFAT_Nuc is "NFAT_nuc";
  species Act_C_Nuc in nucleus = 5.05e-5; Act_C_Nuc is "Active Calcineurin in Nucleus";
  species NFAT_Pi_Nuc in nucleus = 0.0002272; NFAT_Pi_Nuc is "Phosphorylated NFAT in nucleus";
  species NFAT_Act_C_Nuc in nucleus = 0.0009477; NFAT_Act_C_Nuc is "NFAT Calcineurin complex in nucleus";
  species NFAT_Pi_Act_C_Nuc in nucleus = 2.5e-6; NFAT_Pi_Act_C_Nuc is "Phosphorylated NFAT Calcineurin complex in nucleus";
  species Inact_C_Nuc in nucleus = 0.049198; Inact_C_Nuc is "Inactive Calcineurin in nucleus";
  species NFAT_Cyt in cytosol = 0.0001101;
  species Act_C_Cyt in cytosol = 9.1e-6; Act_C_Cyt is "Active Calcineurin in cytosol";
  species NFAT_Pi_Cyt in cytosol = 0.0094397; NFAT_Pi_Cyt is "Phosphorylated NFAT in cytosol";
  species NFAT_Act_C_Cyt in cytosol = 6.1e-6; NFAT_Act_C_Cyt is "NFAT Calcineurin complex in cytosol";
  species NFAT_Pi_Act_C_Cyt in cytosol = 2.2e-6; NFAT_Pi_Act_C_Cyt is "Phosphorylated NFAT Calcineurin complex in cytosol";
  species Inact_C_Cyt in cytosol = 0.0097108; Inact_C_Cyt is "Inactive Calcineurin in cytosol";

  // Parameters:
  k1 = 2.56e-5;
  k2 = 0.00256;
  k16 = 6.63;
  k15 = 0.00168;
  k18 = 0.00096;
  k17 = 0.0015;
  k6 = 0.00092;
  k5 = 0.0019;
  k14 = 0.00256;
  k13 = 0.5;
  k12 = 0.00168;
  k11 = 6.63;
  k10 = 0.005;
  k9 = 0.5;
  k3 = 0.005;
  k4 = 0.5;
  k7 = 0.005;
  k8 = 0.5;
  k19 = 1;
  k20 = 1;
  k21 = 0.21;
  k22 = 0.5;
  Time_in_Seconds = 100;

  // Reactions:
  R1: NFAT_Pi_Nuc + Act_C_Nuc -> Act_C_Nuc + NFAT_Nuc; nucleus*(k1*NFAT_Pi_Nuc - k2*NFAT_Nuc); R1 is "Calcineurin dpdnt NFAT dephosphorylation";
  R2: Act_C_Nuc + NFAT_Nuc -> NFAT_Act_C_Nuc; nucleus*(k16*NFAT_Nuc*Act_C_Nuc - k15*NFAT_Act_C_Nuc); R2 is "NFAT Calcineurin complex formation";
  NFAT_transport: NFAT_Nuc -> NFAT_Cyt; nucleus*k18*NFAT_Nuc - cytosol*k17*NFAT_Cyt;
  Active_Calcineurin_transport: Act_C_Nuc -> Act_C_Cyt; nucleus*k6*Act_C_Nuc - cytosol*k5*Act_C_Cyt;
  R5: NFAT_Act_C_Nuc -> NFAT_Pi_Act_C_Nuc; nucleus*(k14*NFAT_Act_C_Nuc - k13*NFAT_Pi_Act_C_Nuc); R5 is "NFAT Calcineurin complex phosphorylation";
  R6: NFAT_Pi_Act_C_Nuc -> Act_C_Nuc + NFAT_Pi_Nuc; nucleus*(k12*NFAT_Pi_Act_C_Nuc - k11*NFAT_Pi_Nuc*Act_C_Nuc); R6 is "Phosphorylated NFAT Calcineurin complex disassembly";
  R7: NFAT_Act_C_Nuc -> NFAT_Act_C_Cyt; nucleus*k10*NFAT_Act_C_Nuc - cytosol*k9*NFAT_Act_C_Cyt; R7 is "NFAT Calcineurin complex transport";
  R8: NFAT_Act_C_Cyt -> NFAT_Pi_Act_C_Cyt; cytosol*(k14*NFAT_Act_C_Cyt - k13*NFAT_Pi_Act_C_Cyt); R8 is "NFAT Calcineurin complex phosphorylation";
  R9: NFAT_Pi_Act_C_Cyt -> Act_C_Cyt + NFAT_Pi_Cyt; cytosol*(k12*NFAT_Pi_Act_C_Cyt - k11*NFAT_Pi_Cyt*Act_C_Cyt); R9 is "Phosphorylated NFAT Calcineurin complex disassembly";
  Phosphorylated_NFAT_transport: NFAT_Pi_Cyt -> NFAT_Pi_Nuc; cytosol*k3*NFAT_Pi_Cyt - nucleus*k4*NFAT_Pi_Nuc;
  R11: NFAT_Act_C_Cyt -> Act_C_Cyt + NFAT_Cyt; cytosol*(k15*NFAT_Act_C_Cyt - k16*NFAT_Cyt*Act_C_Cyt); R11 is "NFAT Calcineurin complex disassembly";
  R17: NFAT_Pi_Act_C_Cyt -> NFAT_Pi_Act_C_Nuc; cytosol*k7*NFAT_Pi_Act_C_Cyt - nucleus*k8*NFAT_Pi_Act_C_Nuc; R17 is "Phosphorylated NFAT Calcineurin complex transport";
  R12: NFAT_Pi_Cyt + Act_C_Cyt -> Act_C_Cyt + NFAT_Cyt; cytosol*(k1*NFAT_Pi_Cyt - k2*NFAT_Cyt); R12 is "Calcineurin dpdnt NFAT dephosphorylation";
  R13: 3 $Ca_Cyt + Inact_C_Cyt -> Act_C_Cyt; cytosol*(k19*Inact_C_Cyt*Ca_Cyt^3 - k20*Act_C_Cyt); R13 is "Calcineurin activation";
  R14: 3 $Ca_Nuc + Inact_C_Nuc -> Act_C_Nuc; nucleus*(k19*Inact_C_Nuc*Ca_Nuc^3 - k20*Act_C_Nuc); R14 is "Calcineurin activation";
  Inactive_Calcineurin_transport: Inact_C_Cyt -> Inact_C_Nuc; cytosol*k5*Inact_C_Cyt - nucleus*k6*Inact_C_Nuc;
  Calcium_transport: $Ca_Cyt -> $Ca_Nuc; cytosol*k21*Ca_Cyt - nucleus*k22*Ca_Nuc;

  // Events:
  event_0000001: at ((Time_in_Seconds - time <= 0) && (time < 1500)): Time_in_Seconds = Time_in_Seconds + 100, Ca_Cyt = 1, Ca_Nuc = 1;
  event_0000002: at ((Time_in_Seconds - time <= 90) && (time < 1500)): Ca_Cyt = 0.1, Ca_Nuc = 0.1;
  event_0000003: at (time >= 1500): Ca_Cyt = 0.1, Ca_Nuc = 0.1;

  // Unit definitions:
  unit substance = 1e-6 mole; substance is "micro mole";
end
