// SBML level 2 version 1

model model_0000001()
  // Clancy2002_CardiacSodiumChannel_WT
  // The model is according to the paperNa+ Channel Mutation That Causes Both Brugada and Long-QT Syndrome Phenotypes: A Simulation Study of Mechanism Original model comes from ModelDB with accession number: 62661. This is the wide type model. All the values and reactions obtained from Data Supplement6: Appendix of the paper. Figure3 has been reproduced by MathSBML. The stimulus v=-30mV during the time from 5ms to 20 ms displayed in the event. The meaning for the keyword, C: Close states; O: Open states; IF: Fast inactivation states; IC: Closed-Inactivation states; IM: Intermediat Inactivation states.
  // This model originates from BioModels Database: A Database of Annotated Published Models. It is copyright (c) 2005-2007 The BioModels Team.
  // For more information see the terms of use.

  // Compartments:
  compartment cell = 1;

  // Species:
  species C1 in cell = 0;
  species C2 in cell = 0;
  species C3 in cell = 1;
  species IC3 in cell = 0;
  species IC2 in cell = 0;
  species IM1 in cell = 0;
  species IM2 in cell = 0;
  species O in cell = 0; O is "open states";
  species IF in cell = 0;

  // Parameters:
  nao = 140; nao is "[Na]out";
  nai = 15; nai is "[Na]in";
  scale = 1000;
  v = -80;
  Gna = 23.5;
  Rk = 8314;
  Fara = 96485;
  Temp = 310;
  var Ina; Ina is "I_Na";

  // Assignment rules:
  a11 := 3.802/(0.1027*exp(-v/17) + 0.2*exp(-v/150));
  a12 := 3.802/(0.1027*exp(-v/15) + 0.23*exp(-v/150));
  a13 := 3.802/(0.1027*exp(-v/12) + 0.25*exp(-v/150));
  a2 := 9.178*exp(v/29.68);
  a3 := 3.7933*1e-7*exp(-v/7.7);
  b3 := 0.0084 + 2e-5*v;
  a4 := a2/100;
  b4 := a3;
  a5 := a2/(9.5*10000);
  b5 := a3/50;
  Ena := Rk*Temp/Fara*ln(nao/nai);
  Ina := Gna*(O/(IC3 + IC2 + IF + IM1 + IM2 + C3 + C2 + C1 + O))*(v - Ena)/scale;
  b11 := 0.1917*exp(-v/20.3);
  b12 := 0.2*exp(-(v - 5)/20.3);
  b13 := 0.22*exp(-(v - 10)/20.3);
  b2 := a13*a2*a3/(b13*b3);

  // Reactions:
  IC3_IC2: IC3 -> IC2; cell*(IC3*a11 - IC2*b11); IC3_IC2 is "IC3=IC2";
  IC2_IF: IC2 -> IF; cell*(IC2*a12 - IF*b12); IC2_IF is "IC2=IF";
  IF_IM1: IF -> IM1; cell*(IF*a4 - IM1*b4); IF_IM1 is "IF=IM1";
  IM1_IM2: IM1 -> IM2; cell*(IM1*a5 - IM2*b5); IM1_IM2 is "IM1=IM2";
  C3_IC3: C3 -> IC3; cell*(C3*b3 - IC3*a3); C3_IC3 is "C3=IC3";
  C2_C3: C2 -> C3; cell*(C2*b11 - C3*a11); C2_C3 is "C2=C3";
  C2_IC2: C2 -> IC2; cell*(C2*b3 - IC2*a3); C2_IC2 is "C2=IC2";
  C1_C2: C1 -> C2; cell*(C1*b12 - C2*a12); C1_C2 is "C1=C2";
  C1_IF: C1 -> IF; cell*(C1*b3 - IF*a3); C1_IF is "C1=IF";
  IF_O: IF -> O; cell*(IF*b2 - a2*O); IF_O is "IF=O";
  O_C1: O -> C1; cell*(-C1*a13 + O*b13); O_C1 is "O=C1";

  // Events:
  event_0000001: at ((time >= 5) && (time <= 20)): v = -30;
  event_0000002: at (time > 20): v = -80;

  // Unit definitions:
  unit unitDefinition_0000001 = 1e-3 second; unitDefinition_0000001 is "time(ms)";
  unit unitDefinition_0000002 = 1e-3 volt; unitDefinition_0000002 is "voltage(mV)";
end
