// SBML level 2 version 1

model model_0000001()
  // Izhikevich2003_SpikingNeuron
  // The model is according to the paper Simple Model of Spiking Neurons In this paper, a simple spiking model is presented that is as biologically plausible as the Hodgkin-Huxley model, yet as computationally efficient as the integrate-and-fire model. Known types of neurons correspond to different values of the parameters a,b,c,d in the model. Figure2RS,IB,CH,FS,LTS have been simulated by MathSBML.
  // RS: a=0.02, b=0.2, c=-65, d=8.
  // IB: a=0.02,b=0.2,c=-55,d=4
  // CH: a=0.02,b=0.2,c=-50,d=2
  // FS:a=0.1b=0.2c=-65,d=2
  // LTS:a=0.02,b=0.25,c=-65,d=2
  // This model originates from BioModels Database: A Database of Annotated Published Models. It is copyright (c) 2005-2007 The BioModels Team.
  // For more information see the terms of use.

  // Compartments:
  compartment cell = 1;

  // Parameters:
  a = 0.02;
  b = 0.2;
  c = -65;
  d = 8;
  Vthresh = 30;
  i = 0;
  v = -70;
  U = -14;

  // Rate rules:
  v' = 0.04*v^2 + 5*v + 140 - U + i;
  U' = a*(b*v - U);

  // Events:
  event_0000001: at (v > Vthresh): v = c, U = U + d;
  Stimulus: at (time > 10): i = 10;

  // Unit definitions:
  unit time = 1e-3 second; time is "ms";
  unit mV = 1e-3 volt;
end
