// SBML level 2 version 1

model model_0000001()
  // Izhikevich2004_SpikingNeurons_inhibitionInducedSpiking
  // The model is according to the paperWhich Model to Use for Cortical Spiking Neurons? Figure1(S) inhibition-induced spiking has been reproduced by MathSBML. The ODE and the parameters values are taken from the a paper Simple Model of Spiking NeuronsThe original format of the models are encoded in the MATLAB format existed in the ModelDB with Accession number 39948
  // Figure1 are the simulation results of the same model with different choices of parameters and different stimulus function or events.a=-0.02; b=-1; c=-60; d=8; V=-63.8; u=b*V;
  // This model originates from BioModels Database: A Database of Annotated Published Models. It is copyright (c) 2005-2007 The BioModels Team.
  // For more information see the terms of use.

  // Compartments:
  compartment cell = 1;

  // Parameters:
  a = -0.02;
  b = -1;
  c = -60;
  d = 8;
  Vthresh = 30;
  i = 80;
  v = -63.8;
  u = 63.8;

  // Rate rules:
  v' = 0.04*v^2 + 5*v + 140 - u + i;
  u' = a*(b*v - u);

  // Events:
  event_0000001: at (v > Vthresh): v = c, u = u + d;
  event_0000002: at ((time >= 50) && (time <= 250)): i = 75;
  event_0000003: at (time >= 250): i = 80;
end
