// SBML level 2 version 1

model model_0000001()
  // Izhikevich2004_SpikingNeurons_subthresholdOscillations
  // The model is according to the paperWhich Model to Use for Cortical Spiking Neurons? Figure1(J) subthreshold oscillations has been reproduced by MathSBML. The ODE and the parameters values are taken from the a paper Simple Model of Spiking NeuronsThe original format of the models are encoded in the MATLAB format existed in the ModelDB with Accession number 39948
  // Figure1 are the simulation results of the same model with different choices of parameters and different stimulus function or events.a=0.05; b=0.26; c=-60; d=0; V=-62; u=b*V;
  // This model originates from BioModels Database: A Database of Annotated Published Models. It is copyright (c) 2005-2007 The BioModels Team.
  // For more information see the terms of use.

  // Compartments:
  compartment cell = 1;

  // Parameters:
  a = 0.05;
  b = 0.26;
  c = -60;
  d = 0;
  Vthresh = 30;
  i = 0;
  v = -62;
  u = -16.12;

  // Rate rules:
  u' = a*(b*v - u);
  v' = 0.04*v^2 + 5*v + 140 - u + i;

  // Events:
  event_0000001: at (v > Vthresh): v = c, u = u + d;
  event_0000002: at ((time > 20) && (time < 25)): i = 2;
  event_0000003: at (time >= 25): i = 0;
end
