// SBML level 2 version 1

model Sedaghat2002_InsulinSignalling_noFeedback()
  // Model reproduces the various plots in Figure 6 and 7 of the paper. It was successfully tested on MathSBML.
  // This model originates from BioModels Database: A Database of Annotated Published Models. It is copyright (c) 2005-2007 The BioModels Team.
  // For more information see the terms of use.

  // Compartments:
  compartment CellSurface = 1;
  compartment Intracellular in CellSurface = 1;

  // Species:
  species Insulin in CellSurface = 100000000;
  species Unbound_Insulin_Receptor in CellSurface = 900;
  species x3 in CellSurface = 0; x3 is "Unphosphorylated once bound receptor";
  species x5 in CellSurface = 0; x5 is "Phosphorylated once bound receptor";
  species x4 in CellSurface = 0; x4 is "Phosphorylated twice bound receptor";
  species x6 in Intracellular = 100; x6 is "Unbound unphosphorylated intracellular receptor";
  species x7 in Intracellular = 0; x7 is "Phosphorylated twice bound intracellular receptor";
  species x8 in Intracellular = 0; x8 is "Phosphorylated once bound intracellular receptor";
  species Unphosphorylated_IRS1 in Intracellular = 1000;
  species Phosphorylated_IRS1 in Intracellular = 0;
  species PI3_Kinase in Intracellular = 100;
  species IRS1_PI3_Kinase_Complex in Intracellular = 0; IRS1_PI3_Kinase_Complex is "IRS1- PI3 Kinase Complex";
  species PI3_4_5P3 in Intracellular = 0.31; PI3_4_5P3 is "PI3,4,5P3";
  species PI4_5P2 in Intracellular = 99.4; PI4_5P2 is "PI4,5P2";
  species PI3_4P2 in Intracellular = 0.29; PI3_4P2 is "PI3,4P2";
  species Unactivated_Akt in Intracellular = 100;
  species Activated_Akt in Intracellular = 0;
  species Unactivated_PKC in Intracellular = 100;
  species Activated_PKC in Intracellular = 0;
  species Intracellular_GLUT4 in Intracellular = 96;
  species Cell_surface_GLUT4 in CellSurface = 4;

  // Parameters:
  k1 = 6e-8;
  kminus1 = 0.2;
  k2 = 6e-8;
  kminus2 = 20;
  k3 = 2500;
  kminus3 = 0.2;
  k4 = 0.00033333334;
  kminus4 = 0.003;
  k4prime = 0.0021;
  kminus4prime = 0.00021;
  k5 = 0;
  kminus5 = 1.67e-18;
  k6 = 0.461;
  k7 = 4.16;
  kminus7 = 1.396;
  k8 = 0.000706;
  kminus8 = 10;
  k9_stimulated = 1.39;
  k9_basal = 0.13145;
  kminus9 = 42.15;
  k10 = 2.961;
  kminus10 = 2.77;
  kminus11 = 6.9315;
  kminus12 = 6.9315;
  k13 = 0.00696;
  kminus13 = 0.167;
  k14 = 0.11088;
  kminus14 = 0.001155;
  IRp = 897;
  SHIP = 1;
  PTEN = 1;
  PTP = 1;
  APequil = 9.09091;
  PI3K = 5;

  // Assignment rules:
  k9 := (k9_stimulated + k9_basal)*(IRS1_PI3_Kinase_Complex/PI3K) + k9_basal;
  k11 := 0.1*kminus11*(PI3_4_5P3 - 0.31)/(3.1 - 0.31);
  k12 := 0.1*kminus12*(PI3_4_5P3 - 0.31)/(3.1 - 0.31);
  Effect := (0.2*Activated_Akt + 0.8*Activated_PKC)/APequil;
  k13prime := (40/60 - 4/96)*kminus13*Effect;
  x4x5 := x4 + x5;

  // Reactions:
  Insulin_binding: Unbound_Insulin_Receptor -> x3; CellSurface*(k1*Insulin*Unbound_Insulin_Receptor - kminus1*x3);  // modifiers: Insulin
  Receptor_Autophosphorylation: x3 => x5; CellSurface*k3*x3;
  Insulin_Binding: x5 -> x4; CellSurface*k2*Insulin*x5 - kminus2*x4;  // modifiers: Insulin
  Receptor_dephosphorylation: x5 => Unbound_Insulin_Receptor; CellSurface*kminus3*PTP*x5;
  Receptor_endocytosis: Unbound_Insulin_Receptor -> x6; CellSurface*(k4*Unbound_Insulin_Receptor - kminus4*x6);
  R6: x4 -> x7; CellSurface*(k4prime*x4 - kminus4prime*x7); R6 is "Receptor transport";
  R7: x5 -> x8; CellSurface*(k4prime*x5 - kminus4prime*x8); R7 is "Receptor transport";
  Receptor_synthesis: => x6; Intracellular*k5;
  Receptor_degradation: x6 => ; Intracellular*kminus5*x6;
  R10: x7 => x6; Intracellular*k6*PTP*x7; R10 is "Intracellular receptor dephosphorylation";
  R11: x8 => x6; Intracellular*k6*PTP*x8; R11 is "Intracellular receptor dephosphorylation";
  IRS1_activation: Unphosphorylated_IRS1 -> Phosphorylated_IRS1; Intracellular*(k7*Unphosphorylated_IRS1*(x4 + x5)/IRp - kminus7*PTP*Phosphorylated_IRS1);  // modifiers: x4, x5; fast
  IRS1_PI3K_complex_formation: PI3_Kinase + Phosphorylated_IRS1 -> IRS1_PI3_Kinase_Complex; Intracellular*(k8*Phosphorylated_IRS1*PI3_Kinase - kminus8*IRS1_PI3_Kinase_Complex); IRS1_PI3K_complex_formation is "IRS1-PI3K complex formation";
  PI_3_4_5_P3_generation: PI4_5P2 -> PI3_4_5P3; Intracellular*(k9*PI4_5P2 - kminus9*PTEN*PI3_4_5P3); PI_3_4_5_P3_generation is "PI 3,4,5 P3 generation";
  PI_3_4_5P3_generation: PI3_4P2 -> PI3_4_5P3; Intracellular*(k10*PI3_4P2 - kminus10*SHIP*PI3_4_5P3); PI_3_4_5P3_generation is "PI 3,4,5P3 generation";
  Akt_activation: Unactivated_Akt -> Activated_Akt; Intracellular*(k11*Unactivated_Akt - kminus11*Activated_Akt);
  PKC_activation: Unactivated_PKC -> Activated_PKC; Intracellular*(k12*Unactivated_PKC - kminus12*Activated_PKC);
  GLUT4_synthesis: => Intracellular_GLUT4; Intracellular*k14;
  GLUT4_degradation: Intracellular_GLUT4 => ; Intracellular*kminus14*Intracellular_GLUT4;
  GLUT4_translocation: Intracellular_GLUT4 -> Cell_surface_GLUT4; Intracellular*((k13 + k13prime)*Intracellular_GLUT4 - kminus13*Cell_surface_GLUT4);

  // Events:
  // When time is greater than or equal to 15 minutes Insulin input is set to zero
  event_0000001: at (time >= 15): Insulin = 0;
  // This is the condition to assign values to k5 as given in the appendix
  event_0000002: at (x6 + x7 + x8 > 100): k5 = 1.67e-2;
  event_0000003: at (x6 + x7 + x8 <= 100): k5 = 0.1002;

  // Unit definitions:
  unit substance = 1e-15 mole; substance is "femtomole";
  unit time = 60 second; time is "minute";
end
