// SBML level 2 version 1

model Hoffmann2002_WT_IkBNFkB_Signaling()
  // This model corresponds to the IkB-NFkB signaling in wild type cells and reproduces the dynamics of the species as depicted in Figure 2 F of the paper. The authors mention that the simulation is carried out in three phases, where the steady state values of the species in one phase are fed to the succeding phase. This model captures the simulation dynamics of two phases and makes use of the event section to introduce the stimulus and thereby transition to the next phase. Accordingly, a few terms have been introduced that make this transition possible, this in no way compromises the original model. Also, the simulation plots are not an exact reproduction of the figures in the paper, they do however match the simulation results that the authors shared with us. Model was successfully tested on MathSBML.
  // This model originates from BioModels Database: A Database of Annotated Published Models. It is copyright (c) 2005-2007 The BioModels Team.
  // For more information see the terms of use.

  // Compartments:
  compartment cytoplasm = 1;
  compartment nucleus in cytoplasm = 1;

  // Species:
  species IkBalpha in cytoplasm = 0.1;
  species NFkB in cytoplasm = 0.1;
  species IkBalpha_NFkB in cytoplasm = 0;
  species IkBbeta in cytoplasm = 0;
  species IkBbeta_NFkB in cytoplasm = 0;
  species IkBeps in cytoplasm = 0;
  species IkBeps_NFkB in cytoplasm = 0;
  species IKK_IkBalpha in cytoplasm = 0;
  species IKK_IkBalpha_NFkB in cytoplasm = 0;
  species IKK in cytoplasm = 0;
  species IKK_IkBbeta in cytoplasm = 0;
  species IKK_IkBbeta_NFkB in cytoplasm = 0;
  species IKK_IkBeps in cytoplasm = 0;
  species IKK_IkBeps_NFkB in cytoplasm = 0;
  species NFkB_nuc in nucleus = 0.001;
  species IkBalpha_nuc in nucleus = 0;
  species IkBalpha_nuc_NFkB_nuc in nucleus = 0;
  species IkBbeta_nuc in nucleus = 0;
  species IkBbeta_nuc_NFkB_nuc in nucleus = 0;
  species IkBeps_nuc in nucleus = 0;
  species IkBalpha_transcript in nucleus = 0;
  species IkBbeta_transcript in nucleus = 0;
  species IkBeps_transcript in nucleus = 0;
  species IkBeps_nuc_NFkB_nuc in nucleus = 0;

  // Parameters:
  a4 = 30;
  d4 = 0.03;
  a5 = 30;
  d5 = 0.03;
  a6 = 30;
  d6 = 0.03;
  r4 = 1.224;
  r5 = 0.45;
  r6 = 0.66;
  deg4 = 0.00135;
  k1 = 5.4;
  k01 = 0.0048;
  tr2a = 9.25e-5;
  tr2 = 0.99;
  tr3 = 0.0168;
  tr2b = 1.068e-5;
  tr2e = 7.62e-6;
  a1 = 1.35;
  d1 = 0.075;
  tr1 = 0.2448;
  deg1 = 0.00678;
  tp1 = 0.018;
  tp2 = 0.012;
  a2 = 0.36;
  d2 = 0.105;
  a3 = 0.54;
  d3 = 0.105;
  a7 = 11.1;
  k2 = 0.828;
  a8 = 2.88;
  k2_beta = 0.624;
  a9 = 4.2;
  k2_eps = 0.624;
  r1 = 0.2442;
  r2 = 0.09;
  r3 = 0.132;
  k02 = 0.0072;
  trigger_value = 0;
  fr = 1;
  fr_after_trigger = 0.5;
  flag_for_after_trigger = 0.5;

  // Assignment rules:
  Total_IkBbeta := IkBbeta + IkBbeta_NFkB + IKK_IkBbeta + IKK_IkBbeta_NFkB;
  Total_IkBeps := IkBeps + IkBeps_NFkB + IKK_IkBeps + IKK_IkBeps_NFkB;
  Total_IkBalpha := IkBalpha + IkBalpha_NFkB + IKK_IkBalpha + IKK_IkBalpha_NFkB;
  Total_NFkBn := IkBbeta_nuc_NFkB_nuc + NFkB_nuc;

  // Rate rules:
  fr_after_trigger' = trigger_value*(-0.5/(1 + (time - 2000))^2);

  // Reactions:
  v1: NFkB + IkBalpha -> IkBalpha_NFkB; cytoplasm*(a4*IkBalpha*NFkB - d4*IkBalpha_NFkB); v1 is "NFkB-IkBalpha complex formation";
  v2: NFkB + IkBbeta -> IkBbeta_NFkB; cytoplasm*(a5*IkBbeta*NFkB - d5*IkBbeta_NFkB); v2 is "NFkB-IkBbeta complex formation";
  v3: NFkB + IkBeps -> IkBeps_NFkB; cytoplasm*(a6*IkBeps*NFkB - d6*IkBeps_NFkB); v3 is "NFkB-IkBeps complex formation";
  v4: NFkB + IKK_IkBalpha -> IKK_IkBalpha_NFkB; cytoplasm*(a4*IKK_IkBalpha*NFkB - d4*IKK_IkBalpha_NFkB); v4 is "NFkB-binary IKK IkBalpha complex formation";
  v5: IKK_IkBalpha_NFkB => NFkB + IKK; cytoplasm*r4*IKK_IkBalpha_NFkB; v5 is "IkBalpha degradation";
  v6: NFkB + IKK_IkBbeta -> IKK_IkBbeta_NFkB; cytoplasm*(a5*IKK_IkBbeta*NFkB - d5*IKK_IkBbeta_NFkB); v6 is "NFkB binary IKK IkBbeta complex formation";
  v7: IKK_IkBbeta_NFkB => NFkB + IKK; cytoplasm*r5*IKK_IkBbeta_NFkB; v7 is "IkBbeta degradation";
  v8: NFkB + IKK_IkBeps -> IKK_IkBeps_NFkB; cytoplasm*(a6*IKK_IkBeps*NFkB - d6*IKK_IkBeps_NFkB); v8 is "NFkB binary IKK IkBeps complex formation";
  v9: IKK_IkBeps_NFkB => NFkB + IKK; cytoplasm*r6*IKK_IkBeps_NFkB; v9 is "IkBeps degradation";
  v10: IkBalpha_NFkB => NFkB; cytoplasm*deg4*IkBalpha_NFkB; v10 is "IkBalpha degradation";
  v11: IkBbeta_NFkB => NFkB; cytoplasm*deg4*IkBbeta_NFkB; v11 is "IkBbeta degradation";
  v12: IkBeps_NFkB => NFkB; cytoplasm*deg4*IkBeps_NFkB; v12 is "IkBeps degradation";
  NFkB_translocation: NFkB -> NFkB_nuc; cytoplasm*k1*NFkB - nucleus*k01*NFkB_nuc;
  v14: NFkB_nuc + IkBalpha_nuc -> IkBalpha_nuc_NFkB_nuc; nucleus*(a4*IkBalpha_nuc*NFkB_nuc - d4*IkBalpha_nuc_NFkB_nuc); v14 is "NFkB-IkBalpha complex formation";
  v15: NFkB_nuc + IkBbeta_nuc -> IkBbeta_nuc_NFkB_nuc; nucleus*(a5*IkBbeta_nuc*NFkB_nuc - d5*IkBbeta_nuc_NFkB_nuc); v15 is "NFkB-IkBbeta complex formation";
  v16: NFkB_nuc + IkBeps_nuc -> IkBeps_nuc_NFkB_nuc; nucleus*(a6*IkBeps_nuc*NFkB_nuc - d6*IkBeps_nuc_NFkB_nuc); v16 is "NFkB-IkBeps complex formation";
  IkBalpha_transcription: => IkBalpha_transcript; nucleus*tr2a;
  IkBalpha_inducible_transcription: => IkBalpha_transcript; nucleus*tr2*NFkB_nuc^2;  // modifiers: NFkB_nuc
  IkBalpha_transcript_degradation: IkBalpha_transcript => ; nucleus*tr3*IkBalpha_transcript;
  IkBbeta_transcription: => IkBbeta_transcript; nucleus*tr2b;
  IkBbeta_transcript_degradation: IkBbeta_transcript => ; nucleus*tr3*IkBbeta_transcript;
  IkBeps_transcription: => IkBeps_transcript; nucleus*tr2e;
  IkBeps_transcript_degradation: IkBeps_transcript => ; nucleus*tr3*IkBeps_transcript;
  IKK_IkBalpha_complex_formation: IKK + IkBalpha -> IKK_IkBalpha; cytoplasm*(a1*IkBalpha*IKK - d1*IKK_IkBalpha); IKK_IkBalpha_complex_formation is "IKK-IkBalpha complex formation";
  IkBalpha_synthesis: => IkBalpha; nucleus*tr1*IkBalpha_transcript;  // modifiers: IkBalpha_transcript
  v26: IkBalpha => ; cytoplasm*deg1*IkBalpha; v26 is "IkBalpha degradation";
  IkBalpha_translocation: IkBalpha -> IkBalpha_nuc; cytoplasm*tp1*IkBalpha - nucleus*tp2*IkBalpha_nuc;
  IKK_IkBbeta_complex_formation: IKK + IkBbeta -> IKK_IkBbeta; cytoplasm*(a2*IkBbeta*IKK - d2*IKK_IkBbeta); IKK_IkBbeta_complex_formation is "IKK-IkBbeta complex formation";
  IkBbeta_synthesis: => IkBbeta; nucleus*tr1*IkBbeta_transcript;  // modifiers: IkBbeta_transcript
  v30: IkBbeta => ; cytoplasm*deg1*IkBbeta; v30 is "IkBbeta degradation";
  IkBbeta_translocation: IkBbeta -> IkBbeta_nuc; cytoplasm*0.5*tp1*IkBbeta - nucleus*0.5*tp2*IkBbeta_nuc;
  IKK_IkBeps_complex_formation: IKK + IkBeps -> IKK_IkBeps; cytoplasm*(a3*IkBeps*IKK - d3*IKK_IkBeps); IKK_IkBeps_complex_formation is "IKK-IkBeps complex formation";
  IkBeps_synthesis: => IkBeps; nucleus*tr1*IkBeps_transcript;  // modifiers: IkBeps_transcript
  v34: IkBeps => ; cytoplasm*deg1*IkBeps; v34 is "IkBeps degradation";
  IkBeps_translocation: IkBeps -> IkBeps_nuc; cytoplasm*0.5*tp1*IkBeps - nucleus*0.5*tp2*IkBeps_nuc;
  v36: IKK + IkBalpha_NFkB -> IKK_IkBalpha_NFkB; cytoplasm*(a7*IKK*IkBalpha_NFkB - d1*IKK_IkBalpha_NFkB); v36 is "IKK-binary IkBalpha NFkB complex formation";
  IkBalpha_NFkB_translocation: IkBalpha_nuc_NFkB_nuc => IkBalpha_NFkB; nucleus*k2*IkBalpha_nuc_NFkB_nuc;
  v38: IKK + IkBbeta_NFkB -> IKK_IkBbeta_NFkB; cytoplasm*(a8*IKK*IkBbeta_NFkB - d2*IKK_IkBbeta_NFkB); v38 is "IKK binary IkBbeta NFkB complex formation";
  // The sum of "flag_for_after_signal" and "fr_after_trigger" insures that the value of the fraction of "IkBbeta_nuc_ NFkB_nuc" capable of nuclear export is equal to one before the signal is introduced and then follows the rate rule for "fr_after_trigger" after the signal is introduced.
  IkBbeta_NFkB_translocation: IkBbeta_nuc_NFkB_nuc => IkBbeta_NFkB; nucleus*k2_IkBbeta_nuc_NFkB_nuc*(fr_after_trigger + flag_for_after_trigger)*IkBbeta_nuc_NFkB_nuc;
    k2_IkBbeta_nuc_NFkB_nuc = 0.0069;
  v40: IKK + IkBeps_NFkB -> IKK_IkBeps_NFkB; cytoplasm*(a9*IKK*IkBeps_NFkB - d3*IKK_IkBeps_NFkB); v40 is "IKK binary IkBeps NFkB complex formation";
  IkBeps_NFkB_translocation: IkBeps_nuc_NFkB_nuc => IkBeps_NFkB; nucleus*0.5*k2_eps*IkBeps_nuc_NFkB_nuc;
  v42: IKK_IkBalpha => IKK; cytoplasm*r1*IKK_IkBalpha; v42 is "IkBalpha degradation";
  v43: IKK_IkBbeta => IKK; cytoplasm*r2*IKK_IkBbeta; v43 is "IkBbeta degradation";
  v44: IKK_IkBeps => IKK; cytoplasm*r3*IKK_IkBeps; v44 is "IkBeps degradation";
  IKK_consumption: IKK => ; cytoplasm*k02*IKK;

  // Events:
  // The events section is used to set the IKK signal, the system is allowed to equilibrate for 2000 minutes and IKK is increased to 0.1 uM. trigger value is a parameter that is zero until equilibration and then is set to 1, this in turn is used in the rate rule section for "fr_after_trigger". The latter term corresponds to fr in the paper.
  event_0000001: at ((time >= 2000) && (trigger_value == 0)): IKK = 0.1, trigger_value = 1, flag_for_after_trigger = 0;

  // Unit definitions:
  unit substance = 1e-6 mole; substance is "micro mole";
  unit time = 60 second; time is "minutes";
end
