// SBML level 2 version 1

model model_0000001()
  // Izhikevich2004_SpikingNeurons_Class1Excitable
  // The model is according to the paperWhich Model to Use for Cortical Spiking Neurons? Figure1(G) Class 1 excitable has been reproduced by MathSBML. The ODE and the parameters values are originally taken from the a paper Simple Model of Spiking NeuronsThe original format of the models are encoded in the MATLAB format existed in the ModelDB with Accession number 39948
  // Figure1 are the simulation results of the same model with different choices of parameters and different stimulus function or events.a=0.02; b=-0.1; c=-55; d=6; V=-60; u=b*V;
  // This model originates from BioModels Database: A Database of Annotated Published Models. It is copyright (c) 2005-2007 The BioModels Team.
  // For more information see the terms of use.

  // Compartments:
  compartment cell = 1;

  // Parameters:
  a = 0.02;
  b = -0.1;
  c = -55;
  d = 6;
  Vthresh = 30;
  flag = 0;
  v = -60;
  u = 6;

  // Assignment rules:
  i := flag*0.075*(time - 30);

  // Rate rules:
  v' = 0.04*v^2 + 4.1*v + 108 - u + i;
  u' = a*(b*v - u);

  // Events:
  event_0000001: at (v > Vthresh): v = c, u = u + d;
  event_0000002: at (time > 30): flag = 1;
end
