// SBML level 2 version 1

model Model_generated_by_BIOCHAM()
  // Calzone2007_CellCycle
  // This is the Dynamical model of nuclear division cycles during early embryogenesis of Drosophila, without StringT regulation. so ksstg=kdstg=0. Figure1B has been simulated by MathSBML. Curator changed model from only one compartment into two compartments according to the paper. Detail explaination of the models are in the supplement information of the paper.The author didn't specify which compartment Xm, Stgm, Xp are located, we assume that they locate in cytoplasm.
  // Some of the parameter values for the equations are dimensionless parameters.
  // This model originates from BioModels Database: A Database of Annotated Published Models. It is copyright (c) 2005-2007 The BioModels Team.
  // For more information see the terms of use.

  // Compartments:
  compartment nuclei = 1;
  compartment cytoplasm = 1;

  // Species:
  species MPFc in cytoplasm = 1;
  species preMPFc in cytoplasm = 0;
  species StgPc in cytoplasm = 0.8;
  species Wee1c in cytoplasm = 0;
  // Wee1Pc has been defined as boundarycondition, only change with the assignment rule.
  species $Wee1Pc in cytoplasm;
  species Stgm in cytoplasm = 1;
  species Xp in cytoplasm = 0;
  species Stgc in cytoplasm = 0;
  species Xm in cytoplasm = 0;
  species MPFn in nuclei = 0;
  species preMPFn in nuclei = 0;
  species Wee1Pn in nuclei = 0;
  species Wee1n in nuclei = 0;
  species StgPn in nuclei = 0;
  species Stgn in nuclei = 0;
  species FZYa in nuclei = 0;
  species IEa_1 in nuclei = 0;
  species N in nuclei = 1;

  // Parameters:
  ksc = 0.01;
  kdc = 0.01; kdc is "kdcp";
  kdnp = 0.01;
  kdn = 1.5; kdn is "kdnpp";
  kaie = 1;
  kiie = 0.4;
  kafzy = 1;
  kifzy = 0.2;
  kweep = 0.005;
  kwee = 1; kwee is "kweepp";
  kstgp = 0.2;
  kstg = 2; kstg is "kstgpp";
  // ksstg=0 for figure1B
  ksstg = 0;
  // kdstg=0 for figure1B
  kdstg = 0;
  kastgp = 0;
  kastg = 1; kastg is "kastgpp";
  kistg = 0.3;
  kawee = 0.3;
  kiweep = 0.01;
  kiwee = 1; kiwee is "kiweepp";
  kt = 0.15; kt is "kin";
  Jaie = 0.01;
  Jiie = 0.01;
  Jafzy = 0.01;
  Jifzy = 0.01;
  Jastg = 0.05;
  Jistg = 0.05;
  Jawee = 0.05;
  Jiwee = 0.05;
  Jm = 0.05;
  kdmp = 0.002;
  kdm = 0.2; kdm is "kdmpp";
  koutw_1 = 0.01;
  kinw_1 = 0.04;
  kouts_1 = 0.02;
  kins_1 = 0.08;
  kez_1 = 0.5;
  factor_1 = 1.95;
  E_1 = 7e-5;
  ksxp_1 = 0.001;
  ksxm_1 = 0.0005;
  kout_1 = 0;
  // Simulation of Figure1, total amounts of String are constant, 0.8.
  StringT = 0.8;
  // Total Wee1 are constant 0.8.
  Wee1T = 0.8;

  // Assignment rules:
  CycBT := (1 - N*E_1)*(MPFc + preMPFc) + N*E_1*(MPFn + preMPFn);
  StgPT := (1 - N*E_1)*StgPc + N*E_1*StgPn;
  Wee1Pc := (Wee1T - N*E_1*(Wee1n + Wee1Pn))/(1 - N*E_1) - Wee1c;

  // Reactions:
  Synthesis_of_MPFc: => MPFc; ksc*cytoplasm;
  Activation_of_MPFc: preMPFc => MPFc; cytoplasm*(kstgp + kstg*StgPc)*preMPFc;  // modifiers: StgPc
  Inactivation_of_MPFc: MPFc => preMPFc; cytoplasm*(kweep + kwee*Wee1c)*MPFc;  // modifiers: Wee1c
  Degradation_of_cyclin: preMPFc => ; cytoplasm*kdc*preMPFc;
  degradation_of_cyclin: MPFc => ; cytoplasm*kdc*MPFc;
  Inactivation_of_Wee1c: Wee1c => $Wee1Pc; cytoplasm*((kiweep + kiwee*MPFc)*Wee1c/(Jiwee + Wee1c));  // modifiers: MPFc
  Activation_of_Wee1c: $Wee1Pc => Wee1c; cytoplasm*(kawee*Wee1Pc/(Jawee + Wee1Pc));
  mRNA_of_Stg: Stgm => ; nuclei*(kdmp*Stgm/(Jm + Stgm) + kdm*Xp*Stgm);  // modifiers: Xp
  Synthesis_of_Stg: => Stgc; cytoplasm*ksstg*Stgm;  // modifiers: Stgm
  activation_of_Stgc: Stgc => StgPc; cytoplasm*((kastgp + kastg*MPFc)*Stgc/(Jastg + Stgc));  // modifiers: MPFc
  inactivation_of_Stgc: StgPc => Stgc; cytoplasm*(kistg*StgPc/(Jistg + StgPc));
  degradation_of_Stgc: Stgc => ; cytoplasm*kdstg*Stgc;
  degradation_of_active_Stgc: StgPc => ; cytoplasm*kdstg*StgPc;
  export_of_MPF_from_cytoplasm: MPFc => ; cytoplasm*(kt*MPFc*E_1*N/(1 - N*E_1));  // modifiers: N
  importofMPFintocytoplasm_1: => MPFc; nuclei*(kout_1*MPFn*E_1*N/(1 - N*E_1)); importofMPFintocytoplasm_1 is "import of MPF into cytoplasm";  // modifiers: N, MPFn
  _16: => MPFn; cytoplasm*kt*MPFc; _16 is "import of MPF into nucleus";  // modifiers: MPFc
  exportofMPFfromnucleus_1: MPFn => ; nuclei*kout_1*MPFn; exportofMPFfromnucleus_1 is "export of MPF from nucleus";
  importofpreMPFintocytoplaslm_1: => preMPFc; nuclei*(kout_1*preMPFn*N*E_1/(1 - N*E_1)); importofpreMPFintocytoplaslm_1 is "import of preMPF into cytoplasm";  // modifiers: preMPFn, N
  export_of_preMPF_from_cytoplasm: preMPFc => ; cytoplasm*(kt*preMPFc*E_1*N/(1 - N*E_1));  // modifiers: N
  _18: => preMPFn; cytoplasm*kt*preMPFc; _18 is "import of preMPF into nucleus";  // modifiers: preMPFc
  exportofpreMPFnfromnucleus_1: preMPFn => ; nuclei*kout_1*preMPFn; exportofpreMPFnfromnucleus_1 is "export of preMPFn from nucleus";
  export_of_Wee1P_from_nucleus: Wee1Pn => ; nuclei*koutw_1*Wee1Pn;
  _182_1: => $Wee1Pc; nuclei*(koutw_1*Wee1Pn*N*E_1/(1 - N*E_1)); _182_1 is "import of Wee1P into cytoplasm";  // modifiers: Wee1Pn, N
  export_of_Wee1P_from_cytoplasm: $Wee1Pc => ; cytoplasm*(kinw_1*Wee1Pc*E_1*N/(1 - N*E_1));  // modifiers: N
  _20: => Wee1Pn; cytoplasm*kinw_1*Wee1Pc; _20 is "import of Wee1P into nucleus";  // modifiers: Wee1Pc
  export_of_Wee1_from_nucleus: Wee1n => ; nuclei*koutw_1*Wee1n;
  _22: => Wee1c; nuclei*(koutw_1*Wee1n*N*E_1/(1 - N*E_1)); _22 is "import of Wee1 into cytoplasm";  // modifiers: Wee1n, N
  export_of_Wee1c_from_cytoplasm: Wee1c => ; cytoplasm*(kinw_1*Wee1c*E_1*N/(1 - N*E_1));  // modifiers: N
  _24: => Wee1n; cytoplasm*kinw_1*Wee1c; _24 is "import of Wee1 into nucleus";  // modifiers: Wee1c
  export_of_StgP_from_nucleus: StgPn => ; nuclei*kouts_1*StgPn;
  _26: => StgPc; nuclei*(kouts_1*StgPn*E_1*N/(1 - N*E_1)); _26 is "import of StgP into cytoplasm";  // modifiers: StgPn, N
  export_of_StgP_from_cytoplasm: StgPc => ; cytoplasm*(kins_1*StgPc*E_1*N/(1 - N*E_1));  // modifiers: N
  _28: => StgPn; cytoplasm*kins_1*StgPc; _28 is "import of StgP into nucleus";  // modifiers: StgPc
  export_of_Stg_from_nucleus: Stgn => ; nuclei*kouts_1*Stgn;
  _30: => Stgc; nuclei*(kouts_1*Stgn*E_1*N/(1 - N*E_1)); _30 is "import of Stg into cytoplasm";  // modifiers: Stgn, N
  export_of_Stg_from_cytoplasm: Stgc => ; cytoplasm*(kins_1*Stgc*E_1*N/(1 - N*E_1));  // modifiers: N
  _32: => Stgn; cytoplasm*kins_1*Stgc; _32 is "import of Stg into nucleus";  // modifiers: Stgc
  activation_of_MPFn: preMPFn => MPFn; nuclei*(kstgp + kstg*StgPn)*preMPFn;  // modifiers: StgPn
  inactivation_of_MPFn: MPFn => preMPFn; nuclei*(kweep + kwee*Wee1n)*MPFn;  // modifiers: Wee1n
  degradation_of_preMPFn: preMPFn => ; nuclei*(kdnp + kdn*FZYa)*preMPFn;  // modifiers: FZYa
  degradation_of_MPFn: MPFn => ; nuclei*(kdnp + kdn*FZYa)*MPFn;  // modifiers: FZYa
  R_37: IEa_1 => ; nuclei*(kiie*IEa_1/(Jiie + IEa_1)); R_37 is "activation of intermediary enzyme";
  R_38: => IEa_1; nuclei*(kaie*(1 - IEa_1)*MPFn/(Jaie + 1 - IEa_1)); R_38 is "inactivation of intermediary enzyme";  // modifiers: MPFn
  activation_of_FZY: => FZYa; nuclei*(kafzy*IEa_1*(1 - FZYa)/(Jafzy + 1 - FZYa));  // modifiers: IEa_1
  inactivation_of_FZY: FZYa => ; nuclei*(kifzy*FZYa/(Jifzy + FZYa));
  inactivation_of_Wee1n: Wee1n => Wee1Pn; nuclei*((kiweep + kiwee*MPFn)*Wee1n/(Jiwee + Wee1n));  // modifiers: MPFn
  activation_of_Wee1n: Wee1Pn => Wee1n; nuclei*(kawee*Wee1Pn/(Jawee + Wee1Pn));
  activation_of_StgPn: Stgn => StgPn; nuclei*((kastgp + kastg*MPFn)*Stgn/(Jastg + Stgn));  // modifiers: MPFn
  inactivation_of_StgPn: StgPn => Stgn; nuclei*(kistg*StgPn/(Jistg + StgPn));
  degradation_of_Stgn: Stgn => ; nuclei*kdstg*Stgn;
  degradation_of_StgPn: StgPn => ; nuclei*kdstg*StgPn;
  Nuclei_1: => N; 0;
  _50: => Xm; nuclei*ksxm_1*N; _50 is "Zygotic mRNA";  // modifiers: N
  _51: => Xp; cytoplasm*ksxp_1*Xm; _51 is "Zygotic proteins";  // modifiers: Xm

  // Events:
  // When Fzy=Kez(increasing), then the following changes are made instantaneously (for X=MPF,preMPF,Wee1,Wee1P, Stg, and StgP) :
  // Xc-> (1-N*E)*Xc/(1-1.95*N*E)
  // Xn->Xn/1.95
  // N->1.95N
  at (FZYa >= kez_1): N = factor_1*N, MPFn = MPFn/1.95, preMPFn = preMPFn/1.95, Wee1n = Wee1n/1.95, Wee1Pn = Wee1Pn/1.95, Wee1c = Wee1c*((1 - N*E_1)/(1 - 1.95*N*E_1)), Wee1Pc = Wee1Pc*((1 - N*E_1)/(1 - 1.95*N*E_1)), Stgn = Stgn/1.95, StgPc = StgPc*((1 - N*E_1)/(1 - 1.95*N*E_1)), Stgc = Stgc*((1 - N*E_1)/(1 - 1.95*N*E_1)), StgPn = StgPn/1.95, MPFc = MPFc*((1 - N*E_1)/(1 - 1.95*N*E_1));

  // Unit definitions:
  unit time_1 = 60 second; time_1 is "min";
end
