// SBML level 2 version 1

model Wang2007_ATP_induced_Ca_Oscillation()
  // The model reproduces Fig 2 A of the paper. Simulation results successfully reproduced using MathSBML and Jarnac
  // This model originates from BioModels Database: A Database of Annotated Published Models. It is copyright (c) 2005-2007 The BioModels Team.
  // For more information see the terms of use.

  // Compartments:
  compartment Cytosol = 1;
  compartment ER = 1;

  // Species:
  species Galpha_GTP in Cytosol = 1;
  species APLC in Cytosol = 9;
  species IP3 in Cytosol = 1;
  species Ca_ER in ER = 1000; Ca_ER is "Calcium";
  species Ca_Cyt in Cytosol = 200; Ca_Cyt is "Calcium";
  species PLC in Cytosol;
  species DG in Cytosol; DG is "Diacylglycerol";

  // Parameters:
  Kp = 4;
  Kd = 10;
  Kr = 200;
  n = 4;
  Kg = 25;
  m = 2;
  Ks = 25;
  Kc1 = 1000;
  Kc2 = 2000;
  w = 3;
  Ker = 75;
  Cplc_total = 10;
  k0 = 0.1;
  k1 = 3.4;
  k2 = 4;
  k3 = 4.5;
  k4 = 1.2;
  k5 = 0.12;
  k6 = 14;
  k7 = 2;
  k8 = 10500;
  k9 = 600;
  k10 = 3000;
  k11 = 260;

  // Assignment rules:
  DG := IP3;
  Raplc := APLC/(Kp + APLC);
  Rpkc := DG/(Kd + DG)*Ca_Cyt/(Kr + Ca_Cyt);
  Rgalpha_gtp := Galpha_GTP^n/(Kg^n + Galpha_GTP^n);
  Rdg := DG^m/(Kd^m + DG^m);
  Rip3 := IP3^3/(Ks^3 + IP3^3);
  Rcyt1 := Ca_Cyt/(Kc1 + Ca_Cyt);
  Rcyt2 := Ca_Cyt/(Kc2 + Ca_Cyt);
  Rer := Ca_ER^w/(Ker^w + Ca_ER^w);
  PLC := Cplc_total - APLC;

  // Reactions:
  R1: => Galpha_GTP; Cytosol*k0;
  R2: => Galpha_GTP; Cytosol*k1*Galpha_GTP;
  R3: Galpha_GTP => ; Cytosol*k2*Raplc*Galpha_GTP;
  R4: Galpha_GTP => ; Cytosol*k3*Rpkc*Galpha_GTP;
  R5: => APLC; Cytosol*k4*Rgalpha_gtp*Rdg*PLC;  // modifiers: PLC
  R6: APLC => ; Cytosol*k5*APLC;
  R7: => IP3; Cytosol*k6*APLC;  // modifiers: APLC
  R8: IP3 => ; Cytosol*k7*IP3;
  R9: 0.001 Ca_ER -> 0.01 Ca_Cyt; ER*(k8*Rip3*Rer - k9*Rcyt1);
  R10: 0.05 Ca_Cyt => ; Cytosol*k10*Rcyt2;
  R11: => 0.05 Ca_Cyt; Cytosol*k11;

  // Unit definitions:
  unit substance = 1e-9 mole; substance is "nano mole";
end
