// SBML level 2 version 1

model Komarova2003_BoneRemodeling()
  // The model reproduces Fig 2A and Fig 2B of the paper. Note that the Y-axis scale is not right, the osteoblast steady state is approximatley 212 and not 0 as depicted in the figure. Also, there is a typo in the equation for x2_bar which has been corrected here. Model successfully tested on MathSBML.
  // This model originates from BioModels Database: A Database of Annotated Published Models. It is copyright (c) 2005-2007 The BioModels Team.
  // For more information see the terms of use.

  // Compartments:
  compartment compartment = 1;

  // Species:
  substanceOnly species Osteoclast in compartment = 11;
  substanceOnly species Osteoblast in compartment = 212;
  substanceOnly species x1_bar in compartment; x1_bar is "Steady state osteoclast";
  substanceOnly species x2_bar in compartment; x2_bar is "Steady state osteoblast";
  substanceOnly species z in compartment = 100; z is "Bone mass";
  substanceOnly species y1 in compartment = 0; y1 is "Cells actively resorbing bone";
  substanceOnly species y2 in compartment = 0; y2 is "Cells actively forming bone";

  // Parameters:
  alpha1 = 3;
  alpha2 = 4;
  beta1 = 0.2;
  beta2 = 0.02;
  g11 = 0.5;
  g21 = -0.5;
  g12 = 1;
  g22 = 0;
  k1 = 0.24;
  k2 = 0.0017;
  flag_resorption = 0;
  flag_formation = 0;

  // Assignment rules:
  gamma := g12*g21 - (1 - g11)*(1 - g22);
  x1_bar := (beta1/alpha1)^((1 - g22)/gamma)*(beta2/alpha2)^(g21/gamma);
  x2_bar := (beta1/alpha1)^(g12/gamma)*(beta2/alpha2)^((1 - g11)/gamma);

  // Reactions:
  Osteoclast_production: -> Osteoclast; alpha1*Osteoclast^g11*Osteoblast^g21;  // modifiers: Osteoblast
  Osteoclast_removal: Osteoclast -> ; beta1*Osteoclast;
  Osteoblast_production: -> Osteoblast; alpha2*Osteoclast^g12*Osteoblast^g22;  // modifiers: Osteoclast
  Osteoblast_removal: Osteoblast -> ; beta2*Osteoblast;
  Bone_resorption: z -> ; flag_resorption*k1*(Osteoclast - x1_bar);  // modifiers: Osteoclast, x1_bar
  Bone_formation: -> z; flag_formation*k2*(Osteoblast - x2_bar);  // modifiers: Osteoblast, x2_bar

  // Events:
  // When the osteoclast number is greater than the steady state osteoclast number the flag is set to 1, this insures that in reaction R5, y1 is equal to the difference of x1 and x1_bar. When x1 is greater than x1_bar the difference is set to zero by setting the flag to zero. The same procedure is used for bone formation.
  event_0000001: at (Osteoclast > x1_bar): flag_resorption = 1;
  event_0000003: at (Osteoclast <= x1_bar): flag_resorption = 0;
  event_0000002: at (Osteoblast > x2_bar): flag_formation = 1;
  event_0000004: at (Osteoblast <= x2_bar): flag_formation = 0;

  // Unit definitions:
  unit substance = item; substance is "number";
  unit time = 86400 second; time is "day";
end
