// SBML level 2 version 1

model Kim2007_Wnt_ERK_Crosstalk()
  // The model reproduces Figure 6 (a,b,c) for normal wnt signaling. Model was successfully tested on MathSBML.
  // This model originates from BioModels Database: A Database of Annotated Published Models. It is copyright (c) 2005-2007 The BioModels Team.
  // For more information see the terms of use.

  // Compartments:
  compartment cytoplasm = 1;
  compartment nucleus in cytoplasm = 1;

  // Species:
  species Dshi in cytoplasm = 100;
  species Dsha in cytoplasm = 0;
  species APC_ast_Axin_ast_GSK3beta in cytoplasm = 0.0153; APC_ast_Axin_ast_GSK3beta is "APC_ast/Axin_ast/GSK3beta";
  species APC_Axin_GSK3beta in cytoplasm = 0.0076; APC_Axin_GSK3beta is "APC/Axin/GSK3beta";
  species X5 in cytoplasm = 49.1372; X5 is "GSK3beta";
  species APC_Axin in cytoplasm = 0.0015; APC_Axin is "APC/Axin";
  species APC in cytoplasm = 96.6019;
  species X8 in cytoplasm = 0.002; X8 is "bCatenin/APC_Ast/Axin_ast/GSK3beta";
  species X9 in cytoplasm = 0.002; X9 is "bCatenin_ast/APC_ast/Axin_ast/GSK3beta";
  species bCatenin_ast in cytoplasm = 0.9881;
  species bCatenin in nucleus = 42.7224;
  species Axin in cytoplasm = 0.0008;
  species TCF in nucleus = 6.1879;
  species bCatenin_TCF in nucleus = 8.8121; bCatenin_TCF is "bCatenin/TCF";
  species bCatenin_APC in cytoplasm = 3.4392; bCatenin_APC is "bCatenin/APC";
  species Rasi in cytoplasm = 200;
  species Rasa in cytoplasm = 0;
  species Raf_1 in cytoplasm = 112.5585; Raf_1 is "Raf-1";
  species Raf_1_ast in cytoplasm = 6.486; Raf_1_ast is "Raf-1_ast";
  species MEK in cytoplasm = 296.1137;
  species MEK_ast in cytoplasm = 3.8863;
  species ERK in cytoplasm = 297.8897;
  species ERK_ast in cytoplasm = 2.1103;
  species Raf1_RKIP in cytoplasm = 180.9595; Raf1_RKIP is "Raf1/RKIP";
  species RKIP in cytoplasm = 418.1788;
  species RKIP_ast in cytoplasm = 0.8619;
  species unknown_molecule_X in cytoplasm = 10.263;
  species X28 in cytoplasm = 0.85544; X28 is "GSK3beta";

  // Parameters:
  k1 = 0.182;
  W = 0;
  k2 = 0.0182;
  k3 = 0.05;
  k4 = 0.267;
  k5 = 0.133;
  k_plus6 = 0.0909;
  k_minus6 = 0.909;
  k_plus7 = 1;
  k_minus7 = 50;
  k_plus8 = 1;
  k_minus8 = 120;
  k9 = 206;
  k10 = 206;
  k11 = 0.417;
  V12 = 0.423;
  k13 = 0.000257;
  k14 = 8.22e-5;
  k21 = 1e-6;
  k15 = 0.167;
  k_plus16 = 1;
  k_minus16 = 30;
  k_plus17 = 1;
  k_minus17 = 1200;
  Vmax1 = 150;
  Km1 = 10;
  Ki = 9;
  Vmax2 = 15;
  Km2 = 8;
  kcat1 = 1.5;
  Km3 = 15;
  Vmax3 = 45;
  Km4 = 15;
  kcat2 = 1.5;
  Km5 = 15;
  Vmax4 = 45;
  Km6 = 15;
  kcat3 = 1.5;
  Km7 = 15;
  Vmax5 = 45;
  Km8 = 15;
  kcat4 = 1.5;
  Km9 = 9;
  k18 = 0.15;
  k19 = 39;
  Vmax6 = 45;
  Km10 = 12;
  kcat5 = 0.6;
  n1 = 2;
  Km11 = 15;
  k20 = 0.015;
  kcat6 = 1.5;
  Km12 = 15;
  kcat7 = 1.5;
  Km13 = 15;
  Vmax7 = 45;
  Km14 = 15;
  flag_for_wnt_signal = 0;

  // Assignment rules:
  X13X14 := TCF + bCatenin_TCF;

  // Reactions:
  Dishevelled_activation: Dshi => Dsha; cytoplasm*k1*Dshi*W;
  Dishevelled_inactivation: Dsha => Dshi; cytoplasm*k2*Dsha;
  R3: APC_Axin_GSK3beta => APC_Axin + X5; cytoplasm*k3*Dsha*APC_Axin_GSK3beta; R3 is "Dishevelled mediated GSK/Axin/APC complex disassembly";  // modifiers: Dsha
  R4: APC_Axin_GSK3beta => APC_ast_Axin_ast_GSK3beta; cytoplasm*k4*APC_Axin_GSK3beta; R4 is "Activation of GSK/Axin/APC complex";
  R5: APC_ast_Axin_ast_GSK3beta => APC_Axin_GSK3beta; cytoplasm*k5*APC_ast_Axin_ast_GSK3beta; R5 is "Inactivation of GSK/Axin/APC complex";
  GSK_Axin_APC_complex_reassembly: APC_Axin + X5 -> APC_Axin_GSK3beta; cytoplasm*(k_plus6*X5*APC_Axin - k_minus6*APC_Axin_GSK3beta); GSK_Axin_APC_complex_reassembly is "GSK/Axin/APC complex reassembly";
  Axin_APC_complex_formation: Axin + APC -> APC_Axin; cytoplasm*(k_plus7*APC*Axin - k_minus7*APC_Axin); Axin_APC_complex_formation is "Axin/APC complex formation";
  R8: bCatenin + APC_ast_Axin_ast_GSK3beta -> X8; cytoplasm*(k_plus8*APC_ast_Axin_ast_GSK3beta*bCatenin - k_minus8*X8); R8 is "bCatenin binding to GSK/Axin/APC complex";
  bCatenin_phosphorylation: X8 => X9; cytoplasm*k9*X8;
  R10: X9 => APC_ast_Axin_ast_GSK3beta + bCatenin_ast; cytoplasm*k10*X9; R10 is "GSK.Axin/APC/bCatenin complex disassembly";
  R11: bCatenin_ast => ; cytoplasm*k11*bCatenin_ast; R11 is "Phosphorylated bCatenin degradation";
  bCatenin_synthesis: => bCatenin; cytoplasm*V12;
  R13: bCatenin => ; nucleus*k13*bCatenin; R13 is "Unphosphorylated bCatenin degradation";
  Axin_synthesis: => Axin; nucleus*(k14 + k21*(bCatenin + bCatenin_TCF));  // modifiers: bCatenin, bCatenin_TCF
  Axin_degradation: Axin => ; cytoplasm*k15*Axin;
  bCatenin_TCF_complex_formation: TCF + bCatenin -> bCatenin_TCF; nucleus*(k_plus16*bCatenin*TCF - k_minus16*bCatenin_TCF); bCatenin_TCF_complex_formation is "bCatenin/TCF complex formation";
  APC_bCatenin_complex_formation: bCatenin + APC -> bCatenin_APC; cytoplasm*(k_plus17*APC*bCatenin - k_minus17*bCatenin_APC); APC_bCatenin_complex_formation is "APC/bCatenin complex formation";
  Ras_activation: Rasi => Rasa; cytoplasm*(Vmax1*Rasi*W/(Km1 + Rasi))*(Ki/(Ki + ERK_ast));  // modifiers: ERK_ast
  Ras_inactivation: Rasa => Rasi; cytoplasm*(Vmax2*Rasa/(Km2 + Rasa));
  Raf_activation: Raf_1 => Raf_1_ast; cytoplasm*(kcat1*Rasa*Raf_1/(Km3 + Raf_1));  // modifiers: Rasa
  Raf_inactivation: Raf_1_ast => Raf_1; cytoplasm*Vmax3*Raf_1_ast/(Km4 + Raf_1_ast);
  MEK_activation: MEK => MEK_ast; cytoplasm*kcat2*Raf_1_ast*MEK/(Km5 + MEK);  // modifiers: Raf_1_ast
  MEK_inactivation: MEK_ast => MEK; cytoplasm*Vmax4*MEK_ast/(Km6 + MEK_ast);
  ERK_activation: ERK => ERK_ast; cytoplasm*kcat3*MEK_ast*ERK/(Km7 + ERK);  // modifiers: MEK_ast
  ERK_inactivation: ERK_ast => ERK; cytoplasm*Vmax5*ERK_ast/(Km8 + ERK_ast);
  Raf_RKIP_complex_disassembly: Raf1_RKIP => Raf_1 + RKIP_ast; cytoplasm*kcat4*ERK_ast*Raf1_RKIP/(Km9 + Raf1_RKIP); Raf_RKIP_complex_disassembly is "Raf/RKIP complex disassembly";  // modifiers: ERK_ast
  Raf_RKIP_complex_formation: Raf_1 + RKIP -> Raf1_RKIP; cytoplasm*(k18*Raf_1*RKIP - k19*Raf1_RKIP); Raf_RKIP_complex_formation is "Raf-RKIP complex formation";
  RKIP_dephosphorylation: RKIP_ast => RKIP; cytoplasm*Vmax6*RKIP_ast/(Km10 + RKIP_ast);
  Unknown_factor_X_formation: => unknown_molecule_X; cytoplasm*(kcat5*bCatenin_TCF^n1/(Km11^n1 + bCatenin_TCF^n1)); Unknown_factor_X_formation is "Unknown factor-X formation";  // modifiers: bCatenin_TCF
  Factor_X_degradation: unknown_molecule_X => ; cytoplasm*k20*unknown_molecule_X; Factor_X_degradation is "Factor-X degradation";
  Factor_X_mediated_Raf_activation: Raf_1 => Raf_1_ast; cytoplasm*(kcat6*unknown_molecule_X*Raf_1/(Km12 + Raf_1)); Factor_X_mediated_Raf_activation is "Factor-X mediated Raf activation";  // modifiers: unknown_molecule_X
  R32: X5 => X28; cytoplasm*kcat7*ERK_ast*X5/(Km13 + X5); R32 is "ERK mediated GSK3beta phosphorylation";  // modifiers: ERK_ast
  GSK3beta_dephosphorylation: X28 => X5; cytoplasm*Vmax7*X28/(Km14 + X28);

  // Events:
  // The two events are used to increase the value of wnt from 0 to 1 between time t=500minutes and t=1000minutes.
  event_0000001: at ((time >= 500) && (time <= 1000)): W = 1;
  event_0000002: at (time > 1000): W = 0;

  // Unit definitions:
  unit substance = 1e-9 mole; substance is "nanomole";
  unit time = 60 second; time is "minute";
end
