// SBML level 2 version 1

model Singh2006_IL6_Signal_Transduction()
  // The model reproduces Fig 2 , Fig3A and Fig 3B of the paper. The ODE for x1(gp180) and x3 (gp 130) is wrong and the authors have communicated to the curator that the species ought to have a constant value. There are a few other differences from the paper and these were made in consultation with the authors. Model was successfully tested on MathSBML.
  // This model originates from BioModels Database: A Database of Annotated Published Models. It is copyright (c) 2005-2007 The BioModels Team.
  // For more information see the terms of use.

  // Compartments:
  compartment cytosol = 1;
  compartment nucleus in cytosol = 1;

  // Species:
  species $gp80 in cytosol = 8;
  species IL6_gp80 in cytosol = 0; IL6_gp80 is "IL6-gp80";
  species IL6_gp80_gp130_JAK in cytosol = 0; IL6_gp80_gp130_JAK is "IL6-gp80-gp130-JAK";
  species gp130_JAK in cytosol = 0; gp130_JAK is "gp130-JAK";
  species IL6_gp80_gp130_JAK_2 in cytosol = 0; IL6_gp80_gp130_JAK_2 is "(IL6-gp80-gp130-JAK)2";
  species IL6_gp80_gp130_JAK__ast2 in cytosol = 0; IL6_gp80_gp130_JAK__ast2 is "(IL6-gp80-gp130-JAK)_ast2";
  species IL6_gp80_gp130_JAK_ast2_JAK in cytosol = 0; IL6_gp80_gp130_JAK_ast2_JAK is "(IL6-gp80-gp130-JAK)ast2-JAK";
  species SHP2 in cytosol = 100;
  species STAT3C in cytosol = 1000;
  species IL6_gp80_gp130_JAK_ast2_STAT3C in cytosol = 0; IL6_gp80_gp130_JAK_ast2_STAT3C is "(IL6-gp80-gp130-JAK)ast2-STAT3C";
  species STAT3Cast in cytosol = 0;
  species x12 in cytosol = 0; x12 is "(IL6-gp80-gp130-JAK)ast2-STAT3Cast";
  species SOCS3 in cytosol = 0;
  species IL6_gp80_gp130_JAK_ast2_SOCS3 in cytosol = 0; IL6_gp80_gp130_JAK_ast2_SOCS3 is "(IL6-gp80-gp130-JAK)ast2-SOCS3";
  species IL6_gp80_gp130_JAK_ast2_SHP2ast in cytosol = 0; IL6_gp80_gp130_JAK_ast2_SHP2ast is "(IL6-gp80-gp130-JAK)ast2-SHP2ast";
  species SHP2ast in cytosol = 0;
  species x40 in cytosol = 0; x40 is "(IL6-gp80-gp130-JAK)ast2-SHP2ast-Grb2";
  species SHP2ast_Grb2 in cytosol = 0; SHP2ast_Grb2 is "SHP2ast-Grb2";
  species x41 in cytosol = 0; x41 is "(IL6-gp80-gp130-JAK)ast2-SHP2-Grb2";
  species SHP2ast_Grb2_SOS in cytosol = 0; SHP2ast_Grb2_SOS is "SHP2ast-Grb2-SOS";
  species PP1_STAT3Cast in cytosol = 0; PP1_STAT3Cast is "PP1-STAT3Cast";
  species PP1 in cytosol = 50;
  species STAT3C_STAT3Cast in cytosol = 0; STAT3C_STAT3Cast is "STAT3C-STAT3Cast";
  species STAT3N in nucleus = 0;
  species x32 in cytosol = 0; x32 is "(IL6-gp80-gp130-JAK)ast2-STAT3C-SOCS3-SHP2";
  species STAT3Cast_STAT3Cast in cytosol = 0; STAT3Cast_STAT3Cast is "STAT3Cast-STAT3Cast";
  species STAT3Nast_STAT3Nast in nucleus = 0; STAT3Nast_STAT3Nast is "STAT3Nast-STAT3Nast";
  species STAT3Nast in nucleus = 0;
  species PP2 in nucleus = 60;
  species PP2_STAT3Nast_STAT3Nast in nucleus = 0; PP2_STAT3Nast_STAT3Nast is "PP2-STAT3Nast-STAT3Nast";
  species STAT3N_STAT3Nast in nucleus = 0; STAT3N_STAT3Nast is "STAT3N-STAT3Nast";
  species Mrna_SOCS3N in nucleus = 0; Mrna_SOCS3N is "Mrna-SOCS3N";
  species Grb2 in cytosol = 85;
  species Ras_GDP in cytosol = 19000; Ras_GDP is "Ras-GDP";
  species x42 in cytosol = 0; x42 is "(IL6-gp80-gp130-JAK)ast2-SHP2ast-Grb2-SOS-Ras-GDP";
  species Ras_GTP in cytosol = 0; Ras_GTP is "Ras-GTP";
  species Raf in cytosol = 67;
  species Raf_Ras_GTP in cytosol = 0; Raf_Ras_GTP is "Raf-Ras-GTP";
  species Rafast_Phosp1 in cytosol = 0; Rafast_Phosp1 is "Rafast-Phosp1";
  species Rafast in cytosol = 0;
  species Phosp1 in cytosol = 67;
  species MEK in cytosol = 41667;
  species MEK_Rafast in cytosol = 0; MEK_Rafast is "MEK-Rafast";
  species MEK_P in cytosol = 0; MEK_P is "MEK-P";
  species MEK_P_Phosp2 in cytosol = 0; MEK_P_Phosp2 is "MEK-P-Phosp2";
  species Phosp2 in cytosol = 67;
  species MEK_PP in cytosol = 0; MEK_PP is "MEK-PP";
  species ERK in cytosol = 35000;
  species ERK_MEK_PP in cytosol = 0; ERK_MEK_PP is "ERK-MEK-PP";
  species ERK_P in cytosol = 0; ERK_P is "ERK-P";
  species ERK_PP in cytosol = 0; ERK_PP is "ERK-PP";
  species ERK_P_Phosp3 in cytosol = 0; ERK_P_Phosp3 is "ERK-P-Phosp3";
  species SOS in cytosol = 34;
  species PP2_STAT3Nast in nucleus = 0; PP2_STAT3Nast is "PP2-STAT3Nast";
  species x31 in cytosol = 0; x31 is "(IL6-gp80-gp130-JAK)ast2-STAT3C-SOCS3";
  species MEK_P_Rafast in cytosol = 0; MEK_P_Rafast is "MEK-P-Rafast";
  species x43 in cytosol = 0; x43 is "(IL6-gp80-gp130-JAK)ast2-SHP2ast-Grb2-SOS-Ras-GTP";
  species $gp130 in cytosol = 0.8;
  species MEK_PP_Phosp2 in cytosol = 0; MEK_PP_Phosp2 is "MEK-PP-Phosp2";
  species JAK in cytosol = 12;
  species Mrna_SOCS3C in nucleus = 0; Mrna_SOCS3C is "Mrna-SOCS3C";
  species Ras_GTPast in cytosol = 0; Ras_GTPast is "Ras-GTPast";
  species x33 in cytosol = 0; x33 is "(IL6-gp80-gp130-JAK)ast2-STAT3C-SHP2";
  species ERK_P_MEK_PP in cytosol = 0; ERK_P_MEK_PP is "ERK-P-MEK-PP";
  species PP1_STAT3Cast_STAT3Cast in cytosol = 0; PP1_STAT3Cast_STAT3Cast is "PP1-STAT3Cast-STAT3Cast";
  species Grb2_SOS in cytosol = 0; Grb2_SOS is "Grb2-SOS";
  species Phosp3 in cytosol = 16667;
  species ERK_PP_Phosp3 in cytosol = 0; ERK_PP_Phosp3 is "ERK-PP-Phosp3";

  // Parameters:
  IL6 = 0.38;
  kf0 = 0.1;
  kr0 = 0.05;
  kf1 = 0.1;
  kr1 = 0.05;
  kf2 = 0.02;
  kr2 = 0.02;
  kf3 = 0.04;
  kr3 = 0.2;
  k4 = 0.005;
  k10 = 0.003;
  kf5 = 0.008;
  kr5 = 0.8;
  k6 = 0.4;
  kf7 = 0.005;
  kr7 = 0.5;
  kf9 = 0.001;
  kr9 = 0.2;
  kf21 = 0.02;
  kr21 = 0.1;
  kf37 = 0.3;
  kr37 = 0.0009;
  kf39 = 0.3;
  kr39 = 0.0009;
  kf32 = 0.1;
  kr32 = 0.000245;
  k12 = 0.003;
  kf13 = 2e-7;
  kr13 = 0.2;
  k17 = 0.05;
  kf8 = 0.02;
  kr8 = 0.1;
  kf11 = 0.001;
  kr11 = 0.2;
  k14 = 0.005;
  Vm = 1.7;
  Km = 340;
  kf34 = 6;
  kr34 = 0.06;
  kf60 = 0.5;
  kr60 = 0.005;
  kf15 = 0.001;
  kr15 = 0.2;
  kf61 = 0.2;
  kr61 = 2e-7;
  k16 = 0.005;
  k18a = 0.01;
  k18b = 400;
  k19 = 0.001;
  k22 = 0.0005;
  k20 = 0.01;
  k23 = 0.0005;
  kf38 = 0.01;
  kr38 = 0.55;
  kf35 = 0.0015;
  kr35 = 0.0045;
  kf24 = 0.01;
  kr24 = 0.55;
  kf25 = 0.01;
  kr25 = 0.0214;
  kf40 = 0.03;
  kr40 = 0.064;
  kf26 = 0.015;
  kr26 = 1.3;
  kf31 = 0.023;
  kr31 = 0.00022;
  kf27 = 0.5;
  kr27 = 0.0001;
  kf28 = 0.001;
  kr28 = 0.0053;
  kf41 = 0.03;
  kr41 = 0.0429;
  kf33 = 0.3;
  kr33 = 0.021;
  kf30 = 0.0079;
  kr30 = 0.4;
  k43 = 1;
  kf29 = 1;
  kr29 = 0.0007;
  kf42 = 0.0717;
  kr42 = 0.2;
  kf44 = 0.011;
  kr44 = 0.001833;
  k45 = 3.5;
  kf46 = 0.011;
  kr46 = 0.001833;
  k51 = 0.058;
  k49 = 0.058;
  kf50 = 0.00025;
  kr50 = 0.5;
  k47 = 2.9;
  kf48 = 0.0143;
  kr48 = 0.8;
  kf52 = 0.00011;
  kr52 = 0.033;
  k53 = 16;
  kr54 = 0.033;
  kf54 = 0.00011;
  k55 = 6.7;
  k59 = 0.3;
  k57 = 0.27;
  kf58 = 0.005;
  kr58 = 0.5;
  kf56 = 0.014;
  kr56 = 0.6;

  // Reactions:
  IL6_gp80_complex_formation: => IL6_gp80; cytosol*kf0*gp80*IL6; IL6_gp80_complex_formation is "IL6-gp80 complex formation";  // modifiers: gp80
  IL6_gp80_complex_dissociation: IL6_gp80 => ; cytosol*kr0*IL6_gp80; IL6_gp80_complex_dissociation is "IL6-gp80 complex dissociation";
  IL6_gp80_gp130_JAK_dissociation: IL6_gp80_gp130_JAK => gp130_JAK + IL6_gp80; cytosol*(kr2*IL6_gp80_gp130_JAK - kf2*IL6_gp80*gp130_JAK); IL6_gp80_gp130_JAK_dissociation is "IL6-gp80-gp130-JAK dissociation";
  gp130_JAK_complex_formation: JAK => gp130_JAK; cytosol*(kf1*gp130*JAK - kr1*gp130_JAK); gp130_JAK_complex_formation is "gp130-JAK complex formation";  // modifiers: gp130
  IL6_gp80_gp130_JAK_dimerization: 2 IL6_gp80_gp130_JAK => IL6_gp80_gp130_JAK_2; cytosol*kf3*IL6_gp80_gp130_JAK^2; IL6_gp80_gp130_JAK_dimerization is "IL6-gp80-gp130-JAK dimerization";
  R8: IL6_gp80_gp130_JAK_2 => 2 IL6_gp80_gp130_JAK; cytosol*kr3*IL6_gp80_gp130_JAK_2; R8 is "IL6-gp80-gp130-JAK dimer dissociation";
  R9: IL6_gp80_gp130_JAK_2 => IL6_gp80_gp130_JAK__ast2; cytosol*k4*IL6_gp80_gp130_JAK_2; R9 is "IL6-gp80-gp130-JAK dimer phosphorylation";
  R10: IL6_gp80_gp130_JAK_ast2_JAK => SHP2 + IL6_gp80_gp130_JAK_2; cytosol*k10*IL6_gp80_gp130_JAK_ast2_JAK; R10 is "IL6-gp80-gp130-JAK dimer-SHP2 dissociation";
  R11: STAT3C + IL6_gp80_gp130_JAK__ast2 => IL6_gp80_gp130_JAK_ast2_STAT3C; cytosol*(kf5*IL6_gp80_gp130_JAK__ast2*STAT3C - kr5*IL6_gp80_gp130_JAK_ast2_STAT3C); R11 is "IL6-gp80-gp130-JAK -STAT3C complex formation";
  R12: IL6_gp80_gp130_JAK_ast2_STAT3C => STAT3Cast + IL6_gp80_gp130_JAK__ast2; cytosol*k6*IL6_gp80_gp130_JAK_ast2_STAT3C; R12 is "IL6-gp80-gp130-JAK -STAT3C dissociation";
  R13: STAT3Cast + IL6_gp80_gp130_JAK__ast2 -> x12; cytosol*(kf7*IL6_gp80_gp130_JAK__ast2*STAT3Cast - kr7*x12); R13 is "IL6-gp80-gp130-JAK-STAT3Cast complex formation";
  R14: SHP2 + IL6_gp80_gp130_JAK__ast2 -> IL6_gp80_gp130_JAK_ast2_JAK; cytosol*(kf9*IL6_gp80_gp130_JAK__ast2*SHP2 - kr9*IL6_gp80_gp130_JAK_ast2_JAK); R14 is "IL6-gp80-gp130-JAK -SHP2 complex formation";
  R15: SOCS3 + IL6_gp80_gp130_JAK__ast2 -> IL6_gp80_gp130_JAK_ast2_SOCS3; cytosol*(kf21*SOCS3*IL6_gp80_gp130_JAK__ast2 - kr21*IL6_gp80_gp130_JAK_ast2_SOCS3); R15 is "IL6-gp80-gp130-JAK -SOCS3 complex formation";
  R16: IL6_gp80_gp130_JAK_ast2_SHP2ast -> SHP2ast + IL6_gp80_gp130_JAK__ast2; cytosol*(kf37*IL6_gp80_gp130_JAK_ast2_SHP2ast - kr37*IL6_gp80_gp130_JAK__ast2*SHP2ast); R16 is "IL6-gp80-gp130-JAK -SHP2 dimer dissociation";
  R16a: x40 -> SHP2ast_Grb2 + IL6_gp80_gp130_JAK__ast2; cytosol*(kf39*x40 - kr39*SHP2ast_Grb2*IL6_gp80_gp130_JAK__ast2); R16a is "IL6-gp80-gp130-JAK SHP2 Grb2 dissociation";
  R17: x41 -> SHP2ast_Grb2_SOS + IL6_gp80_gp130_JAK__ast2; cytosol*(kf32*x41 - kr32*SHP2ast_Grb2_SOS*IL6_gp80_gp130_JAK__ast2); R17 is "IL6-gp80-gp130-JAK-SHP2-Grb2-SOS dissociation";
  PP1_STAT3Cast_dissociation: PP1_STAT3Cast => PP1 + STAT3C; cytosol*k12*PP1_STAT3Cast; PP1_STAT3Cast_dissociation is "PP1-STAT3Cast dissociation";
  R19: STAT3Cast + STAT3C -> STAT3C_STAT3Cast; cytosol*(kf13*STAT3C*STAT3Cast - kr13*STAT3C_STAT3Cast); R19 is "STAT3C dimerization";
  STAT3N_transport: STAT3N => STAT3C; nucleus*k17*STAT3N;
  R21: IL6_gp80_gp130_JAK_ast2_SOCS3 + STAT3C -> x31; cytosol*(kf5*STAT3C*IL6_gp80_gp130_JAK_ast2_SOCS3 - kr5*x31); R21 is "IL6-gp80-gp130-JAK-SOCS2-STAT3C complex formation";
  R22: x32 => SOCS3 + SHP2 + STAT3C + IL6_gp80_gp130_JAK_2; cytosol*k10*x32; R22 is "IL6-gp80-gp130-JAK-STAT3C-SOCS3-SHP2 dissociation";
  R23: STAT3Cast -> 0.5 STAT3Cast_STAT3Cast; cytosol*(2*kf8*STAT3Cast^2 - 2*kr8*STAT3Cast_STAT3Cast); R23 is "STAT3C dimerization";
  R24: PP1 + STAT3Cast -> PP1_STAT3Cast; cytosol*(kf11*STAT3Cast*PP1 - kr11*PP1_STAT3Cast); R24 is "IL6-gp80-gp130-JAK STAT3Cast complex formation";
  R25: PP1 + STAT3Cast_STAT3Cast -> PP1_STAT3Cast_STAT3Cast; cytosol*(kf11*STAT3Cast_STAT3Cast*PP1 - kr11*PP1_STAT3Cast_STAT3Cast); R25 is "PP1-STAT3C dimer complex formation";
  STAT3C_dimer_phosphorylation: STAT3Cast_STAT3Cast => STAT3Nast_STAT3Nast; cytosol*k14*STAT3Cast_STAT3Cast;
  PP1_STAT3C_dimer_dissociation: PP1_STAT3Cast_STAT3Cast => PP1 + STAT3C_STAT3Cast; cytosol*k12*PP1_STAT3Cast_STAT3Cast; PP1_STAT3C_dimer_dissociation is "PP1-STAT3C dimer dissociation";
  R28: x31 + SHP2 => x32; cytosol*(kf9*SHP2*x31 - kr9*x32); R28 is "Complex formation";
  SHP2_dephosphorylation: SHP2ast => SHP2; cytosol*Vm*SHP2ast/(Km + SHP2ast);
  R30: IL6_gp80_gp130_JAK_ast2_JAK -> IL6_gp80_gp130_JAK_ast2_SHP2ast; cytosol*(kf34*IL6_gp80_gp130_JAK_ast2_JAK - kr34*IL6_gp80_gp130_JAK_ast2_SHP2ast); R30 is "IL6-gp80-gp130-JAK-SHP2 phosphorylation";
  R31: STAT3Nast_STAT3Nast -> 2 STAT3Nast; nucleus*(kr8*STAT3Nast_STAT3Nast - kf8*STAT3Nast^2); R31 is "STAT3N dimer dissociation";
  R32: PP2 + STAT3Nast_STAT3Nast -> PP2_STAT3Nast_STAT3Nast; nucleus*(kf15*PP2*STAT3Nast_STAT3Nast - kr15*PP2_STAT3Nast_STAT3Nast); R32 is "PP2-STAT3N dimer complex formation";
  PP2_STAT3N_complex_formation: PP2 + STAT3Nast -> PP2_STAT3Nast; nucleus*(kf15*PP2*STAT3Nast - kr15*PP2_STAT3Nast); PP2_STAT3N_complex_formation is "PP2-STAT3N complex formation";
  R34: STAT3N_STAT3Nast -> STAT3N + STAT3Nast; nucleus*(kr13*STAT3N_STAT3Nast - kf13*STAT3Nast*STAT3N); R34 is "STAT3N dimer dissociation";
  PP2_STAT3N_dissociation: PP2_STAT3Nast => PP2 + STAT3N; nucleus*k16*PP2_STAT3Nast; PP2_STAT3N_dissociation is "PP2-STAT3N dissociation";
  PP2_STAT3N_dimer_dissociation: PP2_STAT3Nast_STAT3Nast => STAT3N_STAT3Nast + PP2; nucleus*k16*PP2_STAT3Nast_STAT3Nast; PP2_STAT3N_dimer_dissociation is "PP2-STAT3N dimer dissociation";
  SOCS3N_transcription: => Mrna_SOCS3N; nucleus*(k18a*STAT3Nast_STAT3Nast/(k18b + STAT3Nast_STAT3Nast));  // modifiers: STAT3Nast_STAT3Nast
  SOCS3_mRNA_translocation: Mrna_SOCS3N => Mrna_SOCS3C; nucleus*k19*Mrna_SOCS3N;
  SOCS3_mRNA_degradation: Mrna_SOCS3C => ; nucleus*k22*Mrna_SOCS3C;
  SOCS3_translation: => SOCS3; nucleus*k20*Mrna_SOCS3C;  // modifiers: Mrna_SOCS3C
  SOCS3_degradation: SOCS3 => ; cytosol*k23*SOCS3;
  R42: x32 => x33 + SOCS3; cytosol*k23*x32; R42 is "Complex dissociation";
  SHP2_Grb2_complex_formation: SHP2ast + Grb2 -> SHP2ast_Grb2; cytosol*(kf38*Grb2*SHP2ast - kr38*SHP2ast_Grb2); SHP2_Grb2_complex_formation is "SHP2-Grb2 complex formation";
  Grb2_SOS_dissociation: Grb2_SOS -> SOS + Grb2; cytosol*(kf35*Grb2_SOS - kr35*Grb2*SOS); Grb2_SOS_dissociation is "Grb2-SOS dissociation";
  R45: IL6_gp80_gp130_JAK_ast2_SHP2ast + Grb2 -> x40; cytosol*(kf24*IL6_gp80_gp130_JAK_ast2_SHP2ast*Grb2 - kr24*x40); R45 is "Complex formation";
  R46: x40 + SOS -> x41; cytosol*(kf25*SOS*x40 - kr25*x41); R46 is "Complex formation";
  SHP2Grb2_SOS_complex_formation: SHP2ast_Grb2 + SOS -> SHP2ast_Grb2_SOS; cytosol*(kf40*SOS*SHP2ast_Grb2 - kr40*SHP2ast_Grb2_SOS); SHP2Grb2_SOS_complex_formation is "SHP2Grb2-SOS complex formation";
  R48: x41 + Ras_GDP -> x42; cytosol*(kf26*Ras_GDP*x41 - kr26*x42); R48 is "Complex formation";
  R49: x43 -> x41 + Ras_GDP; cytosol*(kf31*x43 - kr31*Ras_GDP*x41); R49 is "Complex dissociation";
  R50: x42 -> x41 + Ras_GTP; cytosol*(kf27*x42 - kr27*Ras_GTP*x41); R50 is "Complex dissociation";
  Ras_GTP_Raf_complex_formation: Raf + Ras_GTP -> Raf_Ras_GTP; cytosol*(kf28*Ras_GTP*Raf - kr28*Raf_Ras_GTP); Ras_GTP_Raf_complex_formation is "Ras-GTP-Raf complex formation";
  R52: IL6_gp80_gp130_JAK_ast2_SHP2ast + Grb2_SOS -> x41; cytosol*(kf41*Grb2_SOS*IL6_gp80_gp130_JAK_ast2_SHP2ast - kr41*x41); R52 is "Complex formation";
  SHP2_Grb2_SOS_dissociation: SHP2ast_Grb2_SOS -> SHP2ast + Grb2_SOS; cytosol*(kf33*SHP2ast_Grb2_SOS - kr33*Grb2_SOS*SHP2ast); SHP2_Grb2_SOS_dissociation is "SHP2-Grb2-SOS dissociation";
  R54: Ras_GTPast + x41 -> x43; cytosol*(kf30*Ras_GTPast*x41 - kr30*x43); R54 is "Complex formation";
  Raf_Phosp1_dissociation: Rafast_Phosp1 => Raf + Phosp1; cytosol*k43*Rafast_Phosp1; Raf_Phosp1_dissociation is "Raf-Phosp1 dissociation";
  Raf_Ras_GTP_dissociation: Raf_Ras_GTP -> Rafast + Ras_GTPast; cytosol*(kf29*Raf_Ras_GTP - kr29*Ras_GTPast*Rafast); Raf_Ras_GTP_dissociation is "Raf-Ras-GTP dissociation";
  Raf_Phosp1_complex_formation: Rafast + Phosp1 -> Rafast_Phosp1; cytosol*(kf42*Phosp1*Rafast - kr42*Rafast_Phosp1); Raf_Phosp1_complex_formation is "Raf-Phosp1 complex formation";
  MEK_Raf_complex_formation: MEK + Rafast -> MEK_Rafast; cytosol*(kf44*Rafast*MEK - kr44*MEK_Rafast); MEK_Raf_complex_formation is "MEK-Raf complex formation";
  MEK_Raf_complex_dissociation: MEK_Rafast => MEK_P + Rafast; cytosol*k45*MEK_Rafast; MEK_Raf_complex_dissociation is "MEK-Raf complex dissociation";
  MEK_P_Raf_complex_formation: MEK_P + Rafast -> MEK_P_Rafast; cytosol*(kf46*MEK_P*Rafast - kr46*MEK_P_Rafast); MEK_P_Raf_complex_formation is "MEK-P-Raf complex formation";
  MEK_P_Phosp2_dissociation: MEK_P_Phosp2 => Phosp2 + MEK; cytosol*k51*MEK_P_Phosp2; MEK_P_Phosp2_dissociation is "MEK-P-Phosp2 dissociation";
  MEK_PP_Phosp2_dissociation: MEK_PP_Phosp2 => Phosp2 + MEK_P; cytosol*k49*MEK_PP_Phosp2; MEK_PP_Phosp2_dissociation is "MEK-PP-Phosp2 dissociation";
  MEK_P_Phosp2_complex_formation: Phosp2 + MEK_P -> MEK_P_Phosp2; cytosol*(kf50*MEK_P*Phosp2 - kr50*MEK_P_Phosp2); MEK_P_Phosp2_complex_formation is "MEK-P-Phosp2 complex formation";
  MEK_P_Raf_complex_dissociation: MEK_P_Rafast => Rafast + MEK_PP; cytosol*k47*MEK_P_Rafast; MEK_P_Raf_complex_dissociation is "MEK-P-Raf complex dissociation";
  MEK_PP_Phosp2_complex_formation: Phosp2 + MEK_PP -> MEK_PP_Phosp2; cytosol*(kf48*MEK_PP*Phosp2 - kr48*MEK_PP_Phosp2); MEK_PP_Phosp2_complex_formation is "MEK-PP-Phosp2 complex formation";
  ERK_MEK_PP_complex_formation: ERK + MEK_PP -> ERK_MEK_PP; cytosol*(kf52*MEK_PP*ERK - kr52*ERK_MEK_PP); ERK_MEK_PP_complex_formation is "ERK-MEK-PP complex formation";
  ERK_MEK_PP_complex_dissociation: ERK_MEK_PP => ERK_P + MEK_PP; cytosol*k53*ERK_MEK_PP; ERK_MEK_PP_complex_dissociation is "ERK-MEK-PP complex dissociation";
  R68: ERK_P_MEK_PP -> ERK_P + MEK_PP; cytosol*(kr54*ERK_P_MEK_PP - kf54*MEK_PP*ERK_P); R68 is "ERK-P-MEK-PP complex dissociation";
  ERK_PP_formation: ERK_P_MEK_PP => ERK_PP + MEK_PP; cytosol*k55*ERK_P_MEK_PP; ERK_PP_formation is "ERK-PP formation";
  R70: ERK_P_Phosp3 => Phosp3 + ERK; cytosol*k59*ERK_P_Phosp3; R70 is "ERK-P-Phosp3 complex dissociation";
  ERK_PP_Phosp3_dissociation: ERK_PP_Phosp3 => Phosp3 + ERK_P; cytosol*k57*ERK_PP_Phosp3; ERK_PP_Phosp3_dissociation is "ERK-PP-Phosp3 dissociation";
  ERK_P_Phosp3_formation: Phosp3 + ERK_P -> ERK_P_Phosp3; cytosol*(kf58*ERK_P*Phosp3 - kr58*ERK_P_Phosp3); ERK_P_Phosp3_formation is "ERK-P-Phosp3 formation";
  ERK_PP_Phosp3_formation: Phosp3 + ERK_PP -> ERK_PP_Phosp3; cytosol*(kf56*ERK_PP*Phosp3 - kr56*ERK_PP_Phosp3); ERK_PP_Phosp3_formation is "ERK-PP-Phosp3 formation";

  // Unit definitions:
  unit substance = 1e-9 mole; substance is "nano mole";
end
