// SBML level 2 version 1

model testid()
  // Santolini2001_NOS
  // This is a model of neuronal Nitric Oxide Synthase expressed in Escherichia coli based on <a href = "http://www.ncbi.nlm.nih.gov/entrez/query.fcgi?cmd=Retrieve&db=pubmed&dopt=Abstract&list_uids=11038356"> Santolini J. et al. J Biol Chem. (2001) 276(2):1233-43</a>. The rates have been converted by 2x for every 10 degrees C. The original temperature was 10 degree C, cell temperature is assumed 30 degree C, so the conversion factor 4.
  // This model originates from BioModels Database: A Database of Annotated Published Models. It is copyright (c) 2005-2007 The BioModels Team.
  // For more information see the terms of use.

  // Compartments:
  compartment default_compartment = 1e-18;
  compartment geometry = 1.6667e-18;

  // Species:
  species NOS_slash_FeIII_NO in geometry = 0;
  species NOS_slash_FeII_minus_O2_a in geometry = 0;
  species NOS_slash_FeII_a in geometry = 0;
  species NOS_slash_FeIII_a in geometry = 0;
  species NOS_slash_CaM_minus_Ca4 in geometry = 0;
  species NOS_slash_L_minus_Arg in geometry = 100;
  species NOS_slash_FeIII in geometry = 0;
  species NOS_slash_FeII in geometry = 0;
  species NOS_slash_FeII_minus_O2 in geometry = 0;
  species NOS_slash_nNOS in geometry = 10;
  species NOS_slash_Ca_minus_CaM_nNOS in geometry = 0;
  species NOS_slash_O2 in geometry = 0.5;
  species NOS_slash_NO3 in geometry = 0;
  species NOS_slash_FeII_NO in geometry = 0;

  // Reactions:
  // kf*NOS_slash_FeII_minus_O2-kb*NOS_slash_FeIII_a
  // rates from Stuehr et al., 2001, JBC, 276(2):1233-1243 rates increased by 2X for every 10 C rise, to get it ot the cell temp.. (thru personal correspondence) kf 104
  NOS_slash_k3: NOS_slash_FeII_minus_O2 -> NOS_slash_FeIII_a; NOS_slash_k3_kf*NOS_slash_FeII_minus_O2 - NOS_slash_k3_kb*NOS_slash_FeIII_a;
    NOS_slash_k3_kf = 1.733333e-16 vol_secINV; NOS_slash_k3_kb = 0 vol_secINV;
  // kf*NOS_slash_FeII_minus_O2_a-kb*NOS_slash_FeIII_NO
  // rates from Stuehr et al., 2001, JBC, 276(2): 1233-1243 The transformation rate of FeII-O2_a to FeIII_NO was 26 /s. rates increased by 2X for every 10 C to get it to the cell temp... (thru personal correspondence) kf -- 104
  NOS_slash_k6: NOS_slash_FeII_minus_O2_a -> NOS_slash_FeIII_NO; NOS_slash_k6_kf*NOS_slash_FeII_minus_O2_a - NOS_slash_k6_kb*NOS_slash_FeIII_NO;
    NOS_slash_k6_kf = 1.733333e-16 vol_secINV; NOS_slash_k6_kb = 0 vol_secINV;
  // kf*NOS_slash_FeII_a-kb*NOS_slash_FeII_minus_O2_a
  // rates from Stuehr et al., 2001, JBC, 276(2):1233-1243 rates increased by 2X for every 10 C rise to get it to the cell temp.. (thru personal correspondence) kf -- 3.6
  NOS_slash_k5: NOS_slash_FeII_a -> NOS_slash_FeII_minus_O2_a; NOS_slash_k5_kf*NOS_slash_FeII_a - NOS_slash_k5_kb*NOS_slash_FeII_minus_O2_a;
    NOS_slash_k5_kf = 6e-18 vol_secINV; NOS_slash_k5_kb = 0 vol_secINV;
  // kf*NOS_slash_nNOS*NOS_slash_CaM_minus_Ca4-kb*NOS_slash_Ca_minus_CaM_nNOS
  // Those binding CaM have a high Kd, including nNOS, ~ <= 10 nM. The binding of CaM to NOS has been demonstrated to act as the trigger necessary for electron transfer and catalytic activity. (Marletta, 1997;36;12337-12345)
  NOS_slash_Ca_minus_CaMbind_minus_nNOS: NOS_slash_nNOS + NOS_slash_CaM_minus_Ca4 -> NOS_slash_Ca_minus_CaM_nNOS; NOS_slash_Ca_minus_CaMbind_minus_nNOS_kf*NOS_slash_nNOS*NOS_slash_CaM_minus_Ca4 - NOS_slash_Ca_minus_CaMbind_minus_nNOS_kb*NOS_slash_Ca_minus_CaM_nNOS;
    NOS_slash_Ca_minus_CaMbind_minus_nNOS_kf = 5.416667e-18 vol_uMINVsecINV; NOS_slash_Ca_minus_CaMbind_minus_nNOS_kb = 8.333333e-20 vol_secINV;
  // kf*NOS_slash_L_minus_Arg*NOS_slash_Ca_minus_CaM_nNOS-kb*NOS_slash_FeIII
  // from Stuehr et al., Biochem, 1999, 38(38):12446-12451. Rates used as it is from results.
  NOS_slash_arg_bind_nNOS: NOS_slash_L_minus_Arg + NOS_slash_Ca_minus_CaM_nNOS -> NOS_slash_FeIII; NOS_slash_arg_bind_nNOS_kf*NOS_slash_L_minus_Arg*NOS_slash_Ca_minus_CaM_nNOS - NOS_slash_arg_bind_nNOS_kb*NOS_slash_FeIII;
    NOS_slash_arg_bind_nNOS_kf = 8.333333e-19 vol_uMINVsecINV; NOS_slash_arg_bind_nNOS_kb = 1.35e-16 vol_secINV;
  // kf*NOS_slash_FeII-kb*NOS_slash_FeII_minus_O2
  // rates from Stuehr et al., 2001, JBC, 276(2):1233-1243 rates increased by 2X for every 10 C rise, to get it ot the cell temp.. (thru personal correspondence) kf -- 3.6
  NOS_slash_k2: NOS_slash_FeII -> NOS_slash_FeII_minus_O2; NOS_slash_k2_kf*NOS_slash_FeII - NOS_slash_k2_kb*NOS_slash_FeII_minus_O2;
    NOS_slash_k2_kf = 6e-18 vol_secINV; NOS_slash_k2_kb = 0 vol_secINV;
  // kf*NOS_slash_FeIII-kb*NOS_slash_FeII
  // rates from Stuehr et al., 2001, JBC, 276(2):1233-1243. All the rates increased by 2X for every 10 C rise to get it to the cell temp.. (thru personal correspondence) kf -- 10.4
  NOS_slash_k1: NOS_slash_FeIII -> NOS_slash_FeII; NOS_slash_k1_kf*NOS_slash_FeIII - NOS_slash_k1_kb*NOS_slash_FeII;
    NOS_slash_k1_kf = 1.733333e-17 vol_secINV; NOS_slash_k1_kb = 0 vol_secINV;
  // kf*NOS_slash_FeIII_NO-kb*NOS_slash_FeIII
  // rates from Stuehr et al., JBC, 2001; 276(2): 1233-1243. rates increased by 2X for every 10 C rise, to get it ot the cell temp.. (thru personal correspondence) kf -- 20
  NOS_slash_kF: NOS_slash_FeIII_NO -> NOS_slash_FeIII; NOS_slash_kF_kf*NOS_slash_FeIII_NO - NOS_slash_kF_kb*NOS_slash_FeIII;
    NOS_slash_kF_kf = 3.333333e-17 vol_secINV; NOS_slash_kF_kb = 0 vol_secINV;
  // kf*NOS_slash_FeIII_NO-kb*NOS_slash_FeII_NO
  // rates from Stuehr et al., 2001, JBC, 276(2): 1233-1243.. rates increased by 2X for every 10 C rise, to get it to the cell temp.. (thru personal correspondence) kf -- 10.4
  NOS_slash_kG: NOS_slash_FeIII_NO -> NOS_slash_FeII_NO; NOS_slash_kG_kf*NOS_slash_FeIII_NO - NOS_slash_kG_kb*NOS_slash_FeII_NO;
    NOS_slash_kG_kf = 1.733333e-17 vol_secINV; NOS_slash_kG_kb = 0 vol_secINV;
  // kf*NOS_slash_FeII_NO-kb*NOS_slash_FeII
  // rates from Stuehr et al., 2001, JBC 276(2): 1233-1243.. rates increased by 2X for every 10 C rise, to get it to the cell temp.. (thru personal correspondence) kf -- 0.0004
  NOS_slash_k9: NOS_slash_FeII_NO -> NOS_slash_FeII; NOS_slash_k9_kf*NOS_slash_FeII_NO - NOS_slash_k9_kb*NOS_slash_FeII;
    NOS_slash_k9_kf = 6.666667e-22 vol_secINV; NOS_slash_k9_kb = 0 vol_secINV;
  // kf*NOS_slash_FeII_NO*NOS_slash_O2-kb*NOS_slash_FeIII*NOS_slash_NO3
  // The rates were obtained from Stuehr et al, JBC 2001, 276(2): 1233-1243.... The rates are multiplied by 2X for every 10 C rise, to get it to the cell temp. kf -- 0.0052
  NOS_slash_k10: NOS_slash_FeII_NO + NOS_slash_O2 -> NOS_slash_FeIII + NOS_slash_NO3; NOS_slash_k10_kf*NOS_slash_FeII_NO*NOS_slash_O2 - NOS_slash_k10_kb*NOS_slash_FeIII*NOS_slash_NO3;
    NOS_slash_k10_kf = 2e-18 vol_uMINVsecINV; NOS_slash_k10_kb = 0 vol_uMINVsecINV;
  // kf*NOS_slash_FeIII_a-kb*NOS_slash_FeII_a
  // rates from Stuehr et al., 2001, JBC, 276(2):1233-1243 rates increased by 2X for every 10 C rise to get it to the cell temp.. (thru personal correspondence) kf -- 10.4
  NOS_slash_k4: NOS_slash_FeIII_a -> NOS_slash_FeII_a; NOS_slash_k4_kf*NOS_slash_FeIII_a - NOS_slash_k4_kb*NOS_slash_FeII_a;
    NOS_slash_k4_kf = 1.733333e-17 vol_secINV; NOS_slash_k4_kb = 0 vol_secINV;

  // Unit definitions:
  unit vol_secINV = litre / second;
  unit vol_uMINVsecINV = litre^2 / (1e-6 mole * second);
  unit substance = 1e-6 mole;
end
