// SBML level 2 version 1

model testid()
  // Stone1996_NOsGC
  // This features the two step binding of NO to soluble Guanylyl Cyclase as proposed by <a href = "http://www.ncbi.nlm.nih.gov/entrez/query.fcgi?cmd=Retrieve&amp;db=pubmed&amp;dopt=Abstract&amp;list_uids=8573563">Stone JR, Marletta MA. Biochemistry (1996) 35(4):1093-9</a>. There is a fast step binding scheme and a slow step binding scheme. The difference lies in the binding of a NO to a non-heme site on sGC, which may not necessarily be the same site of binding during the initial binding. The rates have been directly used models.
  // This model originates from BioModels Database: A Database of Annotated Published Models. It is copyright (c) 2005-2007 The BioModels Team.
  // For more information see the terms of use.

  // Compartments:
  compartment default_compartment = 1e-18;
  compartment geometry = 1.6667e-18;

  // Species:
  species sGC_slash_GTP in geometry = 10;
  species sGC_slash_NO_dot_sGCfast in geometry = 0;
  species sGC_slash_NO_dot_SGC_6coord in geometry = 0;
  species sGC_slash_sGCfast in geometry = 3;
  species sGC_slash_NO_dot_sGC_5coord in geometry = 0;
  species sGC_slash_sGCtot_slash_kenz_slash_kenz_cplx in geometry = 0;
  species sGC_slash_NO_dot_sGC5accord in geometry = 0;
  species sGC_slash_nonhemebind_int in geometry = 0;
  species sGC_slash_NO_dot_sGC6coord in geometry = 0;
  species sGC_slash_NO_dot_sGCslow in geometry = 0;
  species sGC_slash_sGCslow in geometry = 3;
  species sGC_slash_cGMP in geometry = 0;
  species sGC_slash_NO in geometry = 0;
  species sGC_slash_sGCtot in geometry;

  // Assignment rules:
  sGC_slash_sGCtot := sGC_slash_NO_dot_sGC_5coord + sGC_slash_NO_dot_sGC5accord;

  // Reactions:
  // kf*sGC_slash_sGCfast*sGC_slash_NO-kb*sGC_slash_NO_dot_sGCfast
  // This is the fast binding of NO to sGC, subsequently activating it, as proposed by Stone and Marletta. Rates of these binding reactions used directly from Stone and Marletta,1996, Biochemistry, 35(4):1093-1099, based on whose paper this model is made. Rates obtained from stopped flow kinetics detailed in paper.
  sGC_slash_NO_bind_sGCfast: sGC_slash_sGCfast + sGC_slash_NO -> sGC_slash_NO_dot_sGCfast; sGC_slash_NO_bind_sGCfast_kf*sGC_slash_sGCfast*sGC_slash_NO - sGC_slash_NO_bind_sGCfast_kb*sGC_slash_NO_dot_sGCfast;
    sGC_slash_NO_bind_sGCfast_kf = 1.166667e-15 vol_uMINVsecINV; sGC_slash_NO_bind_sGCfast_kb = 1.333333e-15 vol_secINV;
  // kf*sGC_slash_NO_dot_sGCfast-kb*sGC_slash_NO_dot_SGC_6coord
  // Rates used directly from Stone and Marletta,1996,Biochemistry, 35(4):1093-1099.
  sGC_slash_form_6coord: sGC_slash_NO_dot_sGCfast -> sGC_slash_NO_dot_SGC_6coord; sGC_slash_form_6coord_kf*sGC_slash_NO_dot_sGCfast - sGC_slash_form_6coord_kb*sGC_slash_NO_dot_SGC_6coord;
    sGC_slash_form_6coord_kf = 1.416667e-15 vol_secINV; sGC_slash_form_6coord_kb = 0 vol_secINV;
  // kf*sGC_slash_NO_dot_SGC_6coord-kb*sGC_slash_NO_dot_sGC_5coord
  // Rates used directly from Stone and Marletta,1996,Biochemistry, 35(4):1093-1099.
  sGC_slash_act_sGCfast: sGC_slash_NO_dot_SGC_6coord -> sGC_slash_NO_dot_sGC_5coord; sGC_slash_act_sGCfast_kf*sGC_slash_NO_dot_SGC_6coord - sGC_slash_act_sGCfast_kb*sGC_slash_NO_dot_sGC_5coord;
    sGC_slash_act_sGCfast_kf = 3.333333e-17 vol_secINV; sGC_slash_act_sGCfast_kb = 3.333333e-19 vol_secINV;
  // kf*sGC_slash_nonhemebind_int-kb*sGC_slash_NO_dot_sGC5accord
  // Rates used directly from Stone and Marletta,1996, Biochemistry, 35(4):1093-1099.
  sGC_slash_act_sGCslow: sGC_slash_nonhemebind_int -> sGC_slash_NO_dot_sGC5accord; sGC_slash_act_sGCslow_kf*sGC_slash_nonhemebind_int - sGC_slash_act_sGCslow_kb*sGC_slash_NO_dot_sGC5accord;
    sGC_slash_act_sGCslow_kf = 2.666667e-18 vol_secINV; sGC_slash_act_sGCslow_kb = 3.333333e-20 vol_secINV;
  // kf*sGC_slash_NO_dot_sGC6coord*sGC_slash_NO-kb*sGC_slash_nonhemebind_int
  // This step is the one that differs from the fast reaction scheme, as reported by Stone and Marletta. Here the reaction is dependent upon the binding of NO to an unidentified non-heme site on the protein. Rates used directly from Stone and Marletta,1996, Biochemistry, 35(4):1093-1099.
  sGC_slash_NObindnonheme: sGC_slash_NO_dot_sGC6coord + sGC_slash_NO -> sGC_slash_nonhemebind_int; sGC_slash_NObindnonheme_kf*sGC_slash_NO_dot_sGC6coord*sGC_slash_NO - sGC_slash_NObindnonheme_kb*sGC_slash_nonhemebind_int;
    sGC_slash_NObindnonheme_kf = 8.333333e-18 vol_uMINVsecINV; sGC_slash_NObindnonheme_kb = 4.166667e-17 vol_secINV;
  // kf*sGC_slash_NO_dot_sGCslow-kb*sGC_slash_NO_dot_sGC6coord
  // Rates used directly from Stone and Marletta,1996, Biochemistry, 35(4):1093-1099.
  sGC_slash_form6coord: sGC_slash_NO_dot_sGCslow -> sGC_slash_NO_dot_sGC6coord; sGC_slash_form6coord_kf*sGC_slash_NO_dot_sGCslow - sGC_slash_form6coord_kb*sGC_slash_NO_dot_sGC6coord;
    sGC_slash_form6coord_kf = 1.416667e-15 vol_secINV; sGC_slash_form6coord_kb = 0 vol_secINV;
  // kf*sGC_slash_sGCslow*sGC_slash_NO-kb*sGC_slash_NO_dot_sGCslow
  // This is the slow binding of NO to sGC, as reported by Stone and Marletta,1996, Biochemistry, 35(4):1093-1099. The rates shown have been used directly from their data from stopped kinetics.
  sGC_slash_NO_bind_sGCslow: sGC_slash_sGCslow + sGC_slash_NO -> sGC_slash_NO_dot_sGCslow; sGC_slash_NO_bind_sGCslow_kf*sGC_slash_sGCslow*sGC_slash_NO - sGC_slash_NO_bind_sGCslow_kb*sGC_slash_NO_dot_sGCslow;
    sGC_slash_NO_bind_sGCslow_kf = 1.166667e-15 vol_uMINVsecINV; sGC_slash_NO_bind_sGCslow_kb = 1.333333e-15 vol_secINV;
  // k1*sGC_slash_GTP*sGC_slash_sGCtot-k2*sGC_slash_sGCtot_slash_kenz_slash_kenz_cplx
  // The range of estimates found in the literature are: Km -> 40 - 150 uM (without NO) 20 - 40 uM (with NO) Vmax -> 10 - 100 nmol/mg/min (wihtout NO) 10 - 40 umol/mg/min (with NO). ----- thru personal correspondence from T. Bellamy, Wolfson Ins. for Biomedical Sciences, UK. NO increases the Vmax of sGC by 100-200 fold, and it has been proposed that this activation occurs subsequent to the binding of NO toa heme moiety on the enzyme. (Stone and Marletta,1995, Biochemistry,34:14668-14674).
  sGC_slash_sGCtot_slash_kenz_1: sGC_slash_GTP -> sGC_slash_sGCtot_slash_kenz_slash_kenz_cplx; k1*sGC_slash_GTP*sGC_slash_sGCtot - k2*sGC_slash_sGCtot_slash_kenz_slash_kenz_cplx;  // modifiers: sGC_slash_sGCtot
    k1 = 1.052083e-17 vol_uMINVsecINV; k2 = 1.683333e-16 vol_secINV;
  // k3*sGC_slash_sGCtot_slash_kenz_slash_kenz_cplx
  sGC_slash_sGCtot_slash_kenz_2: sGC_slash_sGCtot_slash_kenz_slash_kenz_cplx => sGC_slash_cGMP; k3*sGC_slash_sGCtot_slash_kenz_slash_kenz_cplx;
    k3 = 4.208333e-17 vol_secINV;

  // Unit definitions:
  unit vol_secINV = litre / second;
  unit vol_uMINVsecINV = litre^2 / (1e-6 mole * second);
  unit substance = 1e-6 mole;
end
