// SBML level 2 version 1

model testid()
  // Mahaney2000_SERCA
  // All the constants are from: <br"> <a href = "http://www.ncbi.nlm.nih.gov/entrez/query.fcgi?cmd=Retrieve&db=pubmed&dopt=Abstract&list_uids=10692318 > Mahaney JE. et al. Biophys J. (2000) 78(3) 1306-23</a>.<br>New Insights on cardiac Ca-ATPase (expressed in Sf21 cells) regulation Phosphlamban.
  // This model originates from BioModels Database: A Database of Annotated Published Models. It is copyright (c) 2005-2007 The BioModels Team.
  // For more information see the terms of use.

  // Compartments:
  compartment default_compartment = 1e-18;
  compartment geometry = 1.6667e-18;

  // Species:
  species E1 in geometry = 0;
  species E2 in geometry = 0.1509;
  species MgATP in geometry = 1;
  species ADP in geometry = 0;
  species pi in geometry = 0;
  species CaE1 in geometry = 0;
  species EP in geometry = 0;
  species EPi in geometry = 0;
  species CaE1_prime in geometry = 0;
  species Ca2E1_prime in geometry = 0;
  species CaE1_prime_ATP in geometry = 0;
  // For simulation of EP formation and Pi liberation time couse at various [ca2+] the concentrations were obtained from the literature source Mahaney et al. Biophysical Journal 78(3) 1306-1323 ******************************************************************** In case of EP decomposition after phosphorylation with 1uM ATP for 30s at 0 deg centigrade. At 30s 5mM EGTA (final conc) was added to the reaction mixture to remove all traces of ionized Ca2+ form the reaction mixture and thus to reduced the ionized [Ca2+]. Actual concentration of left over calcium was calculated using EGTA - Free Calcium concentration calculator - a web based program by entering the experimental constants furnished in the literature source Mahaney et al Biophysical Journal 78(3) 1306-1323. Calculator program can be found at:- http://www.stanford.edu/~cpatton/webmaxclitel15.htm ************************************************************
  species $Ca in geometry = 0.268;

  // Reactions:
  // kf*CaE1_prime_ATP-kb*EP*ADP
  // kf and kb were directly taken from the table-6 literature source Mahaney et al. Biophysical Journal 1306-1323.
  reac6: CaE1_prime_ATP -> EP + ADP; reac6_kf*CaE1_prime_ATP - reac6_kb*EP*ADP;
    reac6_kf = 5.833333e-17 vol_secINV; reac6_kb = 0 vol_uMINVsecINV;
  // kf*EP-kb*EPi
  // kf and kb were taken from the literature source Mahaney et al. Biophysical Journal 78(3) 1206-1323. Some minor adjustments for steps 7 and 8 were required to prduce a precise simulation of the EP formation and Pi liberation time course
  reac7: EP -> EPi; reac7_kf*EP - reac7_kb*EPi;
    reac7_kf = 5e-19 vol_secINV; reac7_kb = 1.166667e-18 vol_secINV;
  // kf*EPi-kb*pi*E2
  // kf and kb were taken from the literature source Mahaney et al. Biophysical Journal 78(3) 1306-1323. some minor adjustments for step7 and step8 were required to produce a precise simulation of the EP formation and Pi liberation time course as claimed by the author of literature.
  reac8: EPi -> pi + E2; reac8_kf*EPi - reac8_kb*pi*E2;
    reac8_kf = 6.666667e-19 vol_secINV; reac8_kb = 0 vol_uMINVsecINV;
  // kf*E1*Ca-kb*CaE1
  // Kinetic constants for this step had substantial effects on the steady state EP level. For SERCA2a alone the kf was 200uM SERCA2a + Wild type Phospholamban kf was reduced to 100uM SERCA2a + L37A Phospholamban kf was reduced to 50um as specified by the author (Mahaney et al Biophysical Journal 78(3) 1320 ). kb in all the cases were maintained 120.
  reac2: E1 + $Ca -> CaE1; reac2_kf*E1*Ca - reac2_kb*CaE1;
    reac2_kf = 8.333333e-17 vol_uMINVsecINV; reac2_kb = 2e-16 vol_secINV;
  // kf*E2-kb*E1
  // kf and kb are the picked up from the table-6 of Mahaney et al Biophysical Journal 1306-1323.
  reac1: E2 -> E1; reac1_kf*E2 - reac1_kb*E1;
    reac1_kf = 5.833333e-19 vol_secINV; reac1_kb = 5.833333e-19 vol_secINV;
  // kf*CaE1-kb*CaE1_prime
  // kf and kb were taken form table-6 leterature source (Mahaney et al Biophysical journal 78(3)
  reac3: CaE1 -> CaE1_prime; reac3_kf*CaE1 - reac3_kb*CaE1_prime;
    reac3_kf = 6.666667e-19 vol_secINV; reac3_kb = 6.666667e-19 vol_secINV;
  // kf*CaE1_prime*Ca-kb*Ca2E1_prime
  // kf and kb were taken for the table - 6 literature source Mahaney et al Biophysical Journal 1306-1323.
  reac4: CaE1_prime + $Ca -> Ca2E1_prime; reac4_kf*CaE1_prime*Ca - reac4_kb*Ca2E1_prime;
    reac4_kf = 1.333333e-16 vol_uMINVsecINV; reac4_kb = 5.333333e-18 vol_secINV;
  // kf*Ca2E1_prime*MgATP-kb*CaE1_prime_ATP
  // kf and kb were taken from Mahaney et al Biophysical Journal 1306-1323.
  reac5: Ca2E1_prime + MgATP -> CaE1_prime_ATP; reac5_kf*Ca2E1_prime*MgATP - reac5_kb*CaE1_prime_ATP;
    reac5_kf = 6.666667e-18 vol_uMINVsecINV; reac5_kb = 0 vol_secINV;

  // Unit definitions:
  unit vol_secINV = litre / second;
  unit vol_uMINVsecINV = litre^2 / (1e-6 mole * second);
  unit substance = 1e-6 mole;
end
