// SBML level 2 version 1

model testid()
  // Görlich2003_RanGTPase
  // This model represents a concentration gradient of RanGTP across the nuclear envelope. This gradient is generated by distribution of regulators of RanGTPase. We have taken a log linear plot of graphs generated by GENESIS and compared with the experimental graphs.
  // This model originates from BioModels Database: A Database of Annotated Published Models. It is copyright (c) 2005-2007 The BioModels Team.
  // For more information see the terms of use.

  // Compartments:
  compartment default_compartment = 1e-18;
  compartment geo_nuc = 1.2e-11;
  compartment geo_cyt = 1.8e-11;

  // Species:
  species Nucleus_slash_GDP_dot_Ran_minus_nuclear in geo_nuc = 0;
  species Nucleus_slash_RCC1_minus_GDP_dot_Ran in geo_nuc = 0;
  species Nucleus_slash_GDP in geo_nuc = 0;
  species Nucleus_slash_RCC1 in geo_nuc = 0.6999958;
  species Nucleus_slash_RCC1_minus_RanGTP in geo_nuc = 0;
  species Nucleus_slash_RCC1_minus_Ran in geo_nuc = 0;
  species Nucleus_slash_GTP in geo_nuc = 500.0069;
  species Nucleus_slash_GTP_dot_Ran_minus_nuclear in geo_nuc = 0;
  species Nucleus_slash_nuclear_minus_NTF2_minus_GDP_dot_Ran in geo_nuc = 0;
  species Cytoplasm_slash_RanGAP in geo_cyt = 0.7;
  species Cytoplasm_slash_RanGAP_slash_RanGAP_slash_RanGAP_cplx in geo_cyt = 0;
  species Cytoplasm_slash_RanGAP_slash_RanGAP_sbo_1_sbc__slash_RanGAP_sbo_1_sbc__cplx in geo_cyt = 0;
  species Cytoplasm_slash_RanBP1 in geo_cyt = 2;
  species Cytoplasm_slash_GTP_dot_Ran_minus_cytoplasmic in geo_cyt = 0;
  species Cytoplasm_slash_RanBP1_dot_RanGTP in geo_cyt = 0;
  species Cytoplasm_slash_NTF2_minus_GDP_dot_Ran in geo_cyt = 0;
  species Cytoplasm_slash_GDP_dot_Ran_minus_cytoplasmic in geo_cyt = 5;
  // NTF2: Nuclear Transport Factor 2 dimers Cytoplasmic volume = 1.8 pL = 1.8e-15 m^3 Total cellular concentration of NTF2 dimers = 0.3 uM Table II footnote Gorlich D et al (2003) EMBO J 22(5):1088-1100 Since it is the total cellular conc. the pool buffered
  species $Cytoplasm_slash_NTF2 in geo_cyt = 0.3;

  // Reactions:
  // kf*Nucleus_slash_nuclear_minus_NTF2_minus_GDP_dot_Ran-kb*Nucleus_slash_GDP_dot_Ran_minus_nuclear*Cytoplasm_slash_NTF2
  // Approximation of reaction rates to match the kinetics described by Gorlich D et al (2003) EMBO 22(5):1088-1100
  Nucleus_slash_NTF2_dissociation_sbo_1_sbc_: Nucleus_slash_nuclear_minus_NTF2_minus_GDP_dot_Ran -> Nucleus_slash_GDP_dot_Ran_minus_nuclear + $Cytoplasm_slash_NTF2; Nucleus_slash_NTF2_dissociation_sbo_1_sbc__kf*Nucleus_slash_nuclear_minus_NTF2_minus_GDP_dot_Ran - Nucleus_slash_NTF2_dissociation_sbo_1_sbc__kb*Nucleus_slash_GDP_dot_Ran_minus_nuclear*Cytoplasm_slash_NTF2;
    Nucleus_slash_NTF2_dissociation_sbo_1_sbc__kf = 5.75992e-12 vol_secINV; Nucleus_slash_NTF2_dissociation_sbo_1_sbc__kb = 5.399968e-13 vol_uMINVsecINV;
  // kf*Nucleus_slash_GDP_dot_Ran_minus_nuclear*Nucleus_slash_RCC1-kb*Nucleus_slash_RCC1_minus_GDP_dot_Ran
  // Binding of GDP-Ran complex with RCC1 Kf = 7.4e+07 /M/sec = 7.4e+01 /uM/sec Kb = 55 /sec <a href = "http://www.ncbi.nlm.nih.gov/entrez/query.fcgi?cmd=Retrieve&db=pubmed&dopt=Abstract&list_uids=7548002&query_hl=12&itool=pubmed_docsum">Christian Klebe et al (1995) Biochemistry 34:12543-12552 </a>. Supplementary Table A Gorlich D et al (2003) EMBO J 22(5):1088-1100
  Nucleus_slash_RCC1_binding: Nucleus_slash_GDP_dot_Ran_minus_nuclear + Nucleus_slash_RCC1 -> Nucleus_slash_RCC1_minus_GDP_dot_Ran; Nucleus_slash_RCC1_binding_kf*Nucleus_slash_GDP_dot_Ran_minus_nuclear*Nucleus_slash_RCC1 - Nucleus_slash_RCC1_binding_kb*Nucleus_slash_RCC1_minus_GDP_dot_Ran;
    Nucleus_slash_RCC1_binding_kf = 8.879945e-10 vol_uMINVsecINV; Nucleus_slash_RCC1_binding_kb = 6.599908e-10 vol_secINV;
  // kf*Nucleus_slash_RCC1_minus_GDP_dot_Ran-kb*Nucleus_slash_RCC1_minus_Ran*Nucleus_slash_GDP
  // Release of GDP from the GDP-Ran complex with RCC1 Kf = 21 /sec Kb = 1.1e+07 /M/sec = 1.1e+01 /uM/sec <a href = "http://www.ncbi.nlm.nih.gov/entrez/query.fcgi?cmd=Retrieve&db=pubmed&dopt=Abstract&list_uids=7548002&query_hl=12&itool=pubmed_docsum">Christian Klebe et al (1995) Biochemistry 34:12543-12552 </a>. Supplementary Table A Gorlich D et al (2003) EMBO 22(5):1088-1100
  Nucleus_slash_GDP_dissociation: Nucleus_slash_RCC1_minus_GDP_dot_Ran -> Nucleus_slash_RCC1_minus_Ran + Nucleus_slash_GDP; Nucleus_slash_GDP_dissociation_kf*Nucleus_slash_RCC1_minus_GDP_dot_Ran - Nucleus_slash_GDP_dissociation_kb*Nucleus_slash_RCC1_minus_Ran*Nucleus_slash_GDP;
    Nucleus_slash_GDP_dissociation_kf = 2.519965e-10 vol_secINV; Nucleus_slash_GDP_dissociation_kb = 1.319983e-10 vol_uMINVsecINV;
  // kf*Nucleus_slash_RCC1_minus_Ran*Nucleus_slash_GTP-kb*Nucleus_slash_RCC1_minus_RanGTP
  // Binding of GTP to GDP free Ran-RCC1 complex Kf = 0.6e+06 /M/sec = 0.6 /uM/sec Kb = 19 /sec <a href = "http://www.ncbi.nlm.nih.gov/entrez/query.fcgi?cmd=Retrieve&db=pubmed&dopt=Abstract&list_uids=7548002&query_hl=12&itool=pubmed_docsum">Christian Klebe et al (1995) Biochemistry 34:12543-12552 </a>. Supplementary Table A Gorlich D et al (2003) EMBO 22(5):1088-1100
  Nucleus_slash_GTP_binding: Nucleus_slash_RCC1_minus_Ran + Nucleus_slash_GTP -> Nucleus_slash_RCC1_minus_RanGTP; Nucleus_slash_GTP_binding_kf*Nucleus_slash_RCC1_minus_Ran*Nucleus_slash_GTP - Nucleus_slash_GTP_binding_kb*Nucleus_slash_RCC1_minus_RanGTP;
    Nucleus_slash_GTP_binding_kf = 7.199858e-12 vol_uMINVsecINV; Nucleus_slash_GTP_binding_kb = 2.279968e-10 vol_secINV;
  // kf*Nucleus_slash_RCC1_minus_RanGTP-kb*Nucleus_slash_GTP_dot_Ran_minus_nuclear*Nucleus_slash_RCC1
  // Release of GTP.Ran from GTP.Ran-RCC1 complex Kf = 55 /sec Kb = 1.0e+08 /M/sec = 1.0e+02 /uM/sec <a href = "http://www.ncbi.nlm.nih.gov/entrez/query.fcgi?cmd=Retrieve&db=pubmed&dopt=Abstract&list_uids=7548002&query_hl=12&itool=pubmed_docsum">Christian Klebe et al (1995) Biochemistry 34:12543-12552 </a>. Supplementary Table A Gorlich D et al (2003) EMBO 22(5):1088-1100
  Nucleus_slash_GTP_dot_Ran_release: Nucleus_slash_RCC1_minus_RanGTP -> Nucleus_slash_GTP_dot_Ran_minus_nuclear + Nucleus_slash_RCC1; Nucleus_slash_GTP_dot_Ran_release_kf*Nucleus_slash_RCC1_minus_RanGTP - Nucleus_slash_GTP_dot_Ran_release_kb*Nucleus_slash_GTP_dot_Ran_minus_nuclear*Nucleus_slash_RCC1;
    Nucleus_slash_GTP_dot_Ran_release_kf = 6.599908e-10 vol_secINV; Nucleus_slash_GTP_dot_Ran_release_kb = 1.199976e-9 vol_uMINVsecINV;
  // kf*Nucleus_slash_GTP_dot_Ran_minus_nuclear-kb*Cytoplasm_slash_GTP_dot_Ran_minus_cytoplasmic
  // Approximation to achieve Cytoplasmic transfer as per kinetics described by Gorlich D et al (2003) EMBO 22(5):1088-1100
  Cytoplasmic_transfer: Nucleus_slash_GTP_dot_Ran_minus_nuclear -> Cytoplasm_slash_GTP_dot_Ran_minus_cytoplasmic; Cytoplasmic_transfer_kf*Nucleus_slash_GTP_dot_Ran_minus_nuclear - Cytoplasmic_transfer_kb*Cytoplasm_slash_GTP_dot_Ran_minus_cytoplasmic;
    Cytoplasmic_transfer_kf = 9.599867e-13 vol_secINV; Cytoplasmic_transfer_kb = 2.34e-11 vol_secINV;
  // kf*Cytoplasm_slash_NTF2_minus_GDP_dot_Ran-kb*Nucleus_slash_nuclear_minus_NTF2_minus_GDP_dot_Ran
  // Approximation to achieve Nucleoplasmic transfer as per kinetics described by Gorlich D et al (2003) EMBO 22(5):1088-1100
  Nucleoplasmic_transfer: Cytoplasm_slash_NTF2_minus_GDP_dot_Ran -> Nucleus_slash_nuclear_minus_NTF2_minus_GDP_dot_Ran; Nucleoplasmic_transfer_kf*Cytoplasm_slash_NTF2_minus_GDP_dot_Ran - Nucleoplasmic_transfer_kb*Nucleus_slash_nuclear_minus_NTF2_minus_GDP_dot_Ran;
    Nucleoplasmic_transfer_kf = 1.8e-7 vol_secINV; Nucleoplasmic_transfer_kb = 1.199983e-12 vol_secINV;
  // kf*Cytoplasm_slash_NTF2_minus_GDP_dot_Ran-kb*Cytoplasm_slash_NTF2*Nucleus_slash_GDP_dot_Ran_minus_nuclear
  // Approximation of rates to match the kinetics described by Gorlich D et al (2003) EMBO 22(5):1088-1100
  Cytoplasm_slash_NTF2_dissociation: Cytoplasm_slash_NTF2_minus_GDP_dot_Ran -> $Cytoplasm_slash_NTF2 + Nucleus_slash_GDP_dot_Ran_minus_nuclear; Cytoplasm_slash_NTF2_dissociation_kf*Cytoplasm_slash_NTF2_minus_GDP_dot_Ran - Cytoplasm_slash_NTF2_dissociation_kb*Cytoplasm_slash_NTF2*Nucleus_slash_GDP_dot_Ran_minus_nuclear;
    Cytoplasm_slash_NTF2_dissociation_kf = 8.64e-12 vol_secINV; Cytoplasm_slash_NTF2_dissociation_kb = 3.599979e-13 vol_uMINVsecINV;
  // kf*Cytoplasm_slash_NTF2*Cytoplasm_slash_GDP_dot_Ran_minus_cytoplasmic-kb*Cytoplasm_slash_NTF2_minus_GDP_dot_Ran
  // Binding of NTF2 to cytoplasmic fraction of GDP.Ran Kd = 100 nM <a href = "http://www.ncbi.nlm.nih.gov/entrez/query.fcgi?cmd=Retrieve&db=pubmed&dopt=Abstract&list_uids=10681579&query_hl=15&itool=pubmed_docsum"">Catherine Chaillan-Huntington et al (2000) J.Biol.Chem. 275(8):5874-5879</a>. call /kinetics/Cytoplasm/RanGTP_binding/notes LOAD Binding of cytoplasmic fraction of RanGTP to RanBP1 Kf = 3.0e+05 /M/sec = 0.3 /uM/sec Kb = 4.0e-04 /sec <a href = " http://www.ncbi.nlm.nih.gov/entrez/query.fcgi?cmd=Retrieve&db=pubmed&dopt=Abstract&list_uids=10995230&query_hl=17&itool=pubmed_docsum>Carolina I. Villa Braslavsky et al (2000) Biochemistry 39(38):11629-11639</a>. Supplementary Table A Gorlich D et al (2003) EMBO 22(5):1088-1100
  Cytoplasm_slash_NTF2_binding: $Cytoplasm_slash_NTF2 + Cytoplasm_slash_GDP_dot_Ran_minus_cytoplasmic -> Cytoplasm_slash_NTF2_minus_GDP_dot_Ran; Cytoplasm_slash_NTF2_binding_kf*Cytoplasm_slash_NTF2*Cytoplasm_slash_GDP_dot_Ran_minus_cytoplasmic - Cytoplasm_slash_NTF2_binding_kb*Cytoplasm_slash_NTF2_minus_GDP_dot_Ran;
    Cytoplasm_slash_NTF2_binding_kf = 1.80000792e-11 vol_uMINVsecINV; Cytoplasm_slash_NTF2_binding_kb = 1.8e-12 vol_secINV;
  // kf*Cytoplasm_slash_GTP_dot_Ran_minus_cytoplasmic*Cytoplasm_slash_RanBP1-kb*Cytoplasm_slash_RanBP1_dot_RanGTP
  Cytoplasm_slash_RanGTP_binding: Cytoplasm_slash_GTP_dot_Ran_minus_cytoplasmic + Cytoplasm_slash_RanBP1 -> Cytoplasm_slash_RanBP1_dot_RanGTP; Cytoplasm_slash_RanGTP_binding_kf*Cytoplasm_slash_GTP_dot_Ran_minus_cytoplasmic*Cytoplasm_slash_RanBP1 - Cytoplasm_slash_RanGTP_binding_kb*Cytoplasm_slash_RanBP1_dot_RanGTP;
    Cytoplasm_slash_RanGTP_binding_kf = 3.2400648e-10 vol_uMINVsecINV; Cytoplasm_slash_RanGTP_binding_kb = 7.2e-15 vol_secINV;
  // k1*Cytoplasm_slash_RanBP1_dot_RanGTP*Cytoplasm_slash_RanGAP-k2*Cytoplasm_slash_RanGAP_slash_RanGAP_slash_RanGAP_cplx
  // RanGAP reaction on RanGTP-RanBP1 complex kcat = 10.8 /sec Km = 0.1 uM at 25 degree C Table 1. Gorlich D et al (2003) EMBO 22(5):1088-1100
  Cytoplasm_slash_RanGAP_slash_RanGAP_1: Cytoplasm_slash_RanBP1_dot_RanGTP + Cytoplasm_slash_RanGAP -> Cytoplasm_slash_RanGAP_slash_RanGAP_slash_RanGAP_cplx; Cytoplasm_slash_RanGAP_slash_RanGAP_1_k1*Cytoplasm_slash_RanBP1_dot_RanGTP*Cytoplasm_slash_RanGAP - Cytoplasm_slash_RanGAP_slash_RanGAP_1_k2*Cytoplasm_slash_RanGAP_slash_RanGAP_slash_RanGAP_cplx;
    Cytoplasm_slash_RanGAP_slash_RanGAP_1_k1 = 9.72e-9 vol_uMINVsecINV; Cytoplasm_slash_RanGAP_slash_RanGAP_1_k2 = 7.776e-10 vol_secINV;
  // k3*Cytoplasm_slash_RanGAP_slash_RanGAP_slash_RanGAP_cplx
  Cytoplasm_slash_RanGAP_slash_RanGAP_2: Cytoplasm_slash_RanGAP_slash_RanGAP_slash_RanGAP_cplx => Cytoplasm_slash_GDP_dot_Ran_minus_cytoplasmic + Cytoplasm_slash_RanGAP; Cytoplasm_slash_RanGAP_slash_RanGAP_2_k3*Cytoplasm_slash_RanGAP_slash_RanGAP_slash_RanGAP_cplx;
    Cytoplasm_slash_RanGAP_slash_RanGAP_2_k3 = 1.944e-10 vol_secINV;
  // k1*Cytoplasm_slash_GTP_dot_Ran_minus_cytoplasmic*Cytoplasm_slash_RanGAP-k2*Cytoplasm_slash_RanGAP_slash_RanGAP_sbo_1_sbc__slash_RanGAP_sbo_1_sbc__cplx
  // RanGAP reaction on free RanGTP kcat = 10.6 /sec Km = 0.7 uM at 25 degree C Table 1. Gorlich D et al (2003) EMBO 22(5):1088-1100
  Cytoplasm_slash_RanGAP_slash_RanGAP_sbo_1_sbc__1: Cytoplasm_slash_GTP_dot_Ran_minus_cytoplasmic + Cytoplasm_slash_RanGAP -> Cytoplasm_slash_RanGAP_slash_RanGAP_sbo_1_sbc__slash_RanGAP_sbo_1_sbc__cplx; Cytoplasm_slash_RanGAP_slash_RanGAP_sbo_1_sbc__1_k1*Cytoplasm_slash_GTP_dot_Ran_minus_cytoplasmic*Cytoplasm_slash_RanGAP - Cytoplasm_slash_RanGAP_slash_RanGAP_sbo_1_sbc__1_k2*Cytoplasm_slash_RanGAP_slash_RanGAP_sbo_1_sbc__slash_RanGAP_sbo_1_sbc__cplx;
    Cytoplasm_slash_RanGAP_slash_RanGAP_sbo_1_sbc__1_k1 = 1.36286064e-9 vol_uMINVsecINV; Cytoplasm_slash_RanGAP_slash_RanGAP_sbo_1_sbc__1_k2 = 7.632e-10 vol_secINV;
  // k3*Cytoplasm_slash_RanGAP_slash_RanGAP_sbo_1_sbc__slash_RanGAP_sbo_1_sbc__cplx
  Cytoplasm_slash_RanGAP_slash_RanGAP_sbo_1_sbc__2: Cytoplasm_slash_RanGAP_slash_RanGAP_sbo_1_sbc__slash_RanGAP_sbo_1_sbc__cplx => Cytoplasm_slash_GDP_dot_Ran_minus_cytoplasmic + Cytoplasm_slash_RanGAP; Cytoplasm_slash_RanGAP_slash_RanGAP_sbo_1_sbc__2_k3*Cytoplasm_slash_RanGAP_slash_RanGAP_sbo_1_sbc__slash_RanGAP_sbo_1_sbc__cplx;
    Cytoplasm_slash_RanGAP_slash_RanGAP_sbo_1_sbc__2_k3 = 1.908e-10 vol_secINV;

  // Unit definitions:
  unit vol_secINV = litre / second;
  unit vol_uMINVsecINV = litre^2 / (1e-6 mole * second);
  unit substance = 1e-6 mole;
end
