// SBML level 2 version 1

model Rehm2006_caspase()
  // Rehm2006_caspase
  // This model originates from BioModels Database: A Database of Annotated Published Models. It is copyright (c) 2005-2007 The BioModels Team.
  // For more information see the terms of use.

  // Compartments:
  compartment compartment_1 = 1;  // 2-D

  // Species:
  species PC3 in compartment_1 = 0.12/compartment_1;
  species XIAP in compartment_1 = 0.063/compartment_1;
  species C9 in compartment_1 = 0;
  species C3 in compartment_1 = 0;
  species C9P in compartment_1 = 0;
  species XIAP_C3 in compartment_1 = 0; XIAP_C3 is "XIAP~C3";
  species XIAP_C9 in compartment_1 = 0; XIAP_C9 is "XIAP~C9";
  species XIAP_C9_C3 in compartment_1 = 0; XIAP_C9_C3 is "XIAP~C9~C3";
  species XIAP_p2frag in compartment_1 = 0; XIAP_p2frag is "XIAP~p2frag";
  species XIAP_p2frag_C3 in compartment_1 = 0; XIAP_p2frag_C3 is "XIAP~p2frag~C3";
  species Bir12 in compartment_1 = 0;
  species Bir12_C3 in compartment_1 = 0; Bir12_C3 is "Bir12~C3";
  species Bir3R in compartment_1 = 0;
  species Bir3R_C9 in compartment_1 = 0; Bir3R_C9 is "Bir3R~C9";
  species Bir3R_p2frag in compartment_1 = 0; Bir3R_p2frag is "Bir3R~p2frag";
  species XIAP_2Smac in compartment_1 = 0; XIAP_2Smac is "XIAP~2Smac";
  species Bir12_Smac in compartment_1 = 0; Bir12_Smac is "Bir12~Smac";
  species Bir3R_Smac in compartment_1 = 0; Bir3R_Smac is "Bir3R~Smac";
  species Smac in compartment_1 = 0;
  species XIAP_p2frag_2Smac in compartment_1 = 0; XIAP_p2frag_2Smac is "XIAP~p2frag~2Smac";
  species Substr in compartment_1 = 1/compartment_1;
  species ClvgPrds in compartment_1 = 0;

  // Reactions:
  Prod_Degr_Pro_Caspase_3: -> PC3; k1 - k1r*PC3; Prod_Degr_Pro_Caspase_3 is "Prod/Degr: Pro Caspase-3";
    k1r = 0.0039; k1 = 0.000468;
  Prod_Degr_XIAP: -> XIAP; k2 - k2r*XIAP; Prod_Degr_XIAP is "Prod/Degr: XIAP";
    k2 = 0.0007308; k2r = 0.0116;
  reaction_26: C9 + PC3 => C3 + C9; k3*C9*PC3;
    k3 = 6;
  reaction_27: C9 + C3 => C9P + C3; reaction_27_k4*C9*C3;
    reaction_27_k4 = 12;
  reaction_28: C9P + PC3 => C9P + C3; k5*C9P*PC3;
    k5 = 48;
  reaction_29: PC3 + C3 => C3 + C3; k6*PC3*C3;
    k6 = 2.4;
  reaction_30: C3 + XIAP -> XIAP_C3; reaction_30_k7*C3*XIAP - reaction_30_k7r*XIAP_C3;
    reaction_30_k7 = 156; reaction_30_k7r = 0.144;
  reaction_31: C3 + XIAP_C9 -> XIAP_C9_C3; reaction_31_k7*C3*XIAP_C9 - reaction_31_k7r*XIAP_C9_C3;
    reaction_31_k7 = 156; reaction_31_k7r = 0.144;
  reaction_32: C3 + XIAP_p2frag -> XIAP_p2frag_C3; reaction_32_k7*C3*XIAP_p2frag - reaction_32_k7r*XIAP_p2frag_C3;
    reaction_32_k7 = 156; reaction_32_k7r = 0.144;
  reaction_33: C3 + Bir12 -> Bir12_C3; reaction_33_k7*C3*Bir12 - reaction_33_k7r*Bir12_C3;
    reaction_33_k7 = 156; reaction_33_k7r = 0.144;
  reaction_34: C3 + XIAP => Bir12 + Bir3R + C3; reaction_34_k4*C3*XIAP;
    reaction_34_k4 = 12;
  reaction_35: C3 + XIAP_C9 => Bir12 + Bir3R_C9 + C3; reaction_35_k4*C3*XIAP_C9;
    reaction_35_k4 = 12;
  reaction_36: C3 + XIAP_C3 => C3 + Bir12_C3 + Bir3R; reaction_36_k4*C3*XIAP_C3;
    reaction_36_k4 = 12;
  reaction_37: C3 + XIAP_p2frag => C3 + Bir12 + Bir3R_p2frag; reaction_37_k4*C3*XIAP_p2frag;
    reaction_37_k4 = 12;
  reaction_38: C3 + XIAP_p2frag_C3 => C3 + Bir12_C3 + Bir3R_p2frag; reaction_38_k4*C3*XIAP_p2frag_C3;
    reaction_38_k4 = 12;
  reaction_39: C3 + XIAP_C9_C3 => C3 + Bir12_C3 + Bir3R_C9; reaction_39_k4*C3*XIAP_C9_C3;
    reaction_39_k4 = 12;
  reaction_40: C3 + XIAP_2Smac => C3 + Bir12_Smac + Bir3R_Smac; reaction_40_k4*C3*XIAP_2Smac;
    reaction_40_k4 = 12;
  reaction_41: C3 + XIAP_C9_C3 => C3 + C9P + XIAP_p2frag_C3; reaction_41_k4*C3*XIAP_C9_C3;
    reaction_41_k4 = 12;
  reaction_42: C3 + XIAP_C9 => C3 + C9P + XIAP_p2frag; reaction_42_k4*C3*XIAP_C9;
    reaction_42_k4 = 12;
  reaction_43: C3 + Bir3R_C9 => C3 + Bir3R_p2frag + C9P; reaction_43_k4*C3*Bir3R_C9;
    reaction_43_k4 = 12;
  reaction_44: C9 + XIAP -> XIAP_C9; reaction_44_k8*C9*XIAP - reaction_44_k8r*XIAP_C9;
    reaction_44_k8 = 156; reaction_44_k8r = 0.144;
  reaction_45: C9 + XIAP_C3 => XIAP_C9_C3; reaction_45_k9*C9*XIAP_C3;
    reaction_45_k9 = 0; k9r = 0;
  reaction_46: C9 + Bir3R -> Bir3R_C9; reaction_46_k8*C9*Bir3R - reaction_46_k8r*Bir3R_C9;
    reaction_46_k8 = 156; reaction_46_k8r = 0.144;
  reaction_47: Bir3R_p2frag => Bir3R; reaction_47_k9*Bir3R_p2frag;
    reaction_47_k9 = 0;
  reaction_48: XIAP_p2frag => XIAP; reaction_48_k9*XIAP_p2frag;
    reaction_48_k9 = 0;
  reaction_49: XIAP + 2 Smac -> XIAP_2Smac; k10*XIAP*Smac*Smac - k10r*XIAP_2Smac;
    k10 = 420; k10r = 0.133;
  reaction_50: XIAP_C9 + 2 Smac -> XIAP_2Smac + C9; reaction_50_k11*XIAP_C9*Smac*Smac - reaction_50_k15r*XIAP_2Smac*C9;
    reaction_50_k11 = 420; reaction_50_k15r = 156;
  reaction_51: XIAP_C3 + 2 Smac -> XIAP_2Smac + C3; reaction_51_k11*XIAP_C3*Smac*Smac - reaction_51_k14r*XIAP_2Smac*C3;
    reaction_51_k11 = 420; reaction_51_k14r = 156;
  reaction_52: XIAP_C9_C3 + 2 Smac -> XIAP_2Smac + C3 + C9P; reaction_52_k11*XIAP_C9_C3*Smac*Smac - k11r*XIAP_2Smac*C3*C9P;
    reaction_52_k11 = 420; k11r = 156;
  reaction_53: Bir12 + Smac -> Bir12_Smac; k12*Bir12*Smac - k12r*Bir12_Smac;
    k12 = 4.45; k12r = 31.9;
  reaction_54: Bir3R + Smac -> Bir3R_Smac; k13*Bir3R*Smac - k13r*Bir3R_Smac;
    k13 = 0.33; k13r = 14.2;
  reaction_55: Bir12_C3 + Smac -> Bir12_Smac + C3; k14*Bir12_C3*Smac - reaction_55_k14r*Bir12_Smac*C3;
    k14 = 4.45; reaction_55_k14r = 156;
  reaction_56: Bir3R_C9 + Smac -> Bir3R_Smac + C9; k15*Bir3R_C9*Smac - reaction_56_k15r*Bir3R_Smac*C9;
    k15 = 0.33; reaction_56_k15r = 156;
  reaction_57: XIAP_p2frag + 2 Smac -> XIAP_p2frag_2Smac; reaction_57_k11*XIAP_p2frag*Smac*Smac - k18r*XIAP_p2frag_2Smac;
    reaction_57_k11 = 420; k18r = 156;
  reaction_58: C9P => ; reaction_58_k16*C9P;
    reaction_58_k16 = 0.0058;
  reaction_59: C9 => ; reaction_59_k16*C9;
    reaction_59_k16 = 0.0058;
  reaction_60: C3 => ; reaction_60_k16*C3;
    reaction_60_k16 = 0.0058;
  reaction_61: XIAP_C3 => ; reaction_61_k17*XIAP_C3;
    reaction_61_k17 = 0.0347;
  reaction_62: XIAP_C9_C3 => ; reaction_62_k17*XIAP_C9_C3;
    reaction_62_k17 = 0.0347;
  reaction_63: XIAP_C9 => ; reaction_63_k17*XIAP_C9;
    reaction_63_k17 = 0.0347;
  reaction_64: XIAP_p2frag => ; reaction_64_k16*XIAP_p2frag;
    reaction_64_k16 = 0.0058;
  reaction_65: XIAP_p2frag_C3 => ; reaction_65_k17*XIAP_p2frag_C3;
    reaction_65_k17 = 0.0347;
  reaction_66: XIAP_p2frag_2Smac => ; reaction_66_k17*XIAP_p2frag_2Smac;
    reaction_66_k17 = 0.0347;
  reaction_67: XIAP_2Smac => ; reaction_67_k17*XIAP_2Smac;
    reaction_67_k17 = 0.0347;
  reaction_68: Bir12 => ; reaction_68_k16*Bir12;
    reaction_68_k16 = 0.0058;
  reaction_69: Bir3R => ; reaction_69_k17*Bir3R;
    reaction_69_k17 = 0.0347;
  reaction_70: Bir12_Smac => ; reaction_70_k16*Bir12_Smac;
    reaction_70_k16 = 0.0058;
  reaction_71: Bir3R_Smac => ; reaction_71_k17*Bir3R_Smac;
    reaction_71_k17 = 0.0347;
  reaction_72: Bir12_C3 => ; reaction_72_k16*Bir12_C3;
    reaction_72_k16 = 0.0058;
  reaction_73: Bir3R_C9 => ; reaction_73_k17*Bir3R_C9;
    reaction_73_k17 = 0.0347;
  reaction_74: Bir3R_p2frag => ; reaction_74_k17*Bir3R_p2frag;
    reaction_74_k17 = 0.0347;
  reaction_75: Smac => ; reaction_75_k16*Smac;
    reaction_75_k16 = 0.0058;
  reaction_76: C3 + Substr => C3 + ClvgPrds; reaction_76_k4*C3*Substr;
    reaction_76_k4 = 12;
end
