// SBML level 2 version 1

model Kolomeisky2003_myosin()
  // This model originates from BioModels Database: A Database of Annotated Published Models. It is copyright (c) 2005-2007 The BioModels Team.
  // For more information see the terms of use.

  // Compartments:
  compartment compartment = 1;

  // Species:
  species S0 in compartment = 1/compartment;
  species $ATP in compartment = 20/compartment;
  species S1 in compartment = 0;
  species Pi in compartment = 0;
  species ADP in compartment = 0;
  species $Force in compartment = 0;
  species d1 in compartment = 0;
  species d2 in compartment = 0;
  species d3 in compartment = 0;
  species d4 in compartment = 0;

  // Reactions:
  Fw_1st_step: S0 + $ATP => S1 + Pi + d1; k_1*S0*ATP*exp(th_1*Force*d_1/kT_1);  // modifiers: Force
    k_1 = 0.7; th_1 = -0.01; d_1 = 36; kT_1 = 4.1164;
  Fw_2nd_step: S1 => S0 + ADP + d2; k_2*S1*exp(th_2*Force*d_2/kT_2);  // modifiers: Force
    k_2 = 12; th_2 = 0.045; d_2 = 36; kT_2 = 4.1164;
  Bw_1st_step: S0 + $ATP => S1 + Pi + d3; k_3*S0*ATP*exp(th_3*Force*d_3/kT_3);  // modifiers: Force
    k_3 = 5e-6; th_3 = 0.58; d_3 = 36; kT_3 = 4.1164;
  Bw_2nd_step: S1 => S0 + ADP + d4; k_4*S1*exp(th_4*Force*d_4/kT_4);  // modifiers: Force
    k_4 = 6e-6; th_4 = 0.385; d_4 = 36; kT_4 = 4.1164;
end
