// SBML level 2 version 1

model plant_1981_version01()
  // This model originates from BioModels Database: A Database of Annotated Published Models. It is copyright (c) 2005-2007 The BioModels Team.
  // For more information see the terms of use.

  // Compartments:
  compartment COMpartment = 1 litre;

  // Parameters:
  V_membrane = -45 millivolt;
  i_Na has microA_per_cm2;
  g_Na = 4 milliS_per_cm2;
  V_Na = 30 millivolt;
  m_infinity has dimensionless;
  alpha_m has per_millisecond;
  beta_m has per_millisecond;
  h1 has dimensionless;
  h_infinity has dimensionless;
  alpha_h has per_millisecond;
  beta_h has per_millisecond;
  tau_h has millisecond;
  a = 1.2;
  b = 79;
  g_Ca = 0.004;
  x1 = ;
  V_Ca = 140 millivolt;
  tau_x = 235;
  g_K = 0.3 milliS_per_cm2;
  V_K = -75 millivolt;
  n1 = ;
  n_infinity has dimensionless;
  g_K_Ca = 0.03;
  f = 0.0003;
  Kc = 0.0085;
  c = ;
  g_L = 0.003;
  V_L = -40;

  // Assignment rules:
  Vs := a*V_membrane + b;
  alpha_m := 0.1*(50 - Vs)/(exp((50 - Vs)/10) - 1);
  beta_m := 4*exp((25 - Vs)/18);
  m_infinity := alpha_m*(1.21*Vs + 78.71)/(alpha_m*(1.21*Vs + 78.71) + beta_m*(1.21*Vs + 78.71));
  alpha_h := 0.07*exp((25 - Vs)/20);
  beta_h := (exp((55 - Vs)/10) + 1)^(-1);
  h_infinity := alpha_h*(1.21*Vs + 78.71)/(alpha_h*(1.21*Vs + 78.71) + beta_h*(1.21*Vs + 78.71));
  tau_h := 12.5/(alpha_h*(1.21*Vs + 78.71) + beta_h*(1.21*Vs + 78.71));
  i_Na := g_Na*m_infinity^3*h1*(V_Na - V_membrane);
  x_infinity := 1/(exp(0.15*(-Vs - 50)) + 1);
  i_Ca := g_Ca*x1*(V_Na - V_membrane);
  alpha_n := 0.01*(55 - Vs)/(exp((55 - Vs)/10) - 1);
  beta_n := 0.125*exp((45 - Vs)/80);
  n_infinity := alpha_n*(1.21*Vs + 78.71)/(alpha_n*(1.21*Vs + 78.71) + beta_n*(1.21*Vs + 78.71));
  tau_n := 1/(0.08*(alpha_n*(1.21*Vs + 78.71) + beta_n*(1.21*Vs + 78.71)));
  i_K := g_K*n1^4*(V_K - V_membrane);
  i_K_Ca := g_K_Ca*c/(0.5 + c)*(V_K - V_membrane);
  i_L := g_L*(V_L - V_membrane);

  // Rate rules:
  h1' = (h_infinity - h1)/tau_h;
  x1' = x_infinity - x1/tau_x;
  n1' = (n_infinity - n1)/tau_n;
  c' = f*(Kc*x1*(V_Ca - V_membrane) - c);
  V_membrane' = i_Na + i_Ca + i_K + i_K_Ca + i_L;

  // Unit definitions:
  unit millivolt = 1e-3 volt;
  unit per_millivolt = 1 / (1e-3 volt);
  unit millisecond = 1e-3 second;
  unit per_millivolt_millisecond = 1 / (1e-3 volt * 1e-3 second);
  unit per_millisecond = 1 / (1e-3 second);
  unit millimolar = 1e-3 mole / litre;
  unit microA_per_cm2 = 1e-6 ampere / (0.01 metre)^2;
  unit microF_per_cm2 = 1e-6 farad / (0.01 metre)^2;
  unit milliS_per_cm2 = 1e-3 siemens / (0.01 metre)^2;
  unit time = 1e-3 second;
end
