// SBML level 2 version 1

model Singh_Ghosh2006_TCA_eco_acetate()
  // This model originates from BioModels Database: A Database of Annotated Published Models. It is copyright (c) 2005-2007 The BioModels Team.
  // For more information see the terms of use.

  // Compartments:
  compartment cell = 1;

  // Species:
  species $aca in cell = 0.5;
  species $oaa in cell = 0.0014;
  species $coa in cell = 0.0001;
  species cit in cell = 9;
  species icit in cell = 0.15;
  species akg in cell = 0.2;
  species sca in cell = 0.04;
  species suc in cell = 6;
  species fa in cell = 0.3;
  species mal in cell = 5;
  species gly in cell = 4;
  species $biosyn in cell = 0.1;

  // Reactions:
  CS: $aca + $oaa -> $coa + cit; (Vf_cs*(aca/Kaca_cs)*(oaa/Koaa_cs) - Vr_cs*(coa/Kcoa_cs)*(cit/Kcit_cs))/((1 + aca/Kaca_cs + coa/Kcoa_cs)*(1 + oaa/Koaa_cs + cit/Kcit_cs));
    Vf_cs = 446.88 mmlmin; Kaca_cs = 0.03 mml; Koaa_cs = 0.07 mml; Vr_cs = 4.4688 mmlmin; Kcoa_cs = 0.3 mml; Kcit_cs = 0.7 mml;
  ACN: cit -> icit; (Vf_acn*(cit/Kcit_acn) - Vr_acn*(icit/Kicit_acn))/(1 + cit/Kcit_acn + icit/Kicit_acn);
    Vf_acn = 629.28 mmlmin; Kcit_acn = 1.7 mml; Vr_acn = 6.2928 mmlmin; Kicit_acn = 3.33 mml;
  ICD: icit -> akg; (ICD_Vf_icd*(icit/ICD_Kicit_icd) - ICD_Vr_icd*(akg/ICD_Kakg_icd))/(1 + icit/ICD_Kicit_icd + akg/ICD_Kakg_icd);
    ICD_Vf_icd = 6.625 mmlmin; ICD_Kicit_icd = 0.008 mml; ICD_Vr_icd = 0.06625 mmlmin; ICD_Kakg_icd = 0.13 mml;
  KDH: akg -> sca; (Vf_kdh*(akg/Kakg_kdh) - Vr_kdh*(sca/Ksca_kdh))/(1 + akg/Kakg_kdh + sca/Ksca_kdh);
    Vf_kdh = 57.344 mmlmin; Kakg_kdh = 0.1 mml; Vr_kdh = 0.57344 mmlmin; Ksca_kdh = 1 mml;
  ScAS: sca -> suc; (Vf_scas*(sca/Ksca_scas) - Vr_scas*(suc/Ksuc_scas))/(1 + sca/Ksca_scas + suc/Ksuc_scas);
    Vf_scas = 8.96 mmlmin; Ksca_scas = 0.02 mml; Vr_scas = 0.0896 mmlmin; Ksuc_scas = 5 mml;
  SDH: suc -> fa; (Vf_sdh*(suc/Ksuc_sdh) - Vr_sdh*(fa/Kfa_sdh))/(1 + suc/Ksuc_sdh + fa/Kfa_sdh);
    Vf_sdh = 17.7 mmlmin; Ksuc_sdh = 0.02 mml; Vr_sdh = 16.24 mmlmin; Kfa_sdh = 0.4 mml;
  FUM: fa -> mal; (Vf_fum*(fa/Kfa_fum) - Vr_fum*(mal/Kmal_fum))/(1 + fa/Kfa_fum + mal/Kmal_fum);
    Vf_fum = 156.24 mmlmin; Kfa_fum = 0.15 mml; Vr_fum = 144.67 mmlmin; Kmal_fum = 0.04 mml;
  MDH: mal -> $oaa; (Vf_mdh*(mal/Kmal_mdh) - Vr_mdh*(oaa/Koaa_mdh))/(1 + mal/Kmal_mdh + oaa/Koaa_mdh);
    Vf_mdh = 1390.9 mmlmin; Kmal_mdh = 2.6 mml; Vr_mdh = 1276.06 mmlmin; Koaa_mdh = 0.04 mml;
  ICL: icit -> suc + gly; (Vf_icl*(icit/Kicit_icl) - Vr_icl*(suc/Ksuc_icl)*(gly/Kgly_icl))/(1 + icit/Kicit_icl + suc/Ksuc_icl + gly/Kgly_icl + icit/Kicit_icl*(suc/Ksuc_icl) + suc/Ksuc_icl*(gly/Kgly_icl));
    Vf_icl = 28.5 mmlmin; Kicit_icl = 0.604 mml; Vr_icl = 0.285 mmlmin; Ksuc_icl = 0.59 mml; Kgly_icl = 0.13 mml;
  MS: gly + $aca -> mal + $coa; (Vf_ms*(gly/Kgly_ms)*(aca/Kaca_ms) - Vr_ms*(mal/Kmal_ms)*(coa/Kcoa_ms))/((1 + gly/Kgly_ms + mal/Kmal_ms)*(1 + aca/Kaca_ms + coa/Kcoa_ms));
    Vf_ms = 28.5 mmlmin; Kgly_ms = 2 mml; Kaca_ms = 0.01 mml; Vr_ms = 0.285 mmlmin; Kmal_ms = 1 mml; Kcoa_ms = 0.1 mml;
  SYN: akg -> $biosyn; 0.0341*((SYN_Vf_icd*(icit/SYN_Kicit_icd) - SYN_Vr_icd*(akg/SYN_Kakg_icd))/(1 + icit/SYN_Kicit_icd + akg/SYN_Kakg_icd));  // modifiers: icit
    SYN_Vf_icd = 6.625 mmlmin; SYN_Kicit_icd = 0.008 mml; SYN_Vr_icd = 0.06625 mmlmin; SYN_Kakg_icd = 0.13 mml;

  // Unit definitions:
  unit substance = 1e-3 mole;
  unit mmlmin = 1e-3 mole / (litre * 60 second);
  unit mml = 1e-3 mole / litre;
end
