// SBML level 2 version 1

model Singh_Ghosh2006_TCA_mtu_model1()
  // This model originates from BioModels Database: A Database of Annotated Published Models. It is copyright (c) 2005-2007 The BioModels Team.
  // For more information see the terms of use.

  // Compartments:
  compartment cell = 1;

  // Species:
  species $aca in cell = 0.5;
  species $oaa in cell = 0.0003;
  species $coa in cell = 0.0001;
  species cit in cell = 3.4;
  species icit in cell = 0.06;
  species akg in cell = 0.96;
  species ssa in cell = 0.03;
  species suc in cell = 2.464;
  species sca in cell = 0.04;
  species fa in cell = 0.08528;
  species mal in cell = 0.408;
  species gly in cell = 0.114;
  species $biosyn in cell = 0.1;

  // Reactions:
  CS: $aca + $oaa -> $coa + cit; (Vf_cs*(aca/Kaca_cs)*(oaa/Koaa_cs) - Vr_cs*(coa/Kcoa_cs)*(cit/Kcit_cs))/((1 + aca/Kaca_cs + coa/Kcoa_cs)*(1 + oaa/Koaa_cs + cit/Kcit_cs));
    Vf_cs = 64.8 mmlmin; Kaca_cs = 0.05 mml; Koaa_cs = 0.012 mml; Vr_cs = 0.648 mmlmin; Kcoa_cs = 0.5 mml; Kcit_cs = 0.12 mml;
  ACN: cit -> icit; (Vf_acn*(cit/Kcit_acn) - Vr_acn*(icit/Kicit_acn))/(1 + cit/Kcit_acn + icit/Kicit_acn);
    Vf_acn = 31.2 mmlmin; Kcit_acn = 1.7 mml; Vr_acn = 0.312 mmlmin; Kicit_acn = 0.7 mml;
  ICD1: icit -> akg; (ICD1_Vf_icd1*(icit/ICD1_Kicit_icd1) - ICD1_Vr_icd1*(akg/ICD1_Kakg_icd1))/(1 + icit/ICD1_Kicit_icd1 + akg/ICD1_Kakg_icd1);
    ICD1_Vf_icd1 = 10.2 mmlmin; ICD1_Kicit_icd1 = 0.03 mml; ICD1_Vr_icd1 = 0.102 mmlmin; ICD1_Kakg_icd1 = 0.3 mml;
  ICD2: icit -> akg; (ICD2_Vf_icd2*(icit/ICD2_Kicit_icd2) - ICD2_Vr_icd2*(akg/ICD2_Kakg_icd2))/(1 + icit/ICD2_Kicit_icd2 + akg/ICD2_Kakg_icd2);
    ICD2_Vf_icd2 = 9.965 mmlmin; ICD2_Kicit_icd2 = 0.06 mml; ICD2_Vr_icd2 = 0.09965 mmlmin; ICD2_Kakg_icd2 = 0.6 mml;
  KDH: akg -> sca; (Vf_kdh*(akg/Kakg_kdh) - Vr_kdh*(sca/Ksca_kdh))/(1 + akg/Kakg_kdh + sca/Ksca_kdh);
    Vf_kdh = 57.344 mmlmin; Kakg_kdh = 0.1 mml; Vr_kdh = 0.57344 mmlmin; Ksca_kdh = 1 mml;
  KGD: akg -> ssa; (Vf_kgd*(akg/Kakg_kgd) - Vr_kgd*(ssa/Kssa_kgd))/(1 + akg/Kakg_kgd + ssa/Kssa_kgd);
    Vf_kgd = 48.3 mmlmin; Kakg_kgd = 0.48 mml; Vr_kgd = 0.483 mmlmin; Kssa_kgd = 4.8 mml;
  SSADH: ssa -> suc; (Vf_ssadh*(ssa/Kssa_ssadh) - Vr_ssadh*(suc/Ksuc_ssadh))/(1 + ssa/Kssa_ssadh + suc/Ksuc_ssadh);
    Vf_ssadh = 6.51 mmlmin; Kssa_ssadh = 0.015 mml; Vr_ssadh = 0.0651 mmlmin; Ksuc_ssadh = 0.15 mml;
  ScAS: sca -> suc; (Vf_scas*(sca/Ksca_scas) - Vr_scas*(suc/Ksuc_scas))/(1 + sca/Ksca_scas + suc/Ksuc_scas);
    Vf_scas = 1.2 mmlmin; Ksca_scas = 0.02 mml; Vr_scas = 0.012 mmlmin; Ksuc_scas = 5 mml;
  SDH: suc -> fa; (Vf_sdh*(suc/Ksuc_sdh) - Vr_sdh*(fa/Kfa_sdh))/(1 + suc/Ksuc_sdh + fa/Kfa_sdh);
    Vf_sdh = 1.02 mmlmin; Ksuc_sdh = 0.12 mml; Vr_sdh = 1.02 mmlmin; Kfa_sdh = 0.15 mml;
  FUM: fa -> mal; (Vf_fum*(fa/Kfa_fum) - Vr_fum*(mal/Kmal_fum))/(1 + fa/Kfa_fum + mal/Kmal_fum);
    Vf_fum = 87.7 mmlmin; Kfa_fum = 0.25 mml; Vr_fum = 87.7 mmlmin; Kmal_fum = 2.38 mml;
  MDH: mal -> $oaa; (Vf_mdh*(mal/Kmal_mdh) - Vr_mdh*(oaa/Koaa_mdh))/(1 + mal/Kmal_mdh + oaa/Koaa_mdh);
    Vf_mdh = 184 mmlmin; Kmal_mdh = 0.833 mml; Vr_mdh = 184 mmlmin; Koaa_mdh = 0.0443 mml;
  ICL1: icit -> suc + gly; (Vf_icl1*(icit/Kicit_icl1) - Vr_icl1*(suc/Ksuc_icl1)*(gly/Kgly_icl1))/(1 + icit/Kicit_icl1 + suc/Ksuc_icl1 + gly/Kgly_icl1 + icit/Kicit_icl1*(suc/Ksuc_icl1) + suc/Ksuc_icl1*(gly/Kgly_icl1));
    Vf_icl1 = 1.172 mmlmin; Kicit_icl1 = 0.145 mml; Vr_icl1 = 0.01172 mmlmin; Ksuc_icl1 = 0.59 mml; Kgly_icl1 = 0.13 mml;
  ICL2: icit -> suc + gly; (Vf_icl2*(icit/Kicit_icl2) - Vr_icl2*(suc/Ksuc_icl2)*(gly/Kgly_icl2))/(1 + icit/Kicit_icl2 + suc/Ksuc_icl2 + gly/Kgly_icl2 + icit/Kicit_icl2*(suc/Ksuc_icl2) + suc/Ksuc_icl2*(gly/Kgly_icl2));
    Vf_icl2 = 0.391 mmlmin; Kicit_icl2 = 1.3 mml; Vr_icl2 = 0.00391 mmlmin; Ksuc_icl2 = 5.9 mml; Kgly_icl2 = 1.3 mml;
  MS: gly + $aca -> mal + $coa; (Vf_ms*(gly/Kgly_ms)*(aca/Kaca_ms) - Vr_ms*(mal/Kmal_ms)*(coa/Kcoa_ms))/((1 + gly/Kgly_ms + mal/Kmal_ms)*(1 + aca/Kaca_ms + coa/Kcoa_ms));
    Vf_ms = 20 mmlmin; Kgly_ms = 0.057 mml; Kaca_ms = 0.03 mml; Vr_ms = 0.2 mmlmin; Kmal_ms = 1 mml; Kcoa_ms = 0.1 mml;
  SYN: akg -> $biosyn; 0.0341*((SYN_Vf_icd1*(icit/SYN_Kicit_icd1) - SYN_Vr_icd1*(akg/SYN_Kakg_icd1))/(1 + icit/SYN_Kicit_icd1 + akg/SYN_Kakg_icd1) + (SYN_Vf_icd2*(icit/SYN_Kicit_icd2) - SYN_Vr_icd2*(akg/SYN_Kakg_icd2))/(1 + icit/SYN_Kicit_icd2 + akg/SYN_Kakg_icd2));  // modifiers: icit
    SYN_Vf_icd1 = 10.2 mmlmin; SYN_Kicit_icd1 = 0.03 mml; SYN_Vr_icd1 = 0.102 mmlmin; SYN_Kakg_icd1 = 0.3 mml; SYN_Vf_icd2 = 9.965 mmlmin; SYN_Kicit_icd2 = 0.06 mml; SYN_Vr_icd2 = 0.09965 mmlmin; SYN_Kakg_icd2 = 0.6 mml;

  // Unit definitions:
  unit substance = 1e-3 mole;
  unit mmlmin = 1e-3 mole / (litre * 60 second);
  unit mml = 1e-3 mole / litre;
end
